// SBML level 2 version 4

model Model_1()
  // New Model

  // Compartments:
  compartment cell = 1;

  // Species:
  species s0 in cell = 0;
  species s1 in cell = 0;
  species s2 in cell = 0;
  species s3 in cell = 0;
  species s4 in cell = 1;
  species s5 in cell = 4645670;
  species s6 in cell = 1324;
  species s13 in cell = 22;
  species s14 in cell = 0;
  species s15 in cell = 171440;
  species s16 in cell = 9150;
  species s7 in cell = 80;
  species s8 in cell = 16;
  species s11 in cell = 584;
  species s9 in cell = 3413;
  species s10 in cell = 29;
  species s12 in cell = 1;
  species s17 in cell = 2280;
  species s18 in cell = 6;
  species s21 in cell = 13;
  species s28 in cell = 1;
  species s26 in cell = 260;
  species s27 in cell = 0;
  species s22 in cell = 3;
  species s24 in cell = 7;
  species s19 in cell = 596;
  species s20 in cell = 0;
  species s23 in cell = 3;
  species s25 in cell = 0;

  // Reactions:
  reaction_1: s0 + s1 => s2; cell*reaction_1_k1*s0*s1;
    reaction_1_k1 = 2.54;
  reaction_2: s2 => s0 + s1; cell*reaction_2_k1*s2; reaction_2 is "reaction_1";
    reaction_2_k1 = 1;
  reaction_3: s0 + s3 => s4; cell*reaction_3_k1*s0*s3; reaction_3 is "reaction_2";
    reaction_3_k1 = 0.254;
  reaction_4: s4 => s0 + s3; cell*reaction_4_k1*s4; reaction_4 is "reaction_3";
    reaction_4_k1 = 1;
  reaction_5: s0 + s5 => s6; cell*reaction_5_k1*s0*s5; reaction_5 is "reaction_4";
    reaction_5_k1 = 0.0254;
  reaction_6: s6 => s0 + s5; cell*reaction_6_k1*s6; reaction_6 is "reaction_5";
    reaction_6_k1 = 10;
  reaction_7: s3 + s13 => s14; cell*reaction_7_k1*s3*s13; reaction_7 is "reaction_6";
    reaction_7_k1 = 254;
  reaction_8: s14 => s3 + s13; cell*reaction_8_k1*s14; reaction_8 is "reaction_7";
    reaction_8_k1 = 10000;
  reaction_9: s13 + s15 => s16; cell*reaction_9_k1*s13*s15; reaction_9 is "reaction_8";
    reaction_9_k1 = 0.000254;
  reaction_10: s16 => s13 + s15; cell*reaction_10_k1*s16; reaction_10 is "reaction_9";
    reaction_10_k1 = 0.01;
  reaction_11: s2 + s5 => s7; cell*reaction_11_k1*s2*s5; reaction_11 is "reaction_10";
    reaction_11_k1 = 0.000254;
  reaction_12: s7 => s2 + s5; cell*reaction_12_k1*s7; reaction_12 is "reaction_11";
    reaction_12_k1 = 1;
  reaction_13: s4 + s5 => s8; cell*reaction_13_k1*s4*s5; reaction_13 is "reaction_12";
    reaction_13_k1 = 0.000254;
  reaction_14: s8 => s4 + s5; cell*reaction_14_k1*s8; reaction_14 is "reaction_13";
    reaction_14_k1 = 1;
  reaction_15: s2 + s9 => s11; cell*reaction_15_k1*s2*s9; reaction_15 is "reaction_14";
    reaction_15_k1 = 2.54;
  reaction_16: s11 => s2 + s9; cell*reaction_16_k1*s11; reaction_16 is "reaction_15";
    reaction_16_k1 = 1;
  reaction_17: s4 + s10 => s12; cell*reaction_17_k1*s4*s10; reaction_17 is "reaction_16";
    reaction_17_k1 = 2540;
  reaction_18: s12 => s4 + s10; cell*reaction_18_k1*s12; reaction_18 is "reaction_17";
    reaction_18_k1 = 1000;
  reaction_19: s14 + s17 => s18; cell*reaction_19_k1*s14*s17; reaction_19 is "reaction_18";
    reaction_19_k1 = 0.0254;
  reaction_20: s18 => s14 + s17; cell*reaction_20_k1*s18; reaction_20 is "reaction_19";
    reaction_20_k1 = 1;
  reaction_21: s28 => s28 + s21; cell*reaction_21_k1*s28; reaction_21 is "reaction_20";
    reaction_21_k1 = 0.62;
  reaction_22: s21 => ; cell*reaction_22_k1*s21; reaction_22 is "reaction_21";
    reaction_22_k1 = 0.5;
  reaction_23: s28 => s28 + s13; cell*reaction_23_k1*s28; reaction_23 is "reaction_22";
    reaction_23_k1 = 20;
  reaction_24: s13 => ; cell*reaction_24_k1*s13; reaction_24 is "reaction_23";
    reaction_24_k1 = 0.03;
  reaction_25: s16 => s15; cell*reaction_25_k1*s16; reaction_25 is "reaction_24";
    reaction_25_k1 = 0.03;
  reaction_26: s14 => s3; cell*reaction_26_k1*s14; reaction_26 is "reaction_25";
    reaction_26_k1 = 0.03;
  reaction_27: s18 => s3 + s17; cell*reaction_27_k1*s18; reaction_27 is "reaction_26";
    reaction_27_k1 = 0.03;
  reaction_28: s27 => s3 + s26; cell*reaction_28_k1*s27; reaction_28 is "reaction_27";
    reaction_28_k1 = 0.03;
  reaction_29: s28 => s28 + s22; cell*reaction_29_k1*s28; reaction_29 is "reaction_28";
    reaction_29_k1 = 1.67;
  reaction_30: s22 => ; cell*reaction_30_k1*s22; reaction_30 is "reaction_29";
    reaction_30_k1 = 0.5;
  reaction_31: s28 => s28 + s17; cell*reaction_31_k1*s28; reaction_31 is "reaction_30";
    reaction_31_k1 = 20;
  reaction_32: s17 => ; cell*reaction_32_k1*s17; reaction_32 is "reaction_31";
    reaction_32_k1 = 0.03;
  reaction_33: s18 => s14; cell*reaction_33_k1*s18; reaction_33 is "reaction_32";
    reaction_33_k1 = 0.03;
  reaction_34: s28 => s28 + s24; cell*reaction_34_k1*s28; reaction_34 is "reaction_33";
    reaction_34_k1 = 0.00625;
  reaction_35: s24 => ; cell*reaction_35_k1*s24; reaction_35 is "reaction_34";
    reaction_35_k1 = 0.5;
  reaction_36: s28 => s28 + s3; cell*reaction_36_k1*s28; reaction_36 is "reaction_35";
    reaction_36_k1 = 7;
  reaction_37: s3 => ; cell*reaction_37_k1*s3; reaction_37 is "reaction_36";
    reaction_37_k1 = 0.03;
  reaction_38: s18 => s13 + s17; cell*reaction_38_k1*s18; reaction_38 is "reaction_37";
    reaction_38_k1 = 3;
  reaction_39: s20 => s19; cell*reaction_39_k1*s20; reaction_39 is "reaction_38";
    reaction_39_k1 = 0.7;
  reaction_40: s27 => s13 + s26; cell*reaction_40_k1*s27; reaction_40 is "reaction_39";
    reaction_40_k1 = 0.5;
  reaction_41: s28 => s28 + s23; cell*reaction_41_k1*s28; reaction_41 is "reaction_40";
    reaction_41_k1 = 1;
  reaction_42: s23 => ; cell*reaction_42_k1*s23; reaction_42 is "reaction_41";
    reaction_42_k1 = 0.5;
  reaction_43: s28 => s28 + s19; cell*reaction_43_k1*s28; reaction_43 is "reaction_42";
    reaction_43_k1 = 20;
  reaction_44: s19 => ; cell*reaction_44_k1*s19; reaction_44 is "reaction_43";
    reaction_44_k1 = 0.03;
  reaction_45: s20 => s3; cell*reaction_45_k1*s20; reaction_45 is "reaction_44";
    reaction_45_k1 = 0.03;
  reaction_46: s3 + s19 => s20; cell*reaction_46_k1*s3*s19; reaction_46 is "reaction_45";
    reaction_46_k1 = 2.54;
  reaction_47: s20 => s3 + s19; cell*reaction_47_k1*s20; reaction_47 is "reaction_46";
    reaction_47_k1 = 10000;
  reaction_48: s28 => s28 + s25; cell*reaction_48_k1*s28; reaction_48 is "reaction_47";
    reaction_48_k1 = 0.43333;
  reaction_49: s25 => ; cell*reaction_49_k1*s25; reaction_49 is "reaction_48";
    reaction_49_k1 = 2.54;
  reaction_50: s28 => s28 + s26; cell*reaction_50_k1*s28; reaction_50 is "reaction_49";
    reaction_50_k1 = 20;
  reaction_51: s26 => ; cell*reaction_51_k1*s26; reaction_51 is "reaction_50";
    reaction_51_k1 = 0.03;
  reaction_52: s27 => s14; cell*reaction_52_k1*s27; reaction_52 is "reaction_51";
    reaction_52_k1 = 0.03;
  reaction_53: s14 + s26 => s27; cell*reaction_53_k1*s14*s26; reaction_53 is "reaction_52";
    reaction_53_k1 = 2.54;
  reaction_54: s27 => s14 + s26; cell*reaction_54_k1*s27; reaction_54 is "reaction_53";
    reaction_54_k1 = 10000;
  reaction_55: s4 => s0; cell*reaction_55_k1*s4; reaction_55 is "reaction_54";
    reaction_55_k1 = 0.03;
  reaction_56: s12 => s0 + s10; cell*reaction_56_k1*s12; reaction_56 is "reaction_55";
    reaction_56_k1 = 0.03;
  reaction_57: s8 => s6; cell*reaction_57_k1*s8; reaction_57 is "reaction_56";
    reaction_57_k1 = 0.03;
  reaction_58: s14 => s13; cell*reaction_58_k1*s14; reaction_58 is "reaction_57";
    reaction_58_k1 = 0.03;
  reaction_59: s18 => s13 + s17; cell*reaction_59_k1*s18; reaction_59 is "reaction_58";
    reaction_59_k1 = 0.03;
  reaction_60: s27 => s13 + s26; cell*reaction_60_k1*s27; reaction_60 is "reaction_59";
    reaction_60_k1 = 0.03;
  reaction_61: s20 => s19; cell*reaction_61_k1*s20; reaction_61 is "reaction_60";
    reaction_61_k1 = 0.03;
end
