// SBML level 2 version 4

function function_4_UbDegradation_1(Proteasome, Ub, cytosol, kproteff, kubd)
  kubd*Proteasome*Ub*cytosol*kproteff;
end

function function_4_Misfolding_1(NatP, ROS, cytosol, kmisfold)
  kmisfold*NatP*ROS*cytosol;
end

function function_4_UbUpregulation_1(MisP, cytosol, kubss)
  kubss*((MisP*cytosol)^6/(1500^6 + (MisP*cytosol)^6))/cytosol;
end

function function_4_MisPE3Binding_1(E3, MisP, cytosol, kbinMisPE3)
  kbinMisPE3*MisP*E3*cytosol;
end

function function_4_E1UbBinding_1(ATP, E1, Ub, cytosol, kbinE1Ub)
  kbinE1Ub*E1*Ub*cytosol*ATP*cytosol/(5000 + ATP*cytosol);
end

function function_4_E2UbBinding_1(E1_Ub, E2, cytosol, kbinE2Ub)
  kbinE2Ub*E2*E1_Ub*cytosol;
end

function function_4_Monoubiquitination_1(E2_Ub, E3_MisP, cytosol, kmonoUb)
  kmonoUb*E2_Ub*E3_MisP*cytosol;
end

function function_4_Polyubiquitination1_1(E2_Ub, E3_MisP_Ub, cytosol, kpolyUb)
  kpolyUb*E3_MisP_Ub*E2_Ub*cytosol;
end

function function_4_Polyubiquitination2_1(E2_Ub, E3_MisP_Ub2, cytosol, kpolyUb)
  kpolyUb*E3_MisP_Ub2*E2_Ub*cytosol;
end

function function_4_Polyubiquitination3_1(E2_Ub, E3_MisP_Ub3, cytosol, kpolyUb)
  kpolyUb*E3_MisP_Ub3*E2_Ub*cytosol;
end

function function_4_Polyubiquitination4_1(E2_Ub, E3_MisP_Ub4, cytosol, kpolyUb)
  kpolyUb*E3_MisP_Ub4*E2_Ub*cytosol;
end

function function_4_Polyubiquitination5_1(E2_Ub, E3_MisP_Ub5, cytosol, kpolyUb)
  kpolyUb*E3_MisP_Ub5*E2_Ub*cytosol;
end

function function_4_Polyubiquitination6_1(E2_Ub, E3_MisP_Ub6, cytosol, kpolyUb)
  kpolyUb*E3_MisP_Ub6*E2_Ub*cytosol;
end

function function_4_Polyubiquitination7_1(E2_Ub, E3_MisP_Ub7, cytosol, kpolyUb)
  kpolyUb*E3_MisP_Ub7*E2_Ub*cytosol;
end

function function_4_MisPDUBbinding1_1(DUB, E3_MisP_Ub, cytosol, kbinMisPDUB)
  kbinMisPDUB*E3_MisP_Ub*DUB*cytosol;
end

function function_4_MisPDUBbinding2_1(DUB, E3_MisP_Ub2, cytosol, kbinMisPDUB)
  kbinMisPDUB*E3_MisP_Ub2*DUB*cytosol;
end

function function_4_MisPDUBbinding3_1(DUB, E3_MisP_Ub3, cytosol, kbinMisPDUB)
  kbinMisPDUB*E3_MisP_Ub3*DUB*cytosol;
end

function function_4_MisPDUBbinding4_1(DUB, E3_MisP_Ub4, cytosol, kbinMisPDUB)
  kbinMisPDUB*E3_MisP_Ub4*DUB*cytosol;
end

function function_4_MisPDUBbinding5_1(DUB, E3_MisP_Ub5, cytosol, kbinMisPDUB)
  kbinMisPDUB*E3_MisP_Ub5*DUB*cytosol;
end

function function_4_MisPDUBbinding6_1(DUB, E3_MisP_Ub6, cytosol, kbinMisPDUB)
  kbinMisPDUB*E3_MisP_Ub6*DUB*cytosol;
end

function function_4_MisPDUBbinding7_1(DUB, E3_MisP_Ub7, cytosol, kbinMisPDUB)
  kbinMisPDUB*E3_MisP_Ub7*DUB*cytosol;
end

function function_4_MisPDUBbinding8_1(DUB, E3_MisP_Ub8, cytosol, kbinMisPDUB)
  kbinMisPDUB*E3_MisP_Ub8*DUB*cytosol;
end

function function_4_ProteasomeBindingUb4_1(E3_MisP_Ub4, Proteasome, cytosol, kbinProt)
  kbinProt*E3_MisP_Ub4*Proteasome*cytosol;
end

function function_4_ProteasomeBindingUb5_1(E3_MisP_Ub5, Proteasome, cytosol, kbinProt)
  kbinProt*E3_MisP_Ub5*Proteasome*cytosol;
end

function function_4_ProteasomeBindingUb6_1(E3_MisP_Ub6, Proteasome, cytosol, kbinProt)
  kbinProt*E3_MisP_Ub6*Proteasome*cytosol;
end

function function_4_ProteasomeBindingUb7_1(E3_MisP_Ub7, Proteasome, cytosol, kbinProt)
  kbinProt*E3_MisP_Ub7*Proteasome*cytosol;
end

function function_4_ProteasomeBindingUb8_1(E3_MisP_Ub8, Proteasome, cytosol, kbinProt)
  kbinProt*E3_MisP_Ub8*Proteasome*cytosol;
end

function function_4_DeubiquitinationBoundMisP5_1(DUB, MisP_Ub8_Proteasome, cytosol, kactDUBProt)
  kactDUBProt*MisP_Ub8_Proteasome*DUB*cytosol;
end

function function_4_DeubiquitinationBoundMisP4_1(DUB, MisP_Ub7_Proteasome, cytosol, kactDUBProt)
  kactDUBProt*MisP_Ub7_Proteasome*DUB*cytosol;
end

function function_4_DeubiquitinationBoundMisP3_1(DUB, MisP_Ub6_Proteasome, cytosol, kactDUBProt)
  kactDUBProt*MisP_Ub6_Proteasome*DUB*cytosol;
end

function function_4_DeubiquitinationBoundMisP2_1(DUB, MisP_Ub5_Proteasome, cytosol, kactDUBProt)
  kactDUBProt*MisP_Ub5_Proteasome*DUB*cytosol;
end

function function_4_DeubiquitinationBoundMisP1_1(DUB, MisP_Ub4_Proteasome, cytosol, kactDUBProt)
  kactDUBProt*MisP_Ub4_Proteasome*DUB*cytosol;
end

function function_4_ProteasomeActivity1_1(ATP, MisP_Ub4_Proteasome, cytosol, kactProt, kproteff)
  kactProt*kproteff*MisP_Ub4_Proteasome*ATP*cytosol/(5000 + ATP*cytosol);
end

function function_4_ProteasomeActivity2_1(ATP, MisP_Ub5_Proteasome, cytosol, kactProt, kproteff)
  kactProt*kproteff*MisP_Ub5_Proteasome*ATP*cytosol/(5000 + ATP*cytosol);
end

function function_4_ProteasomeActivity3_1(ATP, MisP_Ub6_Proteasome, cytosol, kactProt, kproteff)
  kactProt*kproteff*MisP_Ub6_Proteasome*ATP*cytosol/(5000 + ATP*cytosol);
end

function function_4_ProteasomeActivity4_1(ATP, MisP_Ub7_Proteasome, cytosol, kactProt, kproteff)
  kactProt*kproteff*MisP_Ub7_Proteasome*ATP*cytosol/(5000 + ATP*cytosol);
end

function function_4_ProteasomeActivity5_1(ATP, MisP_Ub8_Proteasome, cytosol, kactProt, kproteff)
  kactProt*kproteff*MisP_Ub8_Proteasome*ATP*cytosol/(5000 + ATP*cytosol);
end

function function_4_Aggregation1_1(MisP, cytosol, kagg1)
  kagg1*MisP*(MisP*cytosol - 1)*0.5;
end

function function_4_Aggregation2_1(AggP1, MisP, cytosol, kagg2)
  kagg2*MisP*AggP1*cytosol;
end

function function_4_Aggregation3_1(AggP2, MisP, cytosol, kagg2)
  kagg2*MisP*AggP2*cytosol;
end

function function_4_Aggregation4_1(AggP3, MisP, cytosol, kagg2)
  kagg2*MisP*AggP3*cytosol;
end

function function_4_Aggregation5_1(AggP4, MisP, cytosol, kagg2)
  kagg2*MisP*AggP4*cytosol;
end

function function_4_InclusionFormation_1(AggP5, MisP, cytosol, kagg2)
  kagg2*MisP*AggP5*cytosol;
end

function function_4_InclusionGrowth1_1(MisP, SeqAggP, cytosol, kigrowth1)
  kigrowth1*MisP*SeqAggP*cytosol;
end

function function_4_InclusionGrowth2_1(E3_MisP, SeqAggP, cytosol, kigrowth2)
  kigrowth2*E3_MisP*SeqAggP*cytosol;
end

function function_4_InclusionGrowth3_1(E3_MisP_Ub, SeqAggP, cytosol, kigrowth2)
  kigrowth2*E3_MisP_Ub*SeqAggP*cytosol;
end

function function_4_InclusionGrowth4_1(E3_MisP_Ub2, SeqAggP, cytosol, kigrowth2)
  kigrowth2*E3_MisP_Ub2*SeqAggP*cytosol;
end

function function_4_InclusionGrowth5_1(E3_MisP_Ub3, SeqAggP, cytosol, kigrowth2)
  kigrowth2*E3_MisP_Ub3*SeqAggP*cytosol;
end

function function_4_InclusionGrowth6_1(E3_MisP_Ub4, SeqAggP, cytosol, kigrowth2)
  kigrowth2*E3_MisP_Ub4*SeqAggP*cytosol;
end

function function_4_InclusionGrowth7_1(E3_MisP_Ub5, SeqAggP, cytosol, kigrowth2)
  kigrowth2*E3_MisP_Ub5*SeqAggP*cytosol;
end

function function_4_InclusionGrowth8_1(E3_MisP_Ub6, SeqAggP, cytosol, kigrowth2)
  kigrowth2*E3_MisP_Ub6*SeqAggP*cytosol;
end

function function_4_InclusionGrowth9_1(E3_MisP_Ub7, SeqAggP, cytosol, kigrowth2)
  kigrowth2*E3_MisP_Ub7*SeqAggP*cytosol;
end

function function_4_InclusionGrowth10_1(E3_MisP_Ub8, SeqAggP, cytosol, kigrowth2)
  kigrowth2*E3_MisP_Ub8*SeqAggP*cytosol;
end

function function_4_InclusionGrowth11_1(E3_MisP_Ub_DUB, SeqAggP, cytosol, kigrowth2)
  kigrowth2*E3_MisP_Ub_DUB*SeqAggP*cytosol;
end

function function_4_InclusionGrowth12_1(E3_MisP_Ub2_DUB, SeqAggP, cytosol, kigrowth2)
  kigrowth2*E3_MisP_Ub2_DUB*SeqAggP*cytosol;
end

function function_4_InclusionGrowth13_1(E3_MisP_Ub3_DUB, SeqAggP, cytosol, kigrowth2)
  kigrowth2*E3_MisP_Ub3_DUB*SeqAggP*cytosol;
end

function function_4_InclusionGrowth14_1(E3_MisP_Ub4_DUB, SeqAggP, cytosol, kigrowth2)
  kigrowth2*E3_MisP_Ub4_DUB*SeqAggP*cytosol;
end

function function_4_InclusionGrowth15_1(E3_MisP_Ub5_DUB, SeqAggP, cytosol, kigrowth2)
  kigrowth2*E3_MisP_Ub5_DUB*SeqAggP*cytosol;
end

function function_4_InclusionGrowth16_1(E3_MisP_Ub6_DUB, SeqAggP, cytosol, kigrowth2)
  kigrowth2*E3_MisP_Ub6_DUB*SeqAggP*cytosol;
end

function function_4_InclusionGrowth17_1(E3_MisP_Ub7_DUB, SeqAggP, cytosol, kigrowth2)
  kigrowth2*E3_MisP_Ub7_DUB*SeqAggP*cytosol;
end

function function_4_InclusionGrowth18_1(E3_MisP_Ub8_DUB, SeqAggP, cytosol, kigrowth2)
  kigrowth2*E3_MisP_Ub8_DUB*SeqAggP*cytosol;
end

function function_4_ProteasomeInhibition1_1(AggP1, Proteasome, cytosol, kbinAggProt)
  kbinAggProt*AggP1*Proteasome*cytosol;
end

function function_4_ProteasomeInhibition2_1(AggP2, Proteasome, cytosol, kbinAggProt)
  kbinAggProt*AggP2*Proteasome*cytosol;
end

function function_4_ProteasomeInhibition3_1(AggP3, Proteasome, cytosol, kbinAggProt)
  kbinAggProt*AggP3*Proteasome*cytosol;
end

function function_4_ProteasomeInhibition4_1(AggP4, Proteasome, cytosol, kbinAggProt)
  kbinAggProt*AggP4*Proteasome*cytosol;
end

function function_4_ProteasomeInhibition5_1(AggP5, Proteasome, cytosol, kbinAggProt)
  kbinAggProt*AggP5*Proteasome*cytosol;
end

function function_4_UCHL1ProteasomeBinding_1(Proteasome, UCHL1, cytosol, kbinUCHL1Prot)
  kbinUCHL1Prot*UCHL1*Proteasome*cytosol;
end

function function_4_UCHL1ProteasomeDegradation_1(UCHL1_Proteasome, kdegProtUCHL1, kproteff)
  kdegProtUCHL1*UCHL1_Proteasome*kproteff;
end

function function_4_UCHL1LysosomalDegradation_1(Lysosome, UCHL1, cytosol, kdegLysUCHL1)
  kdegLysUCHL1*UCHL1*Lysosome*cytosol;
end

function function_4_UCHL1damage_1(ROS, UCHL1, cytosol, kdamUCHL1)
  kdamUCHL1*UCHL1*ROS*cytosol;
end

function function_4_UCHL1DamgedProteasomeBinding_1(Proteasome, UCHL1_damaged, cytosol, kbinUCHL1Prot)
  kbinUCHL1Prot*UCHL1_damaged*Proteasome*cytosol;
end

function function_4_UCHL1DamagedProteasomeDegradation_1(UCHL1_damaged_Proteasome, kdegProtUCHL1, kproteff)
  kdegProtUCHL1*UCHL1_damaged_Proteasome*kproteff;
end

function function_4_UCHL1DamagedLysosomalDegradation_1(Lysosome, UCHL1_damaged, cytosol, kdegLysUCHL1dam)
  kdegLysUCHL1dam*UCHL1_damaged*Lysosome*cytosol;
end

function function_4_UCHL1Lamp2abinding_1(Lamp2a, UCHL1_damaged, cytosol, kbinLamp2aUCHL1dam)
  kbinLamp2aUCHL1dam*UCHL1_damaged*Lamp2a*cytosol;
end

function function_4_UbUCHL1binding_1(UCHL1, Ub, cytosol, kbinUbUCHL1)
  kbinUbUCHL1*Ub*UCHL1*cytosol;
end

function function_4_SUBmisfolding_1(ROS, SUB, cytosol, kmisfoldSUB)
  kmisfoldSUB*SUB*ROS*cytosol;
end

function function_4_E3SUBBinding_1(E3SUB, SUB_misfolded, cytosol, kbinE3SUB)
  kbinE3SUB*SUB_misfolded*E3SUB*cytosol;
end

function function_4_SUBMonoubiquitination_1(E2_Ub, E3SUB_SUB_misfolded, cytosol, kmonoUb)
  kmonoUb*E2_Ub*E3SUB_SUB_misfolded*cytosol;
end

function function_4_SUBPolyubiquitination1_1(E2_Ub, E3SUB_SUB_misfolded_Ub, cytosol, kpolyUb)
  kpolyUb*E3SUB_SUB_misfolded_Ub*E2_Ub*cytosol;
end

function function_4_SUBPolyubiquitination2_1(E2_Ub, E3SUB_SUB_misfolded_Ub2, cytosol, kpolyUb)
  kpolyUb*E3SUB_SUB_misfolded_Ub2*E2_Ub*cytosol;
end

function function_4_SUBPolyubiquitination3_1(E2_Ub, E3SUB_SUB_misfolded_Ub3, cytosol, kpolyUb)
  kpolyUb*E3SUB_SUB_misfolded_Ub3*E2_Ub*cytosol;
end

function function_4_SUBPolyubiquitination4_1(E2_Ub, E3SUB_SUB_misfolded_Ub4, cytosol, kpolyUb)
  kpolyUb*E3SUB_SUB_misfolded_Ub4*E2_Ub*cytosol;
end

function function_4_SUBPolyubiquitination5_1(E2_Ub, E3SUB_SUB_misfolded_Ub5, cytosol, kpolyUb)
  kpolyUb*E3SUB_SUB_misfolded_Ub5*E2_Ub*cytosol;
end

function function_4_SUBPolyubiquitination6_1(E2_Ub, E3SUB_SUB_misfolded_Ub6, cytosol, kpolyUb)
  kpolyUb*E3SUB_SUB_misfolded_Ub6*E2_Ub*cytosol;
end

function function_4_SUBPolyubiquitination7_1(E2_Ub, E3SUB_SUB_misfolded_Ub7, cytosol, kpolyUb)
  kpolyUb*E3SUB_SUB_misfolded_Ub7*E2_Ub*cytosol;
end

function function_4_SUBUCHL1binding1_1(E3SUB_SUB_misfolded_Ub, UCHL1, cytosol, kbinSUBUCHL1)
  kbinSUBUCHL1*E3SUB_SUB_misfolded_Ub*UCHL1*cytosol;
end

function function_4_SUBUCHL1binding2_1(E3SUB_SUB_misfolded_Ub2, UCHL1, cytosol, kbinSUBUCHL1)
  kbinSUBUCHL1*E3SUB_SUB_misfolded_Ub2*UCHL1*cytosol;
end

function function_4_SUBUCHL1binding3_1(E3SUB_SUB_misfolded_Ub3, UCHL1, cytosol, kbinSUBUCHL1)
  kbinSUBUCHL1*E3SUB_SUB_misfolded_Ub3*UCHL1*cytosol;
end

function function_4_SUBUCHL1binding4_1(E3SUB_SUB_misfolded_Ub4, UCHL1, cytosol, kbinSUBUCHL1)
  kbinSUBUCHL1*E3SUB_SUB_misfolded_Ub4*UCHL1*cytosol;
end

function function_4_SUBUCHL1binding5Ub_UCHL1_1(E3SUB_SUB_misfolded_Ub5, UCHL1, cytosol, kbinSUBUCHL1)
  kbinSUBUCHL1*E3SUB_SUB_misfolded_Ub5*UCHL1*cytosol;
end

function function_4_SUBUCHL1binding6_1(E3SUB_SUB_misfolded_Ub6, UCHL1, cytosol, kbinSUBUCHL1)
  kbinSUBUCHL1*E3SUB_SUB_misfolded_Ub6*UCHL1*cytosol;
end

function function_4_SUBUCHL1binding7_1(E3SUB_SUB_misfolded_Ub7, UCHL1, cytosol, kbinSUBUCHL1)
  kbinSUBUCHL1*E3SUB_SUB_misfolded_Ub7*UCHL1*cytosol;
end

function function_4_SUBUCHL1binding8_1(E3SUB_SUB_misfolded_Ub8, UCHL1, cytosol, kbinSUBUCHL1)
  kbinSUBUCHL1*E3SUB_SUB_misfolded_Ub8*UCHL1*cytosol;
end

function function_4_SUBProteasomeBindingUb4_1(E3SUB_SUB_misfolded_Ub4, Proteasome, cytosol, kbinProt)
  kbinProt*E3SUB_SUB_misfolded_Ub4*Proteasome*cytosol;
end

function function_4_SUBProteasomeBindingUb5_1(E3SUB_SUB_misfolded_Ub5, Proteasome, cytosol, kbinProt)
  kbinProt*E3SUB_SUB_misfolded_Ub5*Proteasome*cytosol;
end

function function_4_SUBProteasomeBindingUb6_1(E3SUB_SUB_misfolded_Ub6, Proteasome, cytosol, kbinProt)
  kbinProt*E3SUB_SUB_misfolded_Ub6*Proteasome*cytosol;
end

function function_4_SUBProteasomeBindingUb7_1(E3SUB_SUB_misfolded_Ub7, Proteasome, cytosol, kbinProt)
  kbinProt*E3SUB_SUB_misfolded_Ub7*Proteasome*cytosol;
end

function function_4_SUBProteasomeBindingUb8_1(E3SUB_SUB_misfolded_Ub8, Proteasome, cytosol, kbinProt)
  kbinProt*E3SUB_SUB_misfolded_Ub8*Proteasome*cytosol;
end

function function_4_DeubiquitinationBoundSUB8_1(DUB, SUB_misfolded_Ub8_Proteasome, cytosol, kactDUBProt)
  kactDUBProt*SUB_misfolded_Ub8_Proteasome*DUB*cytosol;
end

function function_4_DeubiquitinationBoundSUB7_1(DUB, SUB_misfolded_Ub7_Proteasome, cytosol, kactDUBProt)
  kactDUBProt*SUB_misfolded_Ub7_Proteasome*DUB*cytosol;
end

function function_4_DeubiquitinationBoundSUB6_1(DUB, SUB_misfolded_Ub6_Proteasome, cytosol, kactDUBProt)
  kactDUBProt*SUB_misfolded_Ub6_Proteasome*DUB*cytosol;
end

function function_4_DeubiquitinationBoundSUB5_1(DUB, SUB_misfolded_Ub5_Proteasome, cytosol, kactDUBProt)
  kactDUBProt*SUB_misfolded_Ub5_Proteasome*DUB*cytosol;
end

function function_4_DeubiquitinationBoundSUB4_1(DUB, SUB_misfolded_Ub4_Proteasome, cytosol, kactDUBProt)
  kactDUBProt*SUB_misfolded_Ub4_Proteasome*DUB*cytosol;
end

function function_4_SUBDegradationUb4_1(ATP, SUB_misfolded_Ub4_Proteasome, cytosol, kactProt, kproteff)
  kactProt*SUB_misfolded_Ub4_Proteasome*kproteff*ATP*cytosol/(5000 + ATP*cytosol);
end

function function_4_SUBDegradationUb5_1(ATP, SUB_misfolded_Ub5_Proteasome, cytosol, kactProt, kproteff)
  kactProt*SUB_misfolded_Ub5_Proteasome*kproteff*ATP*cytosol/(5000 + ATP*cytosol);
end

function function_4_SUBDegradationUb6_1(ATP, SUB_misfolded_Ub6_Proteasome, cytosol, kactProt, kproteff)
  kactProt*SUB_misfolded_Ub6_Proteasome*kproteff*ATP*cytosol/(5000 + ATP*cytosol);
end

function function_4_SUBDegradationUb7_1(ATP, SUB_misfolded_Ub7_Proteasome, cytosol, kactProt, kproteff)
  kactProt*SUB_misfolded_Ub7_Proteasome*kproteff*ATP*cytosol/(5000 + ATP*cytosol);
end

function function_4_SUBDegradationUb8_1(ATP, SUB_misfolded_Ub8_Proteasome, cytosol, kactProt, kproteff)
  kactProt*SUB_misfolded_Ub8_Proteasome*kproteff*ATP*cytosol/(5000 + ATP*cytosol);
end

function function_4_asynProt20Sbinding_1(Proteasome, asyn, cytosol, kbinasynProt)
  kbinasynProt*asyn*Proteasome*cytosol;
end

function function_4_asynProt20Sdegradation_1(asyn_Proteasome, kdegasynProt, kproteff)
  kdegasynProt*kproteff*asyn_Proteasome;
end

function function_4_asynLamp2aBinding_1(Lamp2a, asyn, cytosol, kbinasynLamp2a)
  kbinasynLamp2a*asyn*Lamp2a*cytosol;
end

function function_4_asynDamage_1(ROS, asyn, cytosol, kdamasyn)
  kdamasyn*ROS*asyn*cytosol;
end

function function_4_asyn_damParkinBinding_1(Parkin, asyn_dam, cytosol, kbinasynParkin)
  kbinasynParkin*asyn_dam*Parkin*cytosol;
end

function function_4_AsynMonoubiquitination_1(E2_Ub, Parkin_asyn_dam, cytosol, kmonoUb)
  kmonoUb*E2_Ub*Parkin_asyn_dam*cytosol;
end

function function_4_AsynPolyubiquitination1_1(E2_Ub, Parkin_asyn_dam_Ub, cytosol, kpolyUb)
  kpolyUb*Parkin_asyn_dam_Ub*E2_Ub*cytosol;
end

function function_4_AsynPolyubiquitination2_1(E2_Ub, Parkin_asyn_dam_Ub2, cytosol, kpolyUb)
  kpolyUb*Parkin_asyn_dam_Ub2*E2_Ub*cytosol;
end

function function_4_AsynPolyubiquitination3_1(E2_Ub, Parkin_asyn_dam_Ub3, cytosol, kpolyUb)
  kpolyUb*Parkin_asyn_dam_Ub3*E2_Ub*cytosol;
end

function function_4_AsynPolyubiquitination4_1(E2_Ub, Parkin_asyn_dam_Ub4, cytosol, kpolyUb)
  kpolyUb*Parkin_asyn_dam_Ub4*E2_Ub*cytosol;
end

function function_4_AsynPolyubiquitination5_1(E2_Ub, Parkin_asyn_dam_Ub5, cytosol, kpolyUb)
  kpolyUb*Parkin_asyn_dam_Ub5*E2_Ub*cytosol;
end

function function_4_AsynPolyubiquitination6_1(E2_Ub, Parkin_asyn_dam_Ub6, cytosol, kpolyUb)
  kpolyUb*Parkin_asyn_dam_Ub6*E2_Ub*cytosol;
end

function function_4_AsynPolyubiquitination7_1(E2_Ub, Parkin_asyn_dam_Ub7, cytosol, kpolyUb)
  kpolyUb*Parkin_asyn_dam_Ub7*E2_Ub*cytosol;
end

function function_4_AsynDUBbindingUb8_1(DUB, Parkin_asyn_dam_Ub8, cytosol, kbinasynDUB)
  kbinasynDUB*Parkin_asyn_dam_Ub8*DUB*cytosol;
end

function function_4_AsynDUBbindingUb7_1(DUB, Parkin_asyn_dam_Ub7, cytosol, kbinasynDUB)
  kbinasynDUB*Parkin_asyn_dam_Ub7*DUB*cytosol;
end

function function_4_AsynDUBbindingUb6_1(DUB, Parkin_asyn_dam_Ub6, cytosol, kbinasynDUB)
  kbinasynDUB*Parkin_asyn_dam_Ub6*DUB*cytosol;
end

function function_4_AsynDUBbindingUb5_1(DUB, Parkin_asyn_dam_Ub5, cytosol, kbinasynDUB)
  kbinasynDUB*Parkin_asyn_dam_Ub5*DUB*cytosol;
end

function function_4_AsynDUBbindingUb4_1(DUB, Parkin_asyn_dam_Ub4, cytosol, kbinasynDUB)
  kbinasynDUB*Parkin_asyn_dam_Ub4*DUB*cytosol;
end

function function_4_AsynDUBbindingUb3_1(DUB, Parkin_asyn_dam_Ub3, cytosol, kbinasynDUB)
  kbinasynDUB*Parkin_asyn_dam_Ub3*DUB*cytosol;
end

function function_4_AsynDUBbindingUb2_1(DUB, Parkin_asyn_dam_Ub2, cytosol, kbinasynDUB)
  kbinasynDUB*Parkin_asyn_dam_Ub2*DUB*cytosol;
end

function function_4_AsynDUBbindingUb1_1(DUB, Parkin_asyn_dam_Ub, cytosol, kbinasynDUB)
  kbinasynDUB*Parkin_asyn_dam_Ub*DUB*cytosol;
end

function function_4_AsynProteasomeBindingUb4_1(Parkin_asyn_dam_Ub4, Proteasome, cytosol, kbinProt)
  kbinProt*Parkin_asyn_dam_Ub4*Proteasome*cytosol;
end

function function_4_AsynProteasomeBindingUb5_1(Parkin_asyn_dam_Ub5, Proteasome, cytosol, kbinProt)
  kbinProt*Parkin_asyn_dam_Ub5*Proteasome*cytosol;
end

function function_4_AsynProteasomeBindingUb6_1(Parkin_asyn_dam_Ub6, Proteasome, cytosol, kbinProt)
  kbinProt*Parkin_asyn_dam_Ub6*Proteasome*cytosol;
end

function function_4_AsynProteasomeBindingUb7_1(Parkin_asyn_dam_Ub7, Proteasome, cytosol, kbinProt)
  kbinProt*Parkin_asyn_dam_Ub7*Proteasome*cytosol;
end

function function_4_AsynProteasomeBindingUb8_1(Parkin_asyn_dam_Ub8, Proteasome, cytosol, kbinProt)
  kbinProt*Parkin_asyn_dam_Ub8*Proteasome*cytosol;
end

function function_4_DeubiquitinationBoundasyn_damUb8_1(DUB, asyn_dam_Ub8_Proteasome, cytosol, kactDUBProt)
  kactDUBProt*asyn_dam_Ub8_Proteasome*DUB*cytosol;
end

function function_4_DeubiquitinationBoundasynDamUb7_1(DUB, asyn_dam_Ub7_Proteasome, cytosol, kactDUBProt)
  kactDUBProt*asyn_dam_Ub7_Proteasome*DUB*cytosol;
end

function function_4_DeubiquitinationBoundasynDamUb6_1(DUB, asyn_dam_Ub6_Proteasome, cytosol, kactDUBProt)
  kactDUBProt*asyn_dam_Ub6_Proteasome*DUB*cytosol;
end

function function_4_DeubiquitinationBoundasynDamUb5_1(DUB, asyn_dam_Ub5_Proteasome, cytosol, kactDUBProt)
  kactDUBProt*asyn_dam_Ub5_Proteasome*DUB*cytosol;
end

function function_4_DeubiquitinationBoundasynDamUb4_1(DUB, asyn_dam_Ub4_Proteasome, cytosol, kactDUBProt)
  kactDUBProt*asyn_dam_Ub4_Proteasome*DUB*cytosol;
end

function function_4_AsynDegradationUb5_1(ATP, asyn_dam_Ub5_Proteasome, cytosol, kactProt, kproteff)
  kactProt*kproteff*asyn_dam_Ub5_Proteasome*ATP*cytosol/(5000 + ATP*cytosol);
end

function function_4_AsynProteasomeActivityUb4_1(ATP, asyn_dam_Ub4_Proteasome, cytosol, kactProt, kproteff)
  kactProt*kproteff*asyn_dam_Ub4_Proteasome*ATP*cytosol/(5000 + ATP*cytosol);
end

function function_4_AsynDegradationUb6_1(ATP, asyn_dam_Ub6_Proteasome, cytosol, kactProt, kproteff)
  kactProt*kproteff*asyn_dam_Ub6_Proteasome*ATP*cytosol/(5000 + ATP*cytosol);
end

function function_4_AsynDegradationUb7_1(ATP, asyn_dam_Ub7_Proteasome, cytosol, kactProt, kproteff)
  kactProt*kproteff*asyn_dam_Ub7_Proteasome*ATP*cytosol/(5000 + ATP*cytosol);
end

function function_4_AsynDegradationUb8_1(ATP, asyn_dam_Ub8_Proteasome, cytosol, kactProt, kproteff)
  kactProt*kproteff*asyn_dam_Ub8_Proteasome*ATP*cytosol/(5000 + ATP*cytosol);
end

function function_4_Aggregationasyn1_1(asyn, cytosol, kaggasyn1)
  kaggasyn1*asyn*(asyn*cytosol - 1)*0.5;
end

function function_4_Aggregationasyn2_1(AggA1, asyn, cytosol, kaggasyn2)
  kaggasyn2*asyn*AggA1*cytosol;
end

function function_4_Aggregationasyn3_1(AggA2, asyn, cytosol, kaggasyn2)
  kaggasyn2*asyn*AggA2*cytosol;
end

function function_4_Aggregationasyn4_1(AggA3, asyn, cytosol, kaggasyn2)
  kaggasyn2*asyn*AggA3*cytosol;
end

function function_4_Aggregationasyn5_1(AggA4, asyn, cytosol, kaggasyn2)
  kaggasyn2*asyn*AggA4*cytosol;
end

function function_4_AggA1ProteasomeInhibition_1(AggA1, Proteasome, cytosol, kbinAggProt)
  kbinAggProt*AggA1*Proteasome*cytosol;
end

function function_4_AggA2ProteasomeInhibition_1(AggA2, Proteasome, cytosol, kbinAggProt)
  kbinAggProt*AggA2*Proteasome*cytosol;
end

function function_4_AggA3ProteasomeInhibition_1(AggA3, Proteasome, cytosol, kbinAggProt)
  kbinAggProt*AggA3*Proteasome*cytosol;
end

function function_4_AggA4ProteasomeInhibition_1(AggA4, Proteasome, cytosol, kbinAggProt)
  kbinAggProt*AggA4*Proteasome*cytosol;
end

function function_4_AggA5ProteasomeInhibition_1(AggA5, Proteasome, cytosol, kbinAggProt)
  kbinAggProt*AggA5*Proteasome*cytosol;
end

function function_4_AsynInclusionFormation_1(AggA5, asyn, cytosol, kaggasyn2)
  kaggasyn2*asyn*AggA5*cytosol;
end

function function_4_AsynInclusionGrowth_1(SeqAggP, asyn, cytosol, kigrowth1)
  kigrowth1*SeqAggP*asyn*cytosol;
end

function function_4_AggregationAsynDam1_1(asyn_dam, cytosol, kagg1dam)
  kagg1dam*asyn_dam*(asyn_dam*cytosol - 1)*0.5;
end

function function_4_AggregationAsynDam2_1(AggD1, asyn_dam, cytosol, kagg2dam)
  kagg2dam*asyn_dam*AggD1*cytosol;
end

function function_4_AggregationAsynDam3_1(AggD2, asyn_dam, cytosol, kagg2dam)
  kagg2dam*asyn_dam*AggD2*cytosol;
end

function function_4_AggregationAsynDam4_1(AggD3, asyn_dam, cytosol, kagg2dam)
  kagg2dam*asyn_dam*AggD3*cytosol;
end

function function_4_AggregationAsynDam5_1(AggD4, asyn_dam, cytosol, kagg2dam)
  kagg2dam*asyn_dam*AggD4*cytosol;
end

function function_4_AggD1ProteasomeInhibition_1(AggD1, Proteasome, cytosol, kbinAggProt)
  kbinAggProt*AggD1*Proteasome*cytosol;
end

function function_4_AggD2ProteasomeInhibition_1(AggD2, Proteasome, cytosol, kbinAggProt)
  kbinAggProt*AggD2*Proteasome*cytosol;
end

function function_4_AggD3ProteasomeInhibition_1(AggD3, Proteasome, cytosol, kbinAggProt)
  kbinAggProt*AggD3*Proteasome*cytosol;
end

function function_4_AggD4ProteasomeInhibition_1(AggD4, Proteasome, cytosol, kbinAggProt)
  kbinAggProt*AggD4*Proteasome*cytosol;
end

function function_4_AggD5ProteasomeInhibition_1(AggD5, Proteasome, cytosol, kbinAggProt)
  kbinAggProt*AggD5*Proteasome*cytosol;
end

function function_4_AsynDamInclusionFormation_1(AggD5, asyn_dam, cytosol, kagg2dam)
  kagg2dam*asyn_dam*AggD5*cytosol;
end

function function_4_AsynDamInclusionGrowth1_1(SeqAggP, asyn_dam, cytosol, kigrowth1)
  kigrowth1*SeqAggP*asyn_dam*cytosol;
end

function function_4_AsynDamInclusionGrowth2_1(Parkin_asyn_dam, SeqAggP, cytosol, kigrowth2)
  kigrowth2*SeqAggP*Parkin_asyn_dam*cytosol;
end

function function_4_AsynDamInclusionGrowth3_1(Parkin_asyn_dam_Ub, SeqAggP, cytosol, kigrowth2)
  kigrowth2*SeqAggP*Parkin_asyn_dam_Ub*cytosol;
end

function function_4_AsynDamInclusionGrowth4_1(Parkin_asyn_dam_Ub2, SeqAggP, cytosol, kigrowth2)
  kigrowth2*SeqAggP*Parkin_asyn_dam_Ub2*cytosol;
end

function function_4_AsynDamInclusionGrowth5_1(Parkin_asyn_dam_Ub3, SeqAggP, cytosol, kigrowth2)
  kigrowth2*SeqAggP*Parkin_asyn_dam_Ub3*cytosol;
end

function function_4_AsynDamInclusionGrowth6_1(Parkin_asyn_dam_Ub4, SeqAggP, cytosol, kigrowth2)
  kigrowth2*SeqAggP*Parkin_asyn_dam_Ub4*cytosol;
end

function function_4_AsynDamInclusionGrowth7_1(Parkin_asyn_dam_Ub5, SeqAggP, cytosol, kigrowth2)
  kigrowth2*SeqAggP*Parkin_asyn_dam_Ub5*cytosol;
end

function function_4_AsynDamInclusionGrowth8_1(Parkin_asyn_dam_Ub6, SeqAggP, cytosol, kigrowth2)
  kigrowth2*SeqAggP*Parkin_asyn_dam_Ub6*cytosol;
end

function function_4_AsynDamInclusionGrowth9_1(Parkin_asyn_dam_Ub7, SeqAggP, cytosol, kigrowth2)
  kigrowth2*SeqAggP*Parkin_asyn_dam_Ub7*cytosol;
end

function function_4_AsynDamInclusionGrowth10_1(Parkin_asyn_dam_Ub8, SeqAggP, cytosol, kigrowth2)
  kigrowth2*SeqAggP*Parkin_asyn_dam_Ub8*cytosol;
end

function function_4_AsynDamInclusionGrowth11_1(Parkin_asyn_dam_Ub_DUB, SeqAggP, cytosol, kigrowth2)
  kigrowth2*SeqAggP*Parkin_asyn_dam_Ub_DUB*cytosol;
end

function function_4_AsynDamInclusionGrowth12_1(Parkin_asyn_dam_Ub2_DUB, SeqAggP, cytosol, kigrowth2)
  kigrowth2*SeqAggP*Parkin_asyn_dam_Ub2_DUB*cytosol;
end

function function_4_AsynDamInclusionGrowth13_1(Parkin_asyn_dam_Ub3_DUB, SeqAggP, cytosol, kigrowth2)
  kigrowth2*SeqAggP*Parkin_asyn_dam_Ub3_DUB*cytosol;
end

function function_4_AsynDamInclusionGrowth14_1(Parkin_asyn_dam_Ub4_DUB, SeqAggP, cytosol, kigrowth2)
  kigrowth2*SeqAggP*Parkin_asyn_dam_Ub4_DUB*cytosol;
end

function function_4_AsynDamInclusionGrowth15_1(Parkin_asyn_dam_Ub5_DUB, SeqAggP, cytosol, kigrowth2)
  kigrowth2*SeqAggP*Parkin_asyn_dam_Ub5_DUB*cytosol;
end

function function_4_AsynDamInclusionGrowth16_1(Parkin_asyn_dam_Ub6_DUB, SeqAggP, cytosol, kigrowth2)
  kigrowth2*SeqAggP*Parkin_asyn_dam_Ub6_DUB*cytosol;
end

function function_4_AsynDamInclusionGrowth17_1(Parkin_asyn_dam_Ub7_DUB, SeqAggP, cytosol, kigrowth2)
  kigrowth2*SeqAggP*Parkin_asyn_dam_Ub7_DUB*cytosol;
end

function function_4_AsynDamInclusionGrowth18_1(Parkin_asyn_dam_Ub8_DUB, SeqAggP, cytosol, kigrowth2)
  kigrowth2*SeqAggP*Parkin_asyn_dam_Ub8_DUB*cytosol;
end

function function_4_AggregationUCHL1Dam1_1(UCHL1_damaged, cytosol, kagg1dam)
  kagg1dam*UCHL1_damaged*(UCHL1_damaged*cytosol - 1)*0.5;
end

function function_4_AggregationUCHL1Dam2_1(AggU1, UCHL1_damaged, cytosol, kagg2dam)
  kagg2dam*UCHL1_damaged*AggU1*cytosol;
end

function function_4_AggregationUCHL1Dam3_1(AggU2, UCHL1_damaged, cytosol, kagg2dam)
  kagg2dam*UCHL1_damaged*AggU2*cytosol;
end

function function_4_AggregationUCHL1Dam4_1(AggU3, UCHL1_damaged, cytosol, kagg2dam)
  kagg2dam*UCHL1_damaged*AggU3*cytosol;
end

function function_4_AggregationUCHL1Dam5_1(AggU4, UCHL1_damaged, cytosol, kagg2dam)
  kagg2dam*UCHL1_damaged*AggU4*cytosol;
end

function function_4_AggU1ProteasomeInhibition_1(AggU1, Proteasome, cytosol, kbinAggProt)
  kbinAggProt*AggU1*Proteasome*cytosol;
end

function function_4_AggU2ProteasomeInhibition_1(AggU2, Proteasome, cytosol, kbinAggProt)
  kbinAggProt*AggU2*Proteasome*cytosol;
end

function function_4_AggU3ProteasomeInhibition_1(AggU3, Proteasome, cytosol, kbinAggProt)
  kbinAggProt*AggU3*Proteasome*cytosol;
end

function function_4_AggU4ProteasomeInhibition_1(AggU4, Proteasome, cytosol, kbinAggProt)
  kbinAggProt*AggU4*Proteasome*cytosol;
end

function function_4_AggU5ProteasomeInhibition_1(AggU5, Proteasome, cytosol, kbinAggProt)
  kbinAggProt*AggU5*Proteasome*cytosol;
end

function function_4_UCHL1DamInclusionFormation_1(AggU5, UCHL1_damaged, cytosol, kagg2dam)
  kagg2dam*UCHL1_damaged*AggU5*cytosol;
end

function function_4_UCHL1DamagedSequestering_1(SeqAggP, UCHL1_damaged, cytosol, kigrowth1)
  kigrowth1*SeqAggP*UCHL1_damaged*cytosol;
end

function function_4_UCHL1DamagedLamp2aSequestering_1(Lamp2a_UCHL1_damaged, SeqAggP, cytosol, kigrowth1)
  kigrowth1*SeqAggP*Lamp2a_UCHL1_damaged*cytosol;
end

function function_4_SUBAggregation1_1(SUB_misfolded, cytosol, kaggSUB1)
  kaggSUB1*SUB_misfolded*(SUB_misfolded*cytosol - 1)*0.5;
end

function function_4_SUBAggregation2_1(AggS1, SUB_misfolded, cytosol, kaggSUB2)
  kaggSUB2*SUB_misfolded*AggS1*cytosol;
end

function function_4_SUBAggregation3_1(AggS2, SUB_misfolded, cytosol, kaggSUB2)
  kaggSUB2*SUB_misfolded*AggS2*cytosol;
end

function function_4_SUBAggregation4_1(AggS3, SUB_misfolded, cytosol, kaggSUB2)
  kaggSUB2*SUB_misfolded*AggS3*cytosol;
end

function function_4_SUBAggregation5_1(AggS4, SUB_misfolded, cytosol, kaggSUB2)
  kaggSUB2*SUB_misfolded*AggS4*cytosol;
end

function function_4_AggS1ProteasomeInhibition_1(AggS1, Proteasome, cytosol, kbinAggProt)
  kbinAggProt*AggS1*Proteasome*cytosol;
end

function function_4_AggS2ProteasomeInhibition_1(AggS2, Proteasome, cytosol, kbinAggProt)
  kbinAggProt*AggS2*Proteasome*cytosol;
end

function function_4_AggS3ProteasomeInhibition_1(AggS3, Proteasome, cytosol, kbinAggProt)
  kbinAggProt*AggS3*Proteasome*cytosol;
end

function function_4_AggS4ProteasomeInhibition_1(AggS4, Proteasome, cytosol, kbinAggProt)
  kbinAggProt*AggS4*Proteasome*cytosol;
end

function function_4_AggS5ProteasomeInhibition_1(AggS5, Proteasome, cytosol, kbinAggProt)
  kbinAggProt*AggS5*Proteasome*cytosol;
end

function function_4_SUBInclusionFormation_1(AggS5, SUB_misfolded, cytosol, kaggSUB2)
  kaggSUB2*AggS5*SUB_misfolded*cytosol;
end

function function_4_SUBInclusionGrowth0_1(SUB_misfolded, SeqAggP, cytosol, kigrowth1)
  kigrowth1*SeqAggP*SUB_misfolded*cytosol;
end

function function_4_SUBInclusionGrowth1_1(E3SUB_SUB_misfolded, SeqAggP, cytosol, kigrowth2)
  kigrowth2*E3SUB_SUB_misfolded*SeqAggP*cytosol;
end

function function_4_SUBInclusionGrowth2_1(E3SUB_SUB_misfolded_Ub, SeqAggP, cytosol, kigrowth2)
  kigrowth2*E3SUB_SUB_misfolded_Ub*SeqAggP*cytosol;
end

function function_4_SUBInclusionGrowth3_1(E3SUB_SUB_misfolded_Ub2, SeqAggP, cytosol, kigrowth2)
  kigrowth2*E3SUB_SUB_misfolded_Ub2*SeqAggP*cytosol;
end

function function_4_SUBInclusionGrowth4_1(E3SUB_SUB_misfolded_Ub3, SeqAggP, cytosol, kigrowth2)
  kigrowth2*E3SUB_SUB_misfolded_Ub3*SeqAggP*cytosol;
end

function function_4_SUBInclusionGrowth5_1(E3SUB_SUB_misfolded_Ub4, SeqAggP, cytosol, kigrowth2)
  kigrowth2*E3SUB_SUB_misfolded_Ub4*SeqAggP*cytosol;
end

function function_4_SUBInclusionGrowth6_1(E3SUB_SUB_misfolded_Ub5, SeqAggP, cytosol, kigrowth2)
  kigrowth2*E3SUB_SUB_misfolded_Ub5*SeqAggP*cytosol;
end

function function_4_SUBInclusionGrowth7_1(E3SUB_SUB_misfolded_Ub6, SeqAggP, cytosol, kigrowth2)
  kigrowth2*E3SUB_SUB_misfolded_Ub6*SeqAggP*cytosol;
end

function function_4_SUBInclusionGrowth8_1(E3SUB_SUB_misfolded_Ub7, SeqAggP, cytosol, kigrowth2)
  kigrowth2*E3SUB_SUB_misfolded_Ub7*SeqAggP*cytosol;
end

function function_4_SUBInclusionGrowth9_1(E3SUB_SUB_misfolded_Ub8, SeqAggP, cytosol, kigrowth2)
  kigrowth2*E3SUB_SUB_misfolded_Ub8*SeqAggP*cytosol;
end

function function_4_SUBInclusionGrowth10_1(E3SUB_SUB_misfolded_Ub_UCHL1, SeqAggP, cytosol, kigrowth2)
  kigrowth2*E3SUB_SUB_misfolded_Ub_UCHL1*SeqAggP*cytosol;
end

function function_4_SUBInclusionGrowth11_1(E3SUB_SUB_misfolded_Ub2_UCHL1, SeqAggP, cytosol, kigrowth2)
  kigrowth2*E3SUB_SUB_misfolded_Ub2_UCHL1*SeqAggP*cytosol;
end

function function_4_SUBInclusionGrowth12_1(E3SUB_SUB_misfolded_Ub3_UCHL1, SeqAggP, cytosol, kigrowth2)
  kigrowth2*E3SUB_SUB_misfolded_Ub3_UCHL1*SeqAggP*cytosol;
end

function function_4_SUBInclusionGrowth13_1(E3SUB_SUB_misfolded_Ub4_UCHL1, SeqAggP, cytosol, kigrowth2)
  kigrowth2*E3SUB_SUB_misfolded_Ub4_UCHL1*SeqAggP*cytosol;
end

function function_4_SUBInclusionGrowth14_1(E3SUB_SUB_misfolded_Ub5_UCHL1, SeqAggP, cytosol, kigrowth2)
  kigrowth2*E3SUB_SUB_misfolded_Ub5_UCHL1*SeqAggP*cytosol;
end

function function_4_SUBInclusionGrowth15_1(E3SUB_SUB_misfolded_Ub6_UCHL1, SeqAggP, cytosol, kigrowth2)
  kigrowth2*E3SUB_SUB_misfolded_Ub6_UCHL1*SeqAggP*cytosol;
end

function function_4_SUBInclusionGrowth16_1(E3SUB_SUB_misfolded_Ub7_UCHL1, SeqAggP, cytosol, kigrowth2)
  kigrowth2*E3SUB_SUB_misfolded_Ub7_UCHL1*SeqAggP*cytosol;
end

function function_4_SUBInclusionGrowth17_1(E3SUB_SUB_misfolded_Ub8_UCHL1, SeqAggP, cytosol, kigrowth2)
  kigrowth2*E3SUB_SUB_misfolded_Ub8_UCHL1*SeqAggP*cytosol;
end

model Model_1()
  // NoName
  // This a model from the article:
  // Modelling the Role of UCH-L1 on Protein Aggregation in Age-Related Neurodegeneration.
  // Proctor CJ, Tangeman PJ, Ardley HC. PLoS One.2010 Oct 6;5(10):e13175 20949132,
  // Abstract:
  // Overexpression of the de-ubiquitinating enzyme UCH-L1 leads to inclusion formation in response to proteasome impairment. These inclusions contain components of the ubiquitin-proteasome system and α-synuclein confirming that the ubiquitin-proteasome system plays an important role in protein aggregation. The processes involved are very complex and so we have chosen to take a systems biology approach to examine the system whereby we combine mathematical modelling with experiments in an iterative process. The experiments show that cells are very heterogeneous with respect to inclusion formation and so we use stochastic simulation. The model shows that the variability is partly due to stochastic effects but also depends on protein expression levels of UCH-L1 within cells. The model also indicates that the aggregation process can start even before any proteasome inhibition is present, but that proteasome inhibition greatly accelerates aggregation progression. This leads to less efficient protein degradation and hence more aggregation suggesting that there is a vicious cycle. However, proteasome inhibition may not necessarily be the initiating event. Our combined modelling and experimental approach show that stochastic effects play an important role in the aggregation process and could explain the variability in the age of disease onset. Furthermore, our model provides a valuable tool, as it can be easily modified and extended to incorporate new experimental data, test hypotheses and make testable predictions.
  // This model originates from BioModels Database: A Database of Annotated Published Models (http://www.ebi.ac.uk/biomodels/). It is copyright (c) 2005-2011 The BioModels.net Team.
  // For more information see the terms of use.
  // To cite BioModels Database, please use: Li C, Donizelli M, Rodriguez N, Dharuri H, Endler L, Chelliah V, Li L, He E, Henry A, Stefan MI, Snoep JL, Hucka M, Le Novère N, Laibe C (2010) BioModels Database: An enhanced, curated and annotated resource for published quantitative kinetic models. BMC Syst Biol., 4:92.

  // Compartments:
  compartment cytosol = 1;

  // Species:
  species NatP in cytosol = 6000;  // isVersionOf CHEBI:36080
  species MisP in cytosol = 80;  // isVersionOf CHEBI:36080
  species Ub in cytosol = 1500;  // isVersionOf uniprot:P62988
  species E1 in cytosol = 105;  // isVersionOf interpro:IPR000011
  species E2 in cytosol = 50;  // isVersionOf interpro:IPR000608
  species E3 in cytosol = 300;  // isVersionOf interpro:IPR000569
  species E3_MisP in cytosol = 2;  // hasPart CHEBI:36080; hasPart interpro:IPR000569
  species DUB in cytosol = 160;  // isVersionOf interpro:IPR001394
  species Proteasome in cytosol = 1500;  // isVersionOf GO:0000502
  species ROS in cytosol = 10;  // isVersionOf CHEBI:26523
  species E1_Ub in cytosol = 795;  // hasPart interpro:IPR000011; hasPart uniprot:P62988
  species E2_Ub in cytosol = 950;  // hasPart interpro:IPR000608; hasPart uniprot:P62988
  species E3_MisP_Ub in cytosol = 0;  // hasPart CHEBI:36080; hasPart interpro:IPR000569 uniprot:P62988
  species E3_MisP_Ub2 in cytosol = 0;  // hasPart CHEBI:36080; hasPart uniprot:P62988 interpro:IPR000569
  species E3_MisP_Ub3 in cytosol = 0;  // hasPart uniprot:P62988; hasPart interpro:IPR000569 CHEBI:36080
  species E3_MisP_Ub4 in cytosol = 0;  // hasPart CHEBI:36080; hasPart interpro:IPR000569 uniprot:P62988
  species E3_MisP_Ub5 in cytosol = 0;  // hasPart CHEBI:36080; hasPart interpro:IPR000569 uniprot:P62988
  species E3_MisP_Ub6 in cytosol = 0;  // hasPart interpro:IPR000569; hasPart CHEBI:36080 uniprot:P62988
  species E3_MisP_Ub7 in cytosol = 0;  // hasPart interpro:IPR000569; hasPart CHEBI:36080 uniprot:P62988
  species E3_MisP_Ub8 in cytosol = 300;  // hasPart uniprot:P62988; hasPart interpro:IPR000569 CHEBI:36080
  species MisP_Ub4_Proteasome in cytosol = 0;  // CHEBI:36080; uniprot:P62988
  species MisP_Ub5_Proteasome in cytosol = 1;  // hasPart uniprot:P62988; hasPart CHEBI:36080 GO:0000502
  species MisP_Ub6_Proteasome in cytosol = 2;  // hasPart uniprot:P62988; hasPart GO:0000502 CHEBI:36080
  species MisP_Ub7_Proteasome in cytosol = 10;  // hasPart GO:0000502; hasPart CHEBI:36080 uniprot:P62988
  species MisP_Ub8_Proteasome in cytosol = 350;  // hasPart uniprot:P62988; hasPart CHEBI:36080 GO:0000502
  species E3_MisP_Ub_DUB in cytosol = 100;  // hasPart CHEBI:36080; hasPart interpro:IPR000569 interpro:IPR001394 uniprot:P62988
  species E3_MisP_Ub2_DUB in cytosol = 100;  // hasPart uniprot:P62988; hasPart CHEBI:36080 interpro:IPR001394 interpro:IPR000569
  species E3_MisP_Ub3_DUB in cytosol = 100;  // hasPart interpro:IPR001394; hasPart uniprot:P62988 interpro:IPR000569 CHEBI:36080
  species E3_MisP_Ub4_DUB in cytosol = 100;  // hasPart uniprot:P62988; hasPart CHEBI:36080 interpro:IPR000569 interpro:IPR001394
  species E3_MisP_Ub5_DUB in cytosol = 100;  // hasPart interpro:IPR000569; hasPart CHEBI:36080 uniprot:P62988 interpro:IPR001394
  species E3_MisP_Ub6_DUB in cytosol = 100;  // hasPart interpro:IPR001394; hasPart interpro:IPR000569 CHEBI:36080 uniprot:P62988
  species E3_MisP_Ub7_DUB in cytosol = 100;  // hasPart interpro:IPR001394; hasPart uniprot:P62988 interpro:IPR000569 CHEBI:36080
  species E3_MisP_Ub8_DUB in cytosol = 100;  // hasPart interpro:IPR000569; hasPart uniprot:P62988 interpro:IPR001394 CHEBI:36080
  species AggP1 in cytosol = 0;
  species AggP2 in cytosol = 0;
  species AggP3 in cytosol = 0;
  species AggP4 in cytosol = 0;
  species AggP5 in cytosol = 0;
  species SeqAggP in cytosol = 0;
  species AggP_Proteasome in cytosol = 0;  // hasPart GO:0000502
  species $ATP in cytosol = 10000;  // isVersionOf CHEBI:15422
  species $ADP in cytosol = 1000;  // isVersionOf CHEBI:16761
  species $AMP in cytosol = 1000;  // isVersionOf CHEBI:16027
  species UCHL1 in cytosol = 5785;  // isVersionOf uniprot:P09936
  species UCHL1_Proteasome in cytosol = 10;  // hasPart GO:0000502; hasPart uniprot:P09936
  species UCHL1_damaged_Proteasome in cytosol = 0;  // hasPart uniprot:P09936; hasPart GO:0000502
  species Lysosome in cytosol = 1200;  // isVersionOf GO:0005764
  species UCHL1_damaged in cytosol = 0;  // isVersionOf uniprot:P09936
  species Lamp2a in cytosol = 200;  // isVersionOf uniprot:P13473
  species Lamp2a_UCHL1_damaged in cytosol = 0;  // isVersionOf uniprot:P13473; isVersionOf uniprot:P09936
  species Ub_UCHL1 in cytosol = 500;  // hasPart uniprot:P09936; hasPart uniprot:P62988
  species SUB in cytosol = 815;
  species SUB_misfolded in cytosol = 5;
  species E3SUB in cytosol = 160;  // isVersionOf interpro:IPR000569
  species E3SUB_SUB_misfolded in cytosol = 5;  // isVersionOf interpro:IPR000569
  species E3SUB_SUB_misfolded_Ub in cytosol = 0;  // hasPart uniprot:P62988; hasPart interpro:IPR000569
  species E3SUB_SUB_misfolded_Ub2 in cytosol = 0;  // hasPart uniprot:P62988; hasPart interpro:IPR000569
  species E3SUB_SUB_misfolded_Ub3 in cytosol = 0;  // hasPart interpro:IPR000569; hasPart uniprot:P62988
  species E3SUB_SUB_misfolded_Ub4 in cytosol = 0;  // hasPart interpro:IPR000569; hasPart uniprot:P62988
  species E3SUB_SUB_misfolded_Ub5 in cytosol = 0;  // hasPart uniprot:P62988; hasPart interpro:IPR000569
  species E3SUB_SUB_misfolded_Ub6 in cytosol = 0;  // interpro:IPR000569; uniprot:P62988
  species E3SUB_SUB_misfolded_Ub7 in cytosol = 0;  // hasPart interpro:IPR000569; hasPart uniprot:P62988
  species E3SUB_SUB_misfolded_Ub8 in cytosol = 15;  // hasPart uniprot:P62988; hasPart interpro:IPR000569
  species E3SUB_SUB_misfolded_Ub_UCHL1 in cytosol = 20;  // hasPart uniprot:P09936; hasPart uniprot:P62988 interpro:IPR000569
  species E3SUB_SUB_misfolded_Ub2_UCHL1 in cytosol = 20;  // hasPart uniprot:P62988; hasPart uniprot:P09936 interpro:IPR000569
  species E3SUB_SUB_misfolded_Ub3_UCHL1 in cytosol = 25;  // hasPart uniprot:P09936; hasPart uniprot:P62988 interpro:IPR000569
  species E3SUB_SUB_misfolded_Ub4_UCHL1 in cytosol = 25;  // hasPart interpro:IPR000569; hasPart uniprot:P62988 uniprot:P09936
  species E3SUB_SUB_misfolded_Ub5_UCHL1 in cytosol = 30;  // hasPart uniprot:P09936; hasPart interpro:IPR000569 uniprot:P62988
  species E3SUB_SUB_misfolded_Ub6_UCHL1 in cytosol = 30;  // hasPart uniprot:P09936; hasPart interpro:IPR000569 uniprot:P62988
  species E3SUB_SUB_misfolded_Ub7_UCHL1 in cytosol = 40;  // hasPart interpro:IPR000569; hasPart uniprot:P62988 uniprot:P09936
  species E3SUB_SUB_misfolded_Ub8_UCHL1 in cytosol = 40;  // hasPart uniprot:P62988; hasPart uniprot:P09936 interpro:IPR000569
  species SUB_misfolded_Ub4_Proteasome in cytosol = 0;  // hasPart uniprot:P62988; hasPart GO:0000502
  species SUB_misfolded_Ub5_Proteasome in cytosol = 0;  // hasPart GO:0000502; hasPart uniprot:P62988
  species SUB_misfolded_Ub6_Proteasome in cytosol = 0;  // hasPart uniprot:P62988; hasPart GO:0000502
  species SUB_misfolded_Ub7_Proteasome in cytosol = 5;  // hasPart uniprot:P62988; hasPart GO:0000502
  species SUB_misfolded_Ub8_Proteasome in cytosol = 20;  // hasPart uniprot:P62988; hasPart GO:0000502
  species asyn in cytosol = 3000;  // isVersionOf uniprot:P37840
  species asyn_Proteasome in cytosol = 0;  // hasPart GO:0000502; hasPart uniprot:P37840
  species asyn_Lamp2a in cytosol = 0;  // hasPart uniprot:P13473; hasPart uniprot:P37840
  species asyn_dam in cytosol = 0;  // isVersionOf uniprot:P37840
  species Parkin in cytosol = 4800;  // isVersionOf uniprot:O60260
  species Parkin_asyn_dam in cytosol = 0;  // hasPart uniprot:O60260; hasPart uniprot:P37840
  species Parkin_asyn_dam_Ub in cytosol = 0;  // hasPart uniprot:P37840; hasPart uniprot:P62988 uniprot:O60260
  species Parkin_asyn_dam_Ub2 in cytosol = 0;  // hasPart uniprot:O60260; hasPart uniprot:P37840 uniprot:P62988
  species Parkin_asyn_dam_Ub3 in cytosol = 0;  // hasPart uniprot:O60260; hasPart uniprot:P37840 uniprot:P62988
  species Parkin_asyn_dam_Ub4 in cytosol = 0;  // hasPart uniprot:P62988; hasPart uniprot:O60260 uniprot:P37840
  species Parkin_asyn_dam_Ub5 in cytosol = 0;  // hasPart uniprot:P62988; hasPart uniprot:P37840 uniprot:O60260
  species Parkin_asyn_dam_Ub6 in cytosol = 0;  // hasPart uniprot:P62988; hasPart uniprot:P37840 uniprot:O60260
  species Parkin_asyn_dam_Ub7 in cytosol = 0;  // hasPart uniprot:O60260; hasPart uniprot:P62988 uniprot:P37840
  species Parkin_asyn_dam_Ub8 in cytosol = 0;  // hasPart uniprot:P62988; hasPart uniprot:P37840 uniprot:O60260
  species Parkin_asyn_dam_Ub_DUB in cytosol = 0;  // hasPart uniprot:P37840; hasPart uniprot:P62988 uniprot:O60260
  species Parkin_asyn_dam_Ub2_DUB in cytosol = 0;  // hasPart uniprot:P62988; hasPart uniprot:P37840 uniprot:O60260
  species Parkin_asyn_dam_Ub3_DUB in cytosol = 0;  // hasPart uniprot:P62988; hasPart uniprot:P37840 uniprot:O60260
  species Parkin_asyn_dam_Ub4_DUB in cytosol = 0;  // hasPart uniprot:P37840; hasPart uniprot:P62988 uniprot:O60260
  species Parkin_asyn_dam_Ub5_DUB in cytosol = 0;  // hasPart uniprot:P62988; hasPart uniprot:P37840 uniprot:O60260
  species Parkin_asyn_dam_Ub6_DUB in cytosol = 0;  // hasPart uniprot:P37840; hasPart uniprot:P62988 uniprot:O60260
  species Parkin_asyn_dam_Ub7_DUB in cytosol = 0;  // hasPart uniprot:P62988; hasPart uniprot:P37840 uniprot:O60260
  species Parkin_asyn_dam_Ub8_DUB in cytosol = 0;  // hasPart uniprot:P37840; hasPart uniprot:P62988 uniprot:O60260
  species asyn_dam_Ub4_Proteasome in cytosol = 0;  // hasPart uniprot:P62988; hasPart uniprot:P37840 GO:0000502
  species asyn_dam_Ub5_Proteasome in cytosol = 0;  // hasPart uniprot:P62988; hasPart uniprot:P37840 GO:0000502
  species asyn_dam_Ub6_Proteasome in cytosol = 0;  // hasPart uniprot:P37840; hasPart uniprot:P62988 GO:0000502
  species asyn_dam_Ub7_Proteasome in cytosol = 0;  // hasPart uniprot:P37840; hasPart uniprot:P62988 GO:0000502
  species asyn_dam_Ub8_Proteasome in cytosol = 0;  // hasPart uniprot:P37840; hasPart uniprot:P62988 GO:0000502
  species AggA1 in cytosol = 0;  // isVersionOf uniprot:P37840
  species AggA2 in cytosol = 0;  // isVersionOf uniprot:P37840
  species AggA3 in cytosol = 0;  // isVersionOf uniprot:P37840
  species AggA4 in cytosol = 0;  // isVersionOf uniprot:P37840
  species AggA5 in cytosol = 0;  // isVersionOf uniprot:P37840
  species AggD1 in cytosol = 0;  // isVersionOf uniprot:P37840
  species AggD2 in cytosol = 0;  // isVersionOf uniprot:P37840
  species AggD3 in cytosol = 0;  // isVersionOf uniprot:P37840
  species AggD4 in cytosol = 0;  // isVersionOf uniprot:P37840
  species AggD5 in cytosol = 0;  // isVersionOf uniprot:P37840
  species AggU1 in cytosol = 0;  // isVersionOf uniprot:P09936
  species AggU2 in cytosol = 0;  // isVersionOf uniprot:P09936
  species AggU3 in cytosol = 0;  // isVersionOf uniprot:P09936
  species AggU4 in cytosol = 0;  // isVersionOf uniprot:P09936
  species AggU5 in cytosol = 0;  // isPartOf uniprot:P09936
  species AggS1 in cytosol = 0;
  species AggS2 in cytosol = 0;
  species AggS3 in cytosol = 0;
  species AggS4 in cytosol = 0;
  species AggS5 in cytosol = 0;
  species $Source in cytosol = 1;
  species $Sink in cytosol = 1;
  species aggasyn in cytosol = 0;  // isVersionOf uniprot:P37840
  species aggasyndam in cytosol = 0;  // isVersionOf uniprot:P37840
  species aggParkin in cytosol = 0;  // isVersionOf uniprot:O60260
  species aggUb in cytosol = 0;  // isVersionOf uniprot:P62988
  species aggE3 in cytosol = 0;  // isVersionOf interpro:IPR000569
  species aggDUB in cytosol = 0;  // isVersionOf interpro:IPR001394
  species aggMisP in cytosol = 0;
  species aggUchl1 in cytosol = 0;  // isVersionOf uniprot:P09936
  species aggUchl1dam in cytosol = 0;  // isVersionOf uniprot:P09936
  species aggSUB in cytosol = 0;
  species upregUb in cytosol = 0;  // isVersionOf uniprot:P62988

  // Parameters:
  ksynNatP = 2.4;
  kmisfold = 4e-5;
  krefold = 8e-5;
  kbinMisPE3 = 0.0001;
  krelMisPE3 = 0.0002;
  kbinE1Ub = 0.0002;
  kbinE2Ub = 0.001;
  kmonoUb = 0.001;
  kpolyUb = 0.01;
  kactDUB = 0.0001;
  kbinProt = 5e-6;
  kactDUBProt = 1e-6;
  kactProt = 0.01;
  kagg1 = 1e-12;
  kagg2 = 1e-10;
  kdisagg1 = 1e-8;
  kdisagg2 = 8e-9;
  kdisagg3 = 6e-9;
  kdisagg4 = 4e-9;
  kdisagg5 = 2e-9;
  kigrowth1 = 5e-9;
  kigrowth2 = 5e-9;
  kbinAggProt = 5e-9;
  kbinMisPDUB = 2e-7;
  kgenROS = 0.01;
  kremROS = 0.001;
  kubs = 0.009;
  kubd = 4.4e-9;
  kubss = 0.1;
  ksynUCHL1 = 0.022;
  kbinUCHL1Prot = 4e-10;
  kdegProtUCHL1 = 0.01;
  kdegLysUCHL1 = 2.7e-9;
  kdamUCHL1 = 1e-8;
  kbinLamp2aUCHL1dam = 1e-5;
  krelLamp2aUCHL1dam = 5e-5;
  kdegLysUCHL1dam = 2.7e-9;
  kbinUbUCHL1 = 3e-6;
  krelUbUCHL1 = 0.05;
  kactUchl1 = 0.0001;
  kbinSUBUCHL1 = 4e-8;
  ksynSUB = 0.13;
  kmisfoldSUB = 2e-5;
  krefoldSUB = 5e-5;
  kbinE3SUB = 0.0005;
  krelE3SUB = 0.0002;
  ksynasyn = 0.028;
  kbinasynProt = 1.7e-9;
  kdegasynProt = 0.01;
  kbinasynLamp2a = 4e-8;
  kCMAasyn = 0.001;
  kdamasyn = 5e-8;
  kbinasynDUB = 2e-7;
  kbinasynParkin = 0.0001;
  krelasynParkin = 0.0002;
  kaggasyn1 = 5e-12;
  kaggasyn2 = 5e-10;
  kdisaggasyn1 = 1e-8;
  kdisaggasyn2 = 8e-9;
  kdisaggasyn3 = 6e-9;
  kdisaggasyn4 = 4e-9;
  kdisaggasyn5 = 2e-9;
  kgenROSAggP = 2e-5;
  kagg1dam = 1e-5;
  kagg2dam = 0.005;
  kdisaggasyndam1 = 1e-8;
  kdisaggasyndam2 = 8e-9;
  kdisaggasyndam3 = 6e-9;
  kdisaggasyndam4 = 4e-9;
  kdisaggasyndam5 = 2e-9;
  kdisagguchl1dam1 = 1e-8;
  kdisagguchl1dam2 = 8e-9;
  kdisagguchl1dam3 = 6e-9;
  kdisagguchl1dam4 = 4e-9;
  kdisagguchl1dam5 = 2e-9;
  kaggSUB1 = 1e-12;
  kaggSUB2 = 1e-10;
  kdisaggSUB1 = 1e-8;
  kdisaggSUB2 = 8e-9;
  kdisaggSUB3 = 6e-9;
  kdisaggSUB4 = 4e-9;
  kdisaggSUB5 = 2e-9;
  kproteff = 1;

  // Assignment rules:
  UCHL1_substrate := E3SUB_SUB_misfolded_Ub_UCHL1*cytosol + E3SUB_SUB_misfolded_Ub2_UCHL1*cytosol + E3SUB_SUB_misfolded_Ub3_UCHL1*cytosol + E3SUB_SUB_misfolded_Ub4_UCHL1*cytosol + E3SUB_SUB_misfolded_Ub5_UCHL1*cytosol + E3SUB_SUB_misfolded_Ub6_UCHL1*cytosol + E3SUB_SUB_misfolded_Ub7_UCHL1*cytosol + E3SUB_SUB_misfolded_Ub8_UCHL1*cytosol + Lamp2a_UCHL1_damaged*cytosol + Ub_UCHL1*cytosol + UCHL1_damaged*cytosol + UCHL1_damaged_Proteasome*cytosol + UCHL1_Proteasome*cytosol;
  Tot_UCHL1 := UCHL1*cytosol + UCHL1_substrate;
  Tot_asyn := asyn*cytosol + asyn_Lamp2a*cytosol + asyn_Proteasome*cytosol;
  Tot_asyn_dam := asyn_dam*cytosol + asyn_dam_Ub4_Proteasome*cytosol + asyn_dam_Ub5_Proteasome*cytosol + asyn_dam_Ub6_Proteasome*cytosol + asyn_dam_Ub7_Proteasome*cytosol + asyn_dam_Ub8_Proteasome*cytosol + asyn_dam_Ub4_Proteasome*cytosol + Parkin_asyn_dam*cytosol + Parkin_asyn_dam_Ub*cytosol + Parkin_asyn_dam_Ub_DUB*cytosol + Parkin_asyn_dam_Ub2*cytosol + Parkin_asyn_dam_Ub2_DUB*cytosol + Parkin_asyn_dam_Ub3*cytosol + Parkin_asyn_dam_Ub3_DUB*cytosol + Parkin_asyn_dam_Ub4*cytosol + Parkin_asyn_dam_Ub4_DUB*cytosol + Parkin_asyn_dam_Ub5*cytosol + Parkin_asyn_dam_Ub5_DUB*cytosol + Parkin_asyn_dam_Ub6*cytosol + Parkin_asyn_dam_Ub6_DUB*cytosol + Parkin_asyn_dam_Ub7*cytosol + Parkin_asyn_dam_Ub7_DUB*cytosol + Parkin_asyn_dam_Ub8*cytosol + Parkin_asyn_dam_Ub8_DUB*cytosol;
  AggP := AggA1*cytosol + AggA2*cytosol + AggA3*cytosol + AggA4*cytosol + AggA5*cytosol + aggasyn*cytosol + aggasyndam*cytosol + AggD1*cytosol + AggD2*cytosol + AggD3*cytosol + AggD4*cytosol + AggD5*cytosol + aggDUB*cytosol + aggE3*cytosol + aggMisP*cytosol + AggP1*cytosol + AggP2*cytosol + AggP3*cytosol + AggP4*cytosol + AggP5*cytosol + aggParkin*cytosol + AggS1*cytosol + AggS2*cytosol + AggS3*cytosol + AggS4*cytosol + AggS5*cytosol + aggSUB*cytosol + AggU1*cytosol + AggU2*cytosol + AggU3*cytosol + AggU4*cytosol + AggU5*cytosol + aggUb*cytosol + aggUchl1*cytosol + aggUchl1dam*cytosol;
  Ub_Conjugates := aggUb*cytosol + 4*asyn_dam_Ub4_Proteasome*cytosol + 5*asyn_dam_Ub5_Proteasome*cytosol + 6*asyn_dam_Ub6_Proteasome*cytosol + 7*asyn_dam_Ub7_Proteasome*cytosol + 8*asyn_dam_Ub8_Proteasome*cytosol + E1_Ub*cytosol + E2_Ub*cytosol + E3_MisP_Ub*cytosol + E3_MisP_Ub_DUB*cytosol + 2*E3_MisP_Ub2*cytosol + 2*E3_MisP_Ub2_DUB*cytosol + 3*E3_MisP_Ub3*cytosol + 3*E3_MisP_Ub3_DUB*cytosol + 4*E3_MisP_Ub4*cytosol + 4*E3_MisP_Ub4_DUB*cytosol + 5*E3_MisP_Ub5*cytosol + 5*E3_MisP_Ub5_DUB*cytosol + 6*E3_MisP_Ub6*cytosol + 6*E3_MisP_Ub6_DUB*cytosol + 7*E3_MisP_Ub7*cytosol + 7*E3_MisP_Ub7_DUB*cytosol + 8*E3_MisP_Ub8*cytosol + 8*E3_MisP_Ub8_DUB*cytosol + E3SUB_SUB_misfolded_Ub*cytosol + E3SUB_SUB_misfolded_Ub_UCHL1*cytosol + 2*E3SUB_SUB_misfolded_Ub2*cytosol + 2*E3SUB_SUB_misfolded_Ub2_UCHL1*cytosol + 3*E3SUB_SUB_misfolded_Ub3*cytosol + 3*E3SUB_SUB_misfolded_Ub3_UCHL1*cytosol + 4*E3SUB_SUB_misfolded_Ub4*cytosol + 4*E3SUB_SUB_misfolded_Ub4_UCHL1*cytosol + 5*E3SUB_SUB_misfolded_Ub5*cytosol + 5*E3SUB_SUB_misfolded_Ub5_UCHL1*cytosol + 6*E3SUB_SUB_misfolded_Ub6*cytosol + 6*E3SUB_SUB_misfolded_Ub6_UCHL1*cytosol + 7*E3SUB_SUB_misfolded_Ub7*cytosol + 7*E3SUB_SUB_misfolded_Ub7_UCHL1*cytosol + 8*E3SUB_SUB_misfolded_Ub8*cytosol + 8*E3SUB_SUB_misfolded_Ub8_UCHL1*cytosol + E3SUB_SUB_misfolded_Ub_UCHL1*cytosol + 4*MisP_Ub4_Proteasome*cytosol + 5*MisP_Ub5_Proteasome*cytosol + 6*MisP_Ub6_Proteasome*cytosol + 7*MisP_Ub7_Proteasome*cytosol + 8*MisP_Ub8_Proteasome*cytosol + Parkin_asyn_dam_Ub*cytosol + Parkin_asyn_dam_Ub_DUB*cytosol + 2*Parkin_asyn_dam_Ub2*cytosol + 2*Parkin_asyn_dam_Ub2_DUB*cytosol + 3*Parkin_asyn_dam_Ub3*cytosol + 3*Parkin_asyn_dam_Ub3_DUB*cytosol + 4*Parkin_asyn_dam_Ub4*cytosol + 4*Parkin_asyn_dam_Ub4_DUB*cytosol + 5*Parkin_asyn_dam_Ub5*cytosol + 5*Parkin_asyn_dam_Ub5_DUB*cytosol + 6*Parkin_asyn_dam_Ub6*cytosol + 6*Parkin_asyn_dam_Ub6_DUB*cytosol + 7*Parkin_asyn_dam_Ub7*cytosol + 7*Parkin_asyn_dam_Ub7_DUB*cytosol + 8*Parkin_asyn_dam_Ub8*cytosol + 8*Parkin_asyn_dam_Ub8_DUB*cytosol + 4*SUB_misfolded_Ub4_Proteasome*cytosol + 5*SUB_misfolded_Ub5_Proteasome*cytosol + 6*SUB_misfolded_Ub6_Proteasome*cytosol + 7*SUB_misfolded_Ub7_Proteasome*cytosol + 8*SUB_misfolded_Ub8_Proteasome*cytosol + Ub_UCHL1*cytosol + upregUb*cytosol;
  Tot_Ub := Ub_Conjugates + Ub*cytosol;
  Tot_MisP := E3_MisP*cytosol + E3_MisP_Ub*cytosol + E3_MisP_Ub_DUB*cytosol + E3_MisP_Ub2*cytosol + E3_MisP_Ub2_DUB*cytosol + E3_MisP_Ub3*cytosol + E3_MisP_Ub3_DUB*cytosol + E3_MisP_Ub4*cytosol + E3_MisP_Ub4_DUB*cytosol + E3_MisP_Ub5*cytosol + E3_MisP_Ub5_DUB*cytosol + E3_MisP_Ub6*cytosol + E3_MisP_Ub6_DUB*cytosol + E3_MisP_Ub7*cytosol + E3_MisP_Ub7_DUB*cytosol + E3_MisP_Ub8*cytosol + E3_MisP_Ub8_DUB*cytosol + MisP*cytosol + MisP_Ub4_Proteasome*cytosol + MisP_Ub5_Proteasome*cytosol + MisP_Ub6_Proteasome*cytosol + MisP_Ub7_Proteasome*cytosol + MisP_Ub8_Proteasome*cytosol;
  Tot_Protein := Tot_MisP + NatP*cytosol;
  // Reactions:
  UbSynthesis: $Source => Ub; cytosol*UbSynthesis_k1*Source;
    UbSynthesis_k1 = 0.009;
  UbDegradation: Ub + Proteasome => Proteasome; cytosol*function_4_UbDegradation_1(Proteasome, Ub, cytosol, UbDegradation_kproteff, UbDegradation_kubd);
    UbDegradation_kproteff = 1; UbDegradation_kubd = 4.4e-9;
  UbUpregulation: MisP => MisP + 3 Ub + 3 upregUb; cytosol*function_4_UbUpregulation_1(MisP, cytosol, UbUpregulation_kubss);
    UbUpregulation_kubss = 0.1;
  ProteinSynthesis: $Source => NatP; cytosol*ProteinSynthesis_k1*Source;
    ProteinSynthesis_k1 = 2.4;
  Misfolding: NatP + ROS => MisP + ROS; cytosol*function_4_Misfolding_1(NatP, ROS, cytosol, Misfolding_kmisfold);
    Misfolding_kmisfold = 4e-5;
  Refolding: MisP => NatP; cytosol*Refolding_k1*MisP;
    Refolding_k1 = 8e-5;
  MisPE3Binding: MisP + E3 => E3_MisP; cytosol*function_4_MisPE3Binding_1(E3, MisP, cytosol, MisPE3Binding_kbinMisPE3);
    MisPE3Binding_kbinMisPE3 = 0.0001;
  MisPE3Release: E3_MisP => MisP + E3; cytosol*MisPE3Release_k1*E3_MisP;
    MisPE3Release_k1 = 0.0002;
  E1UbBinding: E1 + Ub + $ATP => E1_Ub + $AMP; cytosol*function_4_E1UbBinding_1(ATP, E1, Ub, cytosol, E1UbBinding_kbinE1Ub);
    E1UbBinding_kbinE1Ub = 0.0002;
  E2UbBinding: E2 + E1_Ub => E2_Ub + E1; cytosol*function_4_E2UbBinding_1(E1_Ub, E2, cytosol, E2UbBinding_kbinE2Ub);
    E2UbBinding_kbinE2Ub = 0.001;
  Monoubiquitination: E2_Ub + E3_MisP => E3_MisP_Ub + E2; cytosol*function_4_Monoubiquitination_1(E2_Ub, E3_MisP, cytosol, Monoubiquitination_kmonoUb);
    Monoubiquitination_kmonoUb = 0.001;
  Polyubiquitination1: E3_MisP_Ub + E2_Ub => E3_MisP_Ub2 + E2; cytosol*function_4_Polyubiquitination1_1(E2_Ub, E3_MisP_Ub, cytosol, Polyubiquitination1_kpolyUb);
    Polyubiquitination1_kpolyUb = 0.01;
  Polyubiquitination2: E3_MisP_Ub2 + E2_Ub => E3_MisP_Ub3 + E2; cytosol*function_4_Polyubiquitination2_1(E2_Ub, E3_MisP_Ub2, cytosol, Polyubiquitination2_kpolyUb);
    Polyubiquitination2_kpolyUb = 0.01;
  Polyubiquitination3: E3_MisP_Ub3 + E2_Ub => E3_MisP_Ub4 + E2; cytosol*function_4_Polyubiquitination3_1(E2_Ub, E3_MisP_Ub3, cytosol, Polyubiquitination3_kpolyUb);
    Polyubiquitination3_kpolyUb = 0.01;
  Polyubiquitination4: E3_MisP_Ub4 + E2_Ub => E3_MisP_Ub5 + E2; cytosol*function_4_Polyubiquitination4_1(E2_Ub, E3_MisP_Ub4, cytosol, Polyubiquitination4_kpolyUb);
    Polyubiquitination4_kpolyUb = 0.01;
  Polyubiquitination5: E3_MisP_Ub5 + E2_Ub => E3_MisP_Ub6 + E2; cytosol*function_4_Polyubiquitination5_1(E2_Ub, E3_MisP_Ub5, cytosol, Polyubiquitination5_kpolyUb);
    Polyubiquitination5_kpolyUb = 0.01;
  Polyubiquitination6: E3_MisP_Ub6 + E2_Ub => E3_MisP_Ub7 + E2; cytosol*function_4_Polyubiquitination6_1(E2_Ub, E3_MisP_Ub6, cytosol, Polyubiquitination6_kpolyUb);
    Polyubiquitination6_kpolyUb = 0.01;
  Polyubiquitination7: E3_MisP_Ub7 + E2_Ub => E3_MisP_Ub8 + E2; cytosol*function_4_Polyubiquitination7_1(E2_Ub, E3_MisP_Ub7, cytosol, Polyubiquitination7_kpolyUb);
    Polyubiquitination7_kpolyUb = 0.01;
  MisPDUBbinding1: E3_MisP_Ub + DUB => E3_MisP_Ub_DUB; cytosol*function_4_MisPDUBbinding1_1(DUB, E3_MisP_Ub, cytosol, MisPDUBbinding1_kbinMisPDUB);
    MisPDUBbinding1_kbinMisPDUB = 2e-7;
  MisPDUBbinding2: E3_MisP_Ub2 + DUB => E3_MisP_Ub2_DUB; cytosol*function_4_MisPDUBbinding2_1(DUB, E3_MisP_Ub2, cytosol, MisPDUBbinding2_kbinMisPDUB);
    MisPDUBbinding2_kbinMisPDUB = 2e-7;
  MisPDUBbinding3: E3_MisP_Ub3 + DUB => E3_MisP_Ub3_DUB; cytosol*function_4_MisPDUBbinding3_1(DUB, E3_MisP_Ub3, cytosol, MisPDUBbinding3_kbinMisPDUB);
    MisPDUBbinding3_kbinMisPDUB = 2e-7;
  MisPDUBbinding4: E3_MisP_Ub4 + DUB => E3_MisP_Ub4_DUB; cytosol*function_4_MisPDUBbinding4_1(DUB, E3_MisP_Ub4, cytosol, MisPDUBbinding4_kbinMisPDUB);
    MisPDUBbinding4_kbinMisPDUB = 2e-7;
  MisPDUBbinding5: E3_MisP_Ub5 + DUB => E3_MisP_Ub5_DUB; cytosol*function_4_MisPDUBbinding5_1(DUB, E3_MisP_Ub5, cytosol, MisPDUBbinding5_kbinMisPDUB);
    MisPDUBbinding5_kbinMisPDUB = 2e-7;
  MisPDUBbinding6: E3_MisP_Ub6 + DUB => E3_MisP_Ub6_DUB; cytosol*function_4_MisPDUBbinding6_1(DUB, E3_MisP_Ub6, cytosol, MisPDUBbinding6_kbinMisPDUB);
    MisPDUBbinding6_kbinMisPDUB = 2e-7;
  MisPDUBbinding7: E3_MisP_Ub7 + DUB => E3_MisP_Ub7_DUB; cytosol*function_4_MisPDUBbinding7_1(DUB, E3_MisP_Ub7, cytosol, MisPDUBbinding7_kbinMisPDUB);
    MisPDUBbinding7_kbinMisPDUB = 2e-7;
  MisPDUBbinding8: E3_MisP_Ub8 + DUB => E3_MisP_Ub8_DUB; cytosol*function_4_MisPDUBbinding8_1(DUB, E3_MisP_Ub8, cytosol, MisPDUBbinding8_kbinMisPDUB);
    MisPDUBbinding8_kbinMisPDUB = 2e-7;
  Deubiquitination8: E3_MisP_Ub8_DUB => E3_MisP_Ub7_DUB + Ub; cytosol*Deubiquitination8_k1*E3_MisP_Ub8_DUB;
    Deubiquitination8_k1 = 0.0001;
  Deubiquitination7: E3_MisP_Ub7_DUB => E3_MisP_Ub6_DUB + Ub; cytosol*Deubiquitination7_k1*E3_MisP_Ub7_DUB;
    Deubiquitination7_k1 = 0.0001;
  Deubiquitination6: E3_MisP_Ub6_DUB => E3_MisP_Ub5_DUB + Ub; cytosol*Deubiquitination6_k1*E3_MisP_Ub6_DUB;
    Deubiquitination6_k1 = 0.0001;
  Deubiquitination5: E3_MisP_Ub5_DUB => E3_MisP_Ub4_DUB + Ub; cytosol*Deubiquitination5_k1*E3_MisP_Ub5_DUB;
    Deubiquitination5_k1 = 0.0001;
  Deubiquitination4: E3_MisP_Ub4_DUB => E3_MisP_Ub3_DUB + Ub; cytosol*Deubiquitination4_k1*E3_MisP_Ub4_DUB;
    Deubiquitination4_k1 = 0.0001;
  Deubiquitination3: E3_MisP_Ub3_DUB => E3_MisP_Ub2_DUB + Ub; cytosol*Deubiquitination3_k1*E3_MisP_Ub3_DUB;
    Deubiquitination3_k1 = 0.0001;
  Deubiquitination2: E3_MisP_Ub2_DUB => E3_MisP_Ub_DUB + Ub; cytosol*Deubiquitination2_k1*E3_MisP_Ub2_DUB;
    Deubiquitination2_k1 = 0.0001;
  Deubiquitination1: E3_MisP_Ub_DUB => E3_MisP + DUB + Ub; cytosol*Deubiquitination1_k1*E3_MisP_Ub_DUB;
    Deubiquitination1_k1 = 0.0001;
  ProteasomeBindingUb4: E3_MisP_Ub4 + Proteasome => E3 + MisP_Ub4_Proteasome; cytosol*function_4_ProteasomeBindingUb4_1(E3_MisP_Ub4, Proteasome, cytosol, ProteasomeBindingUb4_kbinProt);
    ProteasomeBindingUb4_kbinProt = 5e-6;
  ProteasomeBindingUb5: E3_MisP_Ub5 + Proteasome => E3 + MisP_Ub5_Proteasome; cytosol*function_4_ProteasomeBindingUb5_1(E3_MisP_Ub5, Proteasome, cytosol, ProteasomeBindingUb5_kbinProt);
    ProteasomeBindingUb5_kbinProt = 5e-6;
  ProteasomeBindingUb6: E3_MisP_Ub6 + Proteasome => E3 + MisP_Ub6_Proteasome; cytosol*function_4_ProteasomeBindingUb6_1(E3_MisP_Ub6, Proteasome, cytosol, ProteasomeBindingUb6_kbinProt);
    ProteasomeBindingUb6_kbinProt = 5e-6;
  ProteasomeBindingUb7: E3_MisP_Ub7 + Proteasome => E3 + MisP_Ub7_Proteasome; cytosol*function_4_ProteasomeBindingUb7_1(E3_MisP_Ub7, Proteasome, cytosol, ProteasomeBindingUb7_kbinProt);
    ProteasomeBindingUb7_kbinProt = 5e-6;
  ProteasomeBindingUb8: E3_MisP_Ub8 + Proteasome => E3 + MisP_Ub8_Proteasome; cytosol*function_4_ProteasomeBindingUb8_1(E3_MisP_Ub8, Proteasome, cytosol, ProteasomeBindingUb8_kbinProt);
    ProteasomeBindingUb8_kbinProt = 5e-6;
  DeubiquitinationBoundMisP5: MisP_Ub8_Proteasome + DUB => MisP_Ub7_Proteasome + Ub + DUB; cytosol*function_4_DeubiquitinationBoundMisP5_1(DUB, MisP_Ub8_Proteasome, cytosol, DeubiquitinationBoundMisP5_kactDUBProt);
    DeubiquitinationBoundMisP5_kactDUBProt = 1e-6;
  DeubiquitinationBoundMisP4: MisP_Ub7_Proteasome + DUB => MisP_Ub6_Proteasome + Ub + DUB; cytosol*function_4_DeubiquitinationBoundMisP4_1(DUB, MisP_Ub7_Proteasome, cytosol, DeubiquitinationBoundMisP4_kactDUBProt);
    DeubiquitinationBoundMisP4_kactDUBProt = 1e-6;
  DeubiquitinationBoundMisP3: MisP_Ub6_Proteasome + DUB => MisP_Ub5_Proteasome + Ub + DUB; cytosol*function_4_DeubiquitinationBoundMisP3_1(DUB, MisP_Ub6_Proteasome, cytosol, DeubiquitinationBoundMisP3_kactDUBProt);
    DeubiquitinationBoundMisP3_kactDUBProt = 1e-6;
  DeubiquitinationBoundMisP2: MisP_Ub5_Proteasome + DUB => MisP_Ub4_Proteasome + Ub + DUB; cytosol*function_4_DeubiquitinationBoundMisP2_1(DUB, MisP_Ub5_Proteasome, cytosol, DeubiquitinationBoundMisP2_kactDUBProt);
    DeubiquitinationBoundMisP2_kactDUBProt = 1e-6;
  DeubiquitinationBoundMisP1: MisP_Ub4_Proteasome + DUB => MisP + Proteasome + 4 Ub + DUB; cytosol*function_4_DeubiquitinationBoundMisP1_1(DUB, MisP_Ub4_Proteasome, cytosol, DeubiquitinationBoundMisP1_kactDUBProt);
    DeubiquitinationBoundMisP1_kactDUBProt = 1e-6;
  ProteasomeActivity1: MisP_Ub4_Proteasome + $ATP => 4 Ub + Proteasome + $ADP; cytosol*function_4_ProteasomeActivity1_1(ATP, MisP_Ub4_Proteasome, cytosol, ProteasomeActivity1_kactProt, ProteasomeActivity1_kproteff);
    ProteasomeActivity1_kactProt = 0.01; ProteasomeActivity1_kproteff = 1;
  ProteasomeActivity2: MisP_Ub5_Proteasome + $ATP => 5 Ub + Proteasome + $ADP; cytosol*function_4_ProteasomeActivity2_1(ATP, MisP_Ub5_Proteasome, cytosol, ProteasomeActivity2_kactProt, ProteasomeActivity2_kproteff);
    ProteasomeActivity2_kactProt = 0.01; ProteasomeActivity2_kproteff = 1;
  ProteasomeActivity3: MisP_Ub6_Proteasome + $ATP => 6 Ub + Proteasome + $ADP; cytosol*function_4_ProteasomeActivity3_1(ATP, MisP_Ub6_Proteasome, cytosol, ProteasomeActivity3_kactProt, ProteasomeActivity3_kproteff);
    ProteasomeActivity3_kactProt = 0.01; ProteasomeActivity3_kproteff = 1;
  ProteasomeActivity4: MisP_Ub7_Proteasome + $ATP => 7 Ub + Proteasome + $ADP; cytosol*function_4_ProteasomeActivity4_1(ATP, MisP_Ub7_Proteasome, cytosol, ProteasomeActivity4_kactProt, ProteasomeActivity4_kproteff);
    ProteasomeActivity4_kactProt = 0.01; ProteasomeActivity4_kproteff = 1;
  ProteasomeActivity5: MisP_Ub8_Proteasome + $ATP => 8 Ub + Proteasome + $ADP; cytosol*function_4_ProteasomeActivity5_1(ATP, MisP_Ub8_Proteasome, cytosol, ProteasomeActivity5_kactProt, ProteasomeActivity5_kproteff);
    ProteasomeActivity5_kactProt = 0.01; ProteasomeActivity5_kproteff = 1;
  Aggregation1: 2 MisP => AggP1; cytosol*function_4_Aggregation1_1(MisP, cytosol, Aggregation1_kagg1);
    Aggregation1_kagg1 = 1e-12;
  Aggregation2: MisP + AggP1 => AggP2; cytosol*function_4_Aggregation2_1(AggP1, MisP, cytosol, Aggregation2_kagg2);
    Aggregation2_kagg2 = 1e-12;
  Aggregation3: MisP + AggP2 => AggP3; cytosol*function_4_Aggregation3_1(AggP2, MisP, cytosol, Aggregation3_kagg2);
    Aggregation3_kagg2 = 1e-12;
  Aggregation4: MisP + AggP3 => AggP4; cytosol*function_4_Aggregation4_1(AggP3, MisP, cytosol, Aggregation4_kagg2);
    Aggregation4_kagg2 = 1e-12;
  Aggregation5: MisP + AggP4 => AggP5; cytosol*function_4_Aggregation5_1(AggP4, MisP, cytosol, Aggregation5_kagg2);
    Aggregation5_kagg2 = 1e-12;
  Disaggregation1: AggP5 => AggP4 + MisP; cytosol*Disaggregation1_k1*AggP5;
    Disaggregation1_k1 = 2e-9;
  Disaggregation2: AggP4 => AggP3 + MisP; cytosol*Disaggregation2_k1*AggP4;
    Disaggregation2_k1 = 2e-9;
  Disaggregation3: AggP3 => AggP2 + MisP; cytosol*Disaggregation3_k1*AggP3;
    Disaggregation3_k1 = 2e-9;
  Disaggregation4: AggP2 => AggP1 + MisP; cytosol*Disaggregation4_k1*AggP2;
    Disaggregation4_k1 = 2e-9;
  Disaggregation5: AggP1 => 2 MisP; cytosol*Disaggregation5_k1*AggP1;
    Disaggregation5_k1 = 2e-9;
  InclusionFormation: MisP + AggP5 => SeqAggP + 7 aggMisP; cytosol*function_4_InclusionFormation_1(AggP5, MisP, cytosol, InclusionFormation_kagg2);
    InclusionFormation_kagg2 = 1e-10;
  InclusionGrowth1: MisP + SeqAggP => 2 SeqAggP + aggMisP; cytosol*function_4_InclusionGrowth1_1(MisP, SeqAggP, cytosol, InclusionGrowth1_kigrowth1);
    InclusionGrowth1_kigrowth1 = 5e-9;
  InclusionGrowth2: E3_MisP + SeqAggP => 2 SeqAggP + aggMisP + aggE3; cytosol*function_4_InclusionGrowth2_1(E3_MisP, SeqAggP, cytosol, InclusionGrowth2_kigrowth2);
    InclusionGrowth2_kigrowth2 = 5e-9;
  InclusionGrowth3: E3_MisP_Ub + SeqAggP => 2 SeqAggP + aggMisP + aggUb + aggE3; cytosol*function_4_InclusionGrowth3_1(E3_MisP_Ub, SeqAggP, cytosol, InclusionGrowth3_kigrowth2);
    InclusionGrowth3_kigrowth2 = 5e-9;
  InclusionGrowth4: E3_MisP_Ub2 + SeqAggP => 2 SeqAggP + aggMisP + 2 aggUb + aggE3; cytosol*function_4_InclusionGrowth4_1(E3_MisP_Ub2, SeqAggP, cytosol, InclusionGrowth4_kigrowth2);
    InclusionGrowth4_kigrowth2 = 5e-9;
  InclusionGrowth5: E3_MisP_Ub3 + SeqAggP => 2 SeqAggP + aggMisP + 3 aggUb + aggE3; cytosol*function_4_InclusionGrowth5_1(E3_MisP_Ub3, SeqAggP, cytosol, InclusionGrowth5_kigrowth2);
    InclusionGrowth5_kigrowth2 = 5e-9;
  InclusionGrowth6: E3_MisP_Ub4 + SeqAggP => 2 SeqAggP + aggMisP + 4 aggUb + aggE3; cytosol*function_4_InclusionGrowth6_1(E3_MisP_Ub4, SeqAggP, cytosol, InclusionGrowth6_kigrowth2);
    InclusionGrowth6_kigrowth2 = 5e-9;
  InclusionGrowth7: E3_MisP_Ub5 + SeqAggP => 2 SeqAggP + aggMisP + 5 aggUb + aggE3; cytosol*function_4_InclusionGrowth7_1(E3_MisP_Ub5, SeqAggP, cytosol, InclusionGrowth7_kigrowth2);
    InclusionGrowth7_kigrowth2 = 5e-9;
  InclusionGrowth8: E3_MisP_Ub6 + SeqAggP => 2 SeqAggP + aggMisP + 6 aggUb + aggE3; cytosol*function_4_InclusionGrowth8_1(E3_MisP_Ub6, SeqAggP, cytosol, InclusionGrowth8_kigrowth2);
    InclusionGrowth8_kigrowth2 = 5e-9;
  InclusionGrowth9: E3_MisP_Ub7 + SeqAggP => 2 SeqAggP + aggMisP + 7 aggUb + aggE3; cytosol*function_4_InclusionGrowth9_1(E3_MisP_Ub7, SeqAggP, cytosol, InclusionGrowth9_kigrowth2);
    InclusionGrowth9_kigrowth2 = 5e-9;
  InclusionGrowth10: E3_MisP_Ub8 + SeqAggP => 2 SeqAggP + 8 aggUb + aggE3; cytosol*function_4_InclusionGrowth10_1(E3_MisP_Ub8, SeqAggP, cytosol, InclusionGrowth10_kigrowth2);
    InclusionGrowth10_kigrowth2 = 5e-9;
  InclusionGrowth11: E3_MisP_Ub_DUB + SeqAggP => 2 SeqAggP + aggMisP + aggUb + aggE3 + aggDUB; cytosol*function_4_InclusionGrowth11_1(E3_MisP_Ub_DUB, SeqAggP, cytosol, InclusionGrowth11_kigrowth2);
    InclusionGrowth11_kigrowth2 = 5e-9;
  InclusionGrowth12: E3_MisP_Ub2_DUB + SeqAggP => 2 SeqAggP + aggMisP + 2 aggUb + aggE3 + aggDUB; cytosol*function_4_InclusionGrowth12_1(E3_MisP_Ub2_DUB, SeqAggP, cytosol, InclusionGrowth12_kigrowth2);
    InclusionGrowth12_kigrowth2 = 5e-9;
  InclusionGrowth13: E3_MisP_Ub3_DUB + SeqAggP => 2 SeqAggP + aggMisP + 3 aggUb + aggE3 + aggDUB; cytosol*function_4_InclusionGrowth13_1(E3_MisP_Ub3_DUB, SeqAggP, cytosol, InclusionGrowth13_kigrowth2);
    InclusionGrowth13_kigrowth2 = 5e-9;
  InclusionGrowth14: E3_MisP_Ub4_DUB + SeqAggP => 2 SeqAggP + aggMisP + 4 aggUb + aggE3 + aggDUB; cytosol*function_4_InclusionGrowth14_1(E3_MisP_Ub4_DUB, SeqAggP, cytosol, InclusionGrowth14_kigrowth2);
    InclusionGrowth14_kigrowth2 = 5e-9;
  InclusionGrowth15: E3_MisP_Ub5_DUB + SeqAggP => 2 SeqAggP + aggMisP + 5 aggUb + aggE3 + aggDUB; cytosol*function_4_InclusionGrowth15_1(E3_MisP_Ub5_DUB, SeqAggP, cytosol, InclusionGrowth15_kigrowth2);
    InclusionGrowth15_kigrowth2 = 5e-9;
  InclusionGrowth16: E3_MisP_Ub6_DUB + SeqAggP => 2 SeqAggP + aggMisP + 6 aggUb + aggE3 + aggDUB; cytosol*function_4_InclusionGrowth16_1(E3_MisP_Ub6_DUB, SeqAggP, cytosol, InclusionGrowth16_kigrowth2);
    InclusionGrowth16_kigrowth2 = 5e-9;
  InclusionGrowth17: E3_MisP_Ub7_DUB + SeqAggP => 2 SeqAggP + aggMisP + 7 aggUb + aggE3 + aggDUB; cytosol*function_4_InclusionGrowth17_1(E3_MisP_Ub7_DUB, SeqAggP, cytosol, InclusionGrowth17_kigrowth2);
    InclusionGrowth17_kigrowth2 = 5e-9;
  InclusionGrowth18: E3_MisP_Ub8_DUB + SeqAggP => 2 SeqAggP + aggMisP + 8 aggUb + aggE3 + aggDUB; cytosol*function_4_InclusionGrowth18_1(E3_MisP_Ub8_DUB, SeqAggP, cytosol, InclusionGrowth18_kigrowth2);
    InclusionGrowth18_kigrowth2 = 5e-9;
  ProteasomeInhibition1: AggP1 + Proteasome => AggP_Proteasome; cytosol*function_4_ProteasomeInhibition1_1(AggP1, Proteasome, cytosol, ProteasomeInhibition1_kbinAggProt);
    ProteasomeInhibition1_kbinAggProt = 5e-9;
  ProteasomeInhibition2: AggP2 + Proteasome => AggP_Proteasome; cytosol*function_4_ProteasomeInhibition2_1(AggP2, Proteasome, cytosol, ProteasomeInhibition2_kbinAggProt);
    ProteasomeInhibition2_kbinAggProt = 5e-9;
  ProteasomeInhibition3: AggP3 + Proteasome => AggP_Proteasome; cytosol*function_4_ProteasomeInhibition3_1(AggP3, Proteasome, cytosol, ProteasomeInhibition3_kbinAggProt);
    ProteasomeInhibition3_kbinAggProt = 5e-9;
  ProteasomeInhibition4: AggP4 + Proteasome => AggP_Proteasome; cytosol*function_4_ProteasomeInhibition4_1(AggP4, Proteasome, cytosol, ProteasomeInhibition4_kbinAggProt);
    ProteasomeInhibition4_kbinAggProt = 5e-9;
  ProteasomeInhibition5: AggP5 + Proteasome => AggP_Proteasome; cytosol*function_4_ProteasomeInhibition5_1(AggP5, Proteasome, cytosol, ProteasomeInhibition5_kbinAggProt);
    ProteasomeInhibition5_kbinAggProt = 5e-9;
  ROSgenerationSmallAggP1: AggP1 => AggP1 + ROS; cytosol*ROSgenerationSmallAggP1_k1*AggP1;
    ROSgenerationSmallAggP1_k1 = 2e-5;
  ROSgenerationSmallAggP2: AggP2 => AggP2 + ROS; cytosol*ROSgenerationSmallAggP2_k1*AggP2;
    ROSgenerationSmallAggP2_k1 = 2e-5;
  ROSgenerationSmallAggP3: AggP3 => AggP3 + ROS; cytosol*ROSgenerationSmallAggP3_k1*AggP3;
    ROSgenerationSmallAggP3_k1 = 2e-5;
  ROSgenerationSmallAggP4: AggP4 => AggP4 + ROS; cytosol*ROSgenerationSmallAggP4_k1*AggP4;
    ROSgenerationSmallAggP4_k1 = 2e-5;
  ROSgenerationSmallAggP5: AggP5 => AggP5 + ROS; cytosol*ROSgenerationSmallAggP5_k1*AggP5;
    ROSgenerationSmallAggP5_k1 = 2e-5;
  UCHL1Synthesis: $Source => UCHL1; cytosol*UCHL1Synthesis_k1*Source;
    UCHL1Synthesis_k1 = 0.022;
  UCHL1ProteasomeBinding: UCHL1 + Proteasome => UCHL1_Proteasome; cytosol*function_4_UCHL1ProteasomeBinding_1(Proteasome, UCHL1, cytosol, UCHL1ProteasomeBinding_kbinUCHL1Prot);
    UCHL1ProteasomeBinding_kbinUCHL1Prot = 4e-10;
  UCHL1ProteasomeDegradation: UCHL1_Proteasome => Proteasome; cytosol*function_4_UCHL1ProteasomeDegradation_1(UCHL1_Proteasome, UCHL1ProteasomeDegradation_kdegProtUCHL1, UCHL1ProteasomeDegradation_kproteff);
    UCHL1ProteasomeDegradation_kdegProtUCHL1 = 0.01; UCHL1ProteasomeDegradation_kproteff = 1;
  UCHL1LysosomalDegradation: UCHL1 + Lysosome => Lysosome; cytosol*function_4_UCHL1LysosomalDegradation_1(Lysosome, UCHL1, cytosol, UCHL1LysosomalDegradation_kdegLysUCHL1);
    UCHL1LysosomalDegradation_kdegLysUCHL1 = 2.7e-9;
  UCHL1damage: UCHL1 + ROS => UCHL1_damaged + ROS; cytosol*function_4_UCHL1damage_1(ROS, UCHL1, cytosol, UCHL1damage_kdamUCHL1);
    UCHL1damage_kdamUCHL1 = 1e-8;
  UCHL1DamgedProteasomeBinding: UCHL1_damaged + Proteasome => UCHL1_damaged_Proteasome; cytosol*function_4_UCHL1DamgedProteasomeBinding_1(Proteasome, UCHL1_damaged, cytosol, UCHL1DamgedProteasomeBinding_kbinUCHL1Prot);
    UCHL1DamgedProteasomeBinding_kbinUCHL1Prot = 4e-10;
  UCHL1DamagedProteasomeDegradation: UCHL1_damaged_Proteasome => Proteasome; cytosol*function_4_UCHL1DamagedProteasomeDegradation_1(UCHL1_damaged_Proteasome, UCHL1DamagedProteasomeDegradation_kdegProtUCHL1, UCHL1DamagedProteasomeDegradation_kproteff);
    UCHL1DamagedProteasomeDegradation_kdegProtUCHL1 = 0.01; UCHL1DamagedProteasomeDegradation_kproteff = 1;
  UCHL1DamagedLysosomalDegradation: UCHL1_damaged + Lysosome => Lysosome; cytosol*function_4_UCHL1DamagedLysosomalDegradation_1(Lysosome, UCHL1_damaged, cytosol, UCHL1DamagedLysosomalDegradation_kdegLysUCHL1dam);
    UCHL1DamagedLysosomalDegradation_kdegLysUCHL1dam = 2.7e-9;
  UCHL1Lamp2abinding: UCHL1_damaged + Lamp2a => Lamp2a_UCHL1_damaged; cytosol*function_4_UCHL1Lamp2abinding_1(Lamp2a, UCHL1_damaged, cytosol, UCHL1Lamp2abinding_kbinLamp2aUCHL1dam);
    UCHL1Lamp2abinding_kbinLamp2aUCHL1dam = 1e-5;
  UCHL1Lamp2aRelease: Lamp2a_UCHL1_damaged => UCHL1_damaged + Lamp2a; cytosol*UCHL1Lamp2aRelease_k1*Lamp2a_UCHL1_damaged;
    UCHL1Lamp2aRelease_k1 = 5e-5;
  UbUCHL1binding: Ub + UCHL1 => Ub_UCHL1; cytosol*function_4_UbUCHL1binding_1(UCHL1, Ub, cytosol, UbUCHL1binding_kbinUbUCHL1);
    UbUCHL1binding_kbinUbUCHL1 = 3e-6;
  UbUCHL1release: Ub_UCHL1 => Ub + UCHL1; cytosol*UbUCHL1release_k1*Ub_UCHL1;
    UbUCHL1release_k1 = 0.05;
  SUBsynthesis: $Source => SUB; cytosol*SUBsynthesis_k1*Source;
    SUBsynthesis_k1 = 0.13;
  SUBmisfolding: SUB + ROS => SUB_misfolded + ROS; cytosol*function_4_SUBmisfolding_1(ROS, SUB, cytosol, SUBmisfolding_kmisfoldSUB);
    SUBmisfolding_kmisfoldSUB = 2e-5;
  SUBRefolding: SUB_misfolded => SUB; cytosol*SUBRefolding_k1*SUB_misfolded;
    SUBRefolding_k1 = 5e-5;
  E3SUBBinding: SUB_misfolded + E3SUB => E3SUB_SUB_misfolded; cytosol*function_4_E3SUBBinding_1(E3SUB, SUB_misfolded, cytosol, E3SUBBinding_kbinE3SUB);
    E3SUBBinding_kbinE3SUB = 0.0005;
  E3SUBRelease: E3SUB_SUB_misfolded => SUB_misfolded + E3SUB; cytosol*E3SUBRelease_k1*E3SUB_SUB_misfolded;
    E3SUBRelease_k1 = 0.0002;
  SUBMonoubiquitination: E2_Ub + E3SUB_SUB_misfolded => E3SUB_SUB_misfolded_Ub + E2; cytosol*function_4_SUBMonoubiquitination_1(E2_Ub, E3SUB_SUB_misfolded, cytosol, SUBMonoubiquitination_kmonoUb);
    SUBMonoubiquitination_kmonoUb = 0.001;
  SUBPolyubiquitination1: E3SUB_SUB_misfolded_Ub + E2_Ub => E3SUB_SUB_misfolded_Ub2 + E2; cytosol*function_4_SUBPolyubiquitination1_1(E2_Ub, E3SUB_SUB_misfolded_Ub, cytosol, SUBPolyubiquitination1_kpolyUb);
    SUBPolyubiquitination1_kpolyUb = 0.01;
  SUBPolyubiquitination2: E3SUB_SUB_misfolded_Ub2 + E2_Ub => E3SUB_SUB_misfolded_Ub3 + E2; cytosol*function_4_SUBPolyubiquitination2_1(E2_Ub, E3SUB_SUB_misfolded_Ub2, cytosol, SUBPolyubiquitination2_kpolyUb);
    SUBPolyubiquitination2_kpolyUb = 0.01;
  SUBPolyubiquitination3: E3SUB_SUB_misfolded_Ub3 + E2_Ub => E3SUB_SUB_misfolded_Ub4 + E2; cytosol*function_4_SUBPolyubiquitination3_1(E2_Ub, E3SUB_SUB_misfolded_Ub3, cytosol, SUBPolyubiquitination3_kpolyUb);
    SUBPolyubiquitination3_kpolyUb = 0.01;
  SUBPolyubiquitination4: E3SUB_SUB_misfolded_Ub4 + E2_Ub => E3SUB_SUB_misfolded_Ub5 + E2; cytosol*function_4_SUBPolyubiquitination4_1(E2_Ub, E3SUB_SUB_misfolded_Ub4, cytosol, SUBPolyubiquitination4_kpolyUb);
    SUBPolyubiquitination4_kpolyUb = 0.01;
  SUBPolyubiquitination5: E3SUB_SUB_misfolded_Ub5 + E2_Ub => E3SUB_SUB_misfolded_Ub6 + E2; cytosol*function_4_SUBPolyubiquitination5_1(E2_Ub, E3SUB_SUB_misfolded_Ub5, cytosol, SUBPolyubiquitination5_kpolyUb);
    SUBPolyubiquitination5_kpolyUb = 0.01;
  SUBPolyubiquitination6: E3SUB_SUB_misfolded_Ub6 + E2_Ub => E3SUB_SUB_misfolded_Ub7 + E2; cytosol*function_4_SUBPolyubiquitination6_1(E2_Ub, E3SUB_SUB_misfolded_Ub6, cytosol, SUBPolyubiquitination6_kpolyUb);
    SUBPolyubiquitination6_kpolyUb = 0.01;
  SUBPolyubiquitination7: E3SUB_SUB_misfolded_Ub7 + E2_Ub => E3SUB_SUB_misfolded_Ub8 + E2; cytosol*function_4_SUBPolyubiquitination7_1(E2_Ub, E3SUB_SUB_misfolded_Ub7, cytosol, SUBPolyubiquitination7_kpolyUb);
    SUBPolyubiquitination7_kpolyUb = 0.01;
  SUBUCHL1binding1: E3SUB_SUB_misfolded_Ub + UCHL1 => E3SUB_SUB_misfolded_Ub_UCHL1; cytosol*function_4_SUBUCHL1binding1_1(E3SUB_SUB_misfolded_Ub, UCHL1, cytosol, SUBUCHL1binding1_kbinSUBUCHL1);
    SUBUCHL1binding1_kbinSUBUCHL1 = 4e-8;
  SUBUCHL1binding2: E3SUB_SUB_misfolded_Ub2 + UCHL1 => E3SUB_SUB_misfolded_Ub2_UCHL1; cytosol*function_4_SUBUCHL1binding2_1(E3SUB_SUB_misfolded_Ub2, UCHL1, cytosol, SUBUCHL1binding2_kbinSUBUCHL1);
    SUBUCHL1binding2_kbinSUBUCHL1 = 4e-8;
  SUBUCHL1binding3: E3SUB_SUB_misfolded_Ub3 + UCHL1 => E3SUB_SUB_misfolded_Ub3_UCHL1; cytosol*function_4_SUBUCHL1binding3_1(E3SUB_SUB_misfolded_Ub3, UCHL1, cytosol, SUBUCHL1binding3_kbinSUBUCHL1);
    SUBUCHL1binding3_kbinSUBUCHL1 = 4e-8;
  SUBUCHL1binding4: E3SUB_SUB_misfolded_Ub4 + UCHL1 => E3SUB_SUB_misfolded_Ub4_UCHL1; cytosol*function_4_SUBUCHL1binding4_1(E3SUB_SUB_misfolded_Ub4, UCHL1, cytosol, SUBUCHL1binding4_kbinSUBUCHL1);
    SUBUCHL1binding4_kbinSUBUCHL1 = 4e-8;
  SUBUCHL1binding5Ub_UCHL1: E3SUB_SUB_misfolded_Ub5 + UCHL1 => E3SUB_SUB_misfolded_Ub5_UCHL1; cytosol*function_4_SUBUCHL1binding5Ub_UCHL1_1(E3SUB_SUB_misfolded_Ub5, UCHL1, cytosol, SUBUCHL1binding5Ub_UCHL1_kbinSUBUCHL1);
    SUBUCHL1binding5Ub_UCHL1_kbinSUBUCHL1 = 4e-8;
  SUBUCHL1binding6: E3SUB_SUB_misfolded_Ub6 + UCHL1 => E3SUB_SUB_misfolded_Ub6_UCHL1; cytosol*function_4_SUBUCHL1binding6_1(E3SUB_SUB_misfolded_Ub6, UCHL1, cytosol, SUBUCHL1binding6_kbinSUBUCHL1);
    SUBUCHL1binding6_kbinSUBUCHL1 = 4e-8;
  SUBUCHL1binding7: E3SUB_SUB_misfolded_Ub7 + UCHL1 => E3SUB_SUB_misfolded_Ub7_UCHL1; cytosol*function_4_SUBUCHL1binding7_1(E3SUB_SUB_misfolded_Ub7, UCHL1, cytosol, SUBUCHL1binding7_kbinSUBUCHL1);
    SUBUCHL1binding7_kbinSUBUCHL1 = 4e-8;
  SUBUCHL1binding8: E3SUB_SUB_misfolded_Ub8 + UCHL1 => E3SUB_SUB_misfolded_Ub8_UCHL1; cytosol*function_4_SUBUCHL1binding8_1(E3SUB_SUB_misfolded_Ub8, UCHL1, cytosol, SUBUCHL1binding8_kbinSUBUCHL1);
    SUBUCHL1binding8_kbinSUBUCHL1 = 4e-8;
  SUBDeubiquitination8: E3SUB_SUB_misfolded_Ub8_UCHL1 => E3SUB_SUB_misfolded_Ub7_UCHL1 + Ub; cytosol*SUBDeubiquitination8_k1*E3SUB_SUB_misfolded_Ub8_UCHL1;
    SUBDeubiquitination8_k1 = 0.0001;
  SUBDeubiquitination7: E3SUB_SUB_misfolded_Ub7_UCHL1 => E3SUB_SUB_misfolded_Ub6_UCHL1 + Ub; cytosol*SUBDeubiquitination7_k1*E3SUB_SUB_misfolded_Ub7_UCHL1;
    SUBDeubiquitination7_k1 = 0.0001;
  SUBDeubiquitination6: E3SUB_SUB_misfolded_Ub6_UCHL1 => E3SUB_SUB_misfolded_Ub5_UCHL1 + Ub; cytosol*SUBDeubiquitination6_k1*E3SUB_SUB_misfolded_Ub6_UCHL1;
    SUBDeubiquitination6_k1 = 0.0001;
  SUBDeubiquitination5: E3SUB_SUB_misfolded_Ub5_UCHL1 => E3SUB_SUB_misfolded_Ub4_UCHL1 + Ub; cytosol*SUBDeubiquitination5_k1*E3SUB_SUB_misfolded_Ub5_UCHL1;
    SUBDeubiquitination5_k1 = 0.0001;
  SUBDeubiquitination4: E3SUB_SUB_misfolded_Ub4_UCHL1 => E3SUB_SUB_misfolded_Ub3_UCHL1 + Ub; cytosol*SUBDeubiquitination4_k1*E3SUB_SUB_misfolded_Ub4_UCHL1;
    SUBDeubiquitination4_k1 = 0.0001;
  SUBDeubiquitination3: E3SUB_SUB_misfolded_Ub3_UCHL1 => E3SUB_SUB_misfolded_Ub2_UCHL1 + Ub; cytosol*SUBDeubiquitination3_k1*E3SUB_SUB_misfolded_Ub3_UCHL1;
    SUBDeubiquitination3_k1 = 0.0001;
  SUBDeubiquitination2: E3SUB_SUB_misfolded_Ub2_UCHL1 => E3SUB_SUB_misfolded_Ub_UCHL1 + Ub; cytosol*SUBDeubiquitination2_k1*E3SUB_SUB_misfolded_Ub2_UCHL1;
    SUBDeubiquitination2_k1 = 0.0001;
  SUBDeubiquitination1: E3SUB_SUB_misfolded_Ub_UCHL1 => E3SUB_SUB_misfolded + UCHL1 + Ub; cytosol*SUBDeubiquitination1_k1*E3SUB_SUB_misfolded_Ub_UCHL1;
    SUBDeubiquitination1_k1 = 0.0001;
  SUBProteasomeBindingUb4: E3SUB_SUB_misfolded_Ub4 + Proteasome => SUB_misfolded_Ub4_Proteasome + E3SUB; cytosol*function_4_SUBProteasomeBindingUb4_1(E3SUB_SUB_misfolded_Ub4, Proteasome, cytosol, SUBProteasomeBindingUb4_kbinProt);
    SUBProteasomeBindingUb4_kbinProt = 5e-6;
  SUBProteasomeBindingUb5: E3SUB_SUB_misfolded_Ub5 + Proteasome => SUB_misfolded_Ub5_Proteasome + E3SUB; cytosol*function_4_SUBProteasomeBindingUb5_1(E3SUB_SUB_misfolded_Ub5, Proteasome, cytosol, SUBProteasomeBindingUb5_kbinProt);
    SUBProteasomeBindingUb5_kbinProt = 5e-6;
  SUBProteasomeBindingUb6: E3SUB_SUB_misfolded_Ub6 + Proteasome => SUB_misfolded_Ub6_Proteasome + E3SUB; cytosol*function_4_SUBProteasomeBindingUb6_1(E3SUB_SUB_misfolded_Ub6, Proteasome, cytosol, SUBProteasomeBindingUb6_kbinProt);
    SUBProteasomeBindingUb6_kbinProt = 5e-6;
  SUBProteasomeBindingUb7: E3SUB_SUB_misfolded_Ub7 + Proteasome => SUB_misfolded_Ub7_Proteasome + E3SUB; cytosol*function_4_SUBProteasomeBindingUb7_1(E3SUB_SUB_misfolded_Ub7, Proteasome, cytosol, SUBProteasomeBindingUb7_kbinProt);
    SUBProteasomeBindingUb7_kbinProt = 5e-6;
  SUBProteasomeBindingUb8: E3SUB_SUB_misfolded_Ub8 + Proteasome => SUB_misfolded_Ub8_Proteasome + E3SUB; cytosol*function_4_SUBProteasomeBindingUb8_1(E3SUB_SUB_misfolded_Ub8, Proteasome, cytosol, SUBProteasomeBindingUb8_kbinProt);
    SUBProteasomeBindingUb8_kbinProt = 5e-6;
  DeubiquitinationBoundSUB8: SUB_misfolded_Ub8_Proteasome + DUB => SUB_misfolded_Ub7_Proteasome + Ub + DUB; cytosol*function_4_DeubiquitinationBoundSUB8_1(DUB, SUB_misfolded_Ub8_Proteasome, cytosol, DeubiquitinationBoundSUB8_kactDUBProt);
    DeubiquitinationBoundSUB8_kactDUBProt = 1e-6;
  DeubiquitinationBoundSUB7: SUB_misfolded_Ub7_Proteasome + DUB => SUB_misfolded_Ub6_Proteasome + Ub + DUB; cytosol*function_4_DeubiquitinationBoundSUB7_1(DUB, SUB_misfolded_Ub7_Proteasome, cytosol, DeubiquitinationBoundSUB7_kactDUBProt);
    DeubiquitinationBoundSUB7_kactDUBProt = 1e-6;
  DeubiquitinationBoundSUB6: SUB_misfolded_Ub6_Proteasome + DUB => SUB_misfolded_Ub5_Proteasome + Ub + DUB; cytosol*function_4_DeubiquitinationBoundSUB6_1(DUB, SUB_misfolded_Ub6_Proteasome, cytosol, DeubiquitinationBoundSUB6_kactDUBProt);
    DeubiquitinationBoundSUB6_kactDUBProt = 1e-6;
  DeubiquitinationBoundSUB5: SUB_misfolded_Ub5_Proteasome + DUB => SUB_misfolded_Ub4_Proteasome + Ub + DUB; cytosol*function_4_DeubiquitinationBoundSUB5_1(DUB, SUB_misfolded_Ub5_Proteasome, cytosol, DeubiquitinationBoundSUB5_kactDUBProt);
    DeubiquitinationBoundSUB5_kactDUBProt = 1e-6;
  DeubiquitinationBoundSUB4: SUB_misfolded_Ub4_Proteasome + DUB => SUB_misfolded + Proteasome + 4 Ub + DUB; cytosol*function_4_DeubiquitinationBoundSUB4_1(DUB, SUB_misfolded_Ub4_Proteasome, cytosol, DeubiquitinationBoundSUB4_kactDUBProt);
    DeubiquitinationBoundSUB4_kactDUBProt = 1e-6;
  SUBDegradationUb4: SUB_misfolded_Ub4_Proteasome + $ATP => 4 Ub + Proteasome + $ADP; cytosol*function_4_SUBDegradationUb4_1(ATP, SUB_misfolded_Ub4_Proteasome, cytosol, SUBDegradationUb4_kactProt, SUBDegradationUb4_kproteff);
    SUBDegradationUb4_kactProt = 0.01; SUBDegradationUb4_kproteff = 1;
  SUBDegradationUb5: SUB_misfolded_Ub5_Proteasome + $ATP => 5 Ub + Proteasome + $ADP; cytosol*function_4_SUBDegradationUb5_1(ATP, SUB_misfolded_Ub5_Proteasome, cytosol, SUBDegradationUb5_kactProt, SUBDegradationUb5_kproteff);
    SUBDegradationUb5_kactProt = 0.01; SUBDegradationUb5_kproteff = 1;
  SUBDegradationUb6: SUB_misfolded_Ub6_Proteasome + $ATP => 6 Ub + Proteasome + $ADP; cytosol*function_4_SUBDegradationUb6_1(ATP, SUB_misfolded_Ub6_Proteasome, cytosol, SUBDegradationUb6_kactProt, SUBDegradationUb6_kproteff);
    SUBDegradationUb6_kactProt = 0.01; SUBDegradationUb6_kproteff = 1;
  SUBDegradationUb7: SUB_misfolded_Ub7_Proteasome + $ATP => 7 Ub + Proteasome + $ADP; cytosol*function_4_SUBDegradationUb7_1(ATP, SUB_misfolded_Ub7_Proteasome, cytosol, SUBDegradationUb7_kactProt, SUBDegradationUb7_kproteff);
    SUBDegradationUb7_kactProt = 0.01; SUBDegradationUb7_kproteff = 1;
  SUBDegradationUb8: SUB_misfolded_Ub8_Proteasome + $ATP => 8 Ub + Proteasome + $ADP; cytosol*function_4_SUBDegradationUb8_1(ATP, SUB_misfolded_Ub8_Proteasome, cytosol, SUBDegradationUb8_kactProt, SUBDegradationUb8_kproteff);
    SUBDegradationUb8_kactProt = 0.01; SUBDegradationUb8_kproteff = 1;
  asynSynthesis1: $Source => asyn; cytosol*asynSynthesis1_k1*Source;
    asynSynthesis1_k1 = 0.028;
  asynProt20Sbinding: asyn + Proteasome => asyn_Proteasome; cytosol*function_4_asynProt20Sbinding_1(Proteasome, asyn, cytosol, asynProt20Sbinding_kbinasynProt);
    asynProt20Sbinding_kbinasynProt = 1.7e-9;
  asynProt20Sdegradation: asyn_Proteasome => Proteasome; cytosol*function_4_asynProt20Sdegradation_1(asyn_Proteasome, asynProt20Sdegradation_kdegasynProt, asynProt20Sdegradation_kproteff);
    asynProt20Sdegradation_kdegasynProt = 0.01; asynProt20Sdegradation_kproteff = 1;
  asynLamp2aBinding: asyn + Lamp2a => asyn_Lamp2a; cytosol*function_4_asynLamp2aBinding_1(Lamp2a, asyn, cytosol, asynLamp2aBinding_kbinasynLamp2a);
    asynLamp2aBinding_kbinasynLamp2a = 4e-8;
  asynCMAdegradation: asyn_Lamp2a => Lamp2a; cytosol*asynCMAdegradation_k1*asyn_Lamp2a;
    asynCMAdegradation_k1 = 0.001;
  asynDamage: asyn + ROS => asyn_dam + ROS; cytosol*function_4_asynDamage_1(ROS, asyn, cytosol, asynDamage_kdamasyn);
    asynDamage_kdamasyn = 5e-8;
  asyn_damParkinBinding: asyn_dam + Parkin => Parkin_asyn_dam; cytosol*function_4_asyn_damParkinBinding_1(Parkin, asyn_dam, cytosol, asyn_damParkinBinding_kbinasynParkin);
    asyn_damParkinBinding_kbinasynParkin = 0.0001;
  asyn_damParkinRelease: Parkin_asyn_dam => asyn_dam + Parkin; cytosol*asyn_damParkinRelease_k1*Parkin_asyn_dam;
    asyn_damParkinRelease_k1 = 0.0002;
  AsynMonoubiquitination: E2_Ub + Parkin_asyn_dam => Parkin_asyn_dam_Ub + E2; cytosol*function_4_AsynMonoubiquitination_1(E2_Ub, Parkin_asyn_dam, cytosol, AsynMonoubiquitination_kmonoUb);
    AsynMonoubiquitination_kmonoUb = 0.001;
  AsynPolyubiquitination1: Parkin_asyn_dam_Ub + E2_Ub => Parkin_asyn_dam_Ub2 + E2; cytosol*function_4_AsynPolyubiquitination1_1(E2_Ub, Parkin_asyn_dam_Ub, cytosol, AsynPolyubiquitination1_kpolyUb);
    AsynPolyubiquitination1_kpolyUb = 0.01;
  AsynPolyubiquitination2: Parkin_asyn_dam_Ub2 + E2_Ub => Parkin_asyn_dam_Ub3 + E2; cytosol*function_4_AsynPolyubiquitination2_1(E2_Ub, Parkin_asyn_dam_Ub2, cytosol, AsynPolyubiquitination2_kpolyUb);
    AsynPolyubiquitination2_kpolyUb = 0.01;
  AsynPolyubiquitination3: Parkin_asyn_dam_Ub3 + E2_Ub => Parkin_asyn_dam_Ub4 + E2; cytosol*function_4_AsynPolyubiquitination3_1(E2_Ub, Parkin_asyn_dam_Ub3, cytosol, AsynPolyubiquitination3_kpolyUb);
    AsynPolyubiquitination3_kpolyUb = 0.01;
  AsynPolyubiquitination4: Parkin_asyn_dam_Ub4 + E2_Ub => Parkin_asyn_dam_Ub5 + E2; cytosol*function_4_AsynPolyubiquitination4_1(E2_Ub, Parkin_asyn_dam_Ub4, cytosol, AsynPolyubiquitination4_kpolyUb);
    AsynPolyubiquitination4_kpolyUb = 0.01;
  AsynPolyubiquitination5: Parkin_asyn_dam_Ub5 + E2_Ub => Parkin_asyn_dam_Ub6 + E2; cytosol*function_4_AsynPolyubiquitination5_1(E2_Ub, Parkin_asyn_dam_Ub5, cytosol, AsynPolyubiquitination5_kpolyUb);
    AsynPolyubiquitination5_kpolyUb = 0.01;
  AsynPolyubiquitination6: Parkin_asyn_dam_Ub6 + E2_Ub => Parkin_asyn_dam_Ub7 + E2; cytosol*function_4_AsynPolyubiquitination6_1(E2_Ub, Parkin_asyn_dam_Ub6, cytosol, AsynPolyubiquitination6_kpolyUb);
    AsynPolyubiquitination6_kpolyUb = 0.01;
  AsynPolyubiquitination7: Parkin_asyn_dam_Ub7 + E2_Ub => Parkin_asyn_dam_Ub8 + E2; cytosol*function_4_AsynPolyubiquitination7_1(E2_Ub, Parkin_asyn_dam_Ub7, cytosol, AsynPolyubiquitination7_kpolyUb);
    AsynPolyubiquitination7_kpolyUb = 0.01;
  AsynDUBbindingUb8: Parkin_asyn_dam_Ub8 + DUB => Parkin_asyn_dam_Ub8_DUB; cytosol*function_4_AsynDUBbindingUb8_1(DUB, Parkin_asyn_dam_Ub8, cytosol, AsynDUBbindingUb8_kbinasynDUB);
    AsynDUBbindingUb8_kbinasynDUB = 2e-7;
  AsynDUBbindingUb7: Parkin_asyn_dam_Ub7 + DUB => Parkin_asyn_dam_Ub7_DUB; cytosol*function_4_AsynDUBbindingUb7_1(DUB, Parkin_asyn_dam_Ub7, cytosol, AsynDUBbindingUb7_kbinasynDUB);
    AsynDUBbindingUb7_kbinasynDUB = 2e-7;
  AsynDUBbindingUb6: Parkin_asyn_dam_Ub6 + DUB => Parkin_asyn_dam_Ub6_DUB; cytosol*function_4_AsynDUBbindingUb6_1(DUB, Parkin_asyn_dam_Ub6, cytosol, AsynDUBbindingUb6_kbinasynDUB);
    AsynDUBbindingUb6_kbinasynDUB = 2e-7;
  AsynDUBbindingUb5: Parkin_asyn_dam_Ub5 + DUB => Parkin_asyn_dam_Ub5_DUB; cytosol*function_4_AsynDUBbindingUb5_1(DUB, Parkin_asyn_dam_Ub5, cytosol, AsynDUBbindingUb5_kbinasynDUB);
    AsynDUBbindingUb5_kbinasynDUB = 2e-7;
  AsynDUBbindingUb4: Parkin_asyn_dam_Ub4 + DUB => Parkin_asyn_dam_Ub4_DUB; cytosol*function_4_AsynDUBbindingUb4_1(DUB, Parkin_asyn_dam_Ub4, cytosol, AsynDUBbindingUb4_kbinasynDUB);
    AsynDUBbindingUb4_kbinasynDUB = 2e-7;
  AsynDUBbindingUb3: Parkin_asyn_dam_Ub3 + DUB => Parkin_asyn_dam_Ub3_DUB; cytosol*function_4_AsynDUBbindingUb3_1(DUB, Parkin_asyn_dam_Ub3, cytosol, AsynDUBbindingUb3_kbinasynDUB);
    AsynDUBbindingUb3_kbinasynDUB = 2e-7;
  AsynDUBbindingUb2: Parkin_asyn_dam_Ub2 + DUB => Parkin_asyn_dam_Ub2_DUB; cytosol*function_4_AsynDUBbindingUb2_1(DUB, Parkin_asyn_dam_Ub2, cytosol, AsynDUBbindingUb2_kbinasynDUB);
    AsynDUBbindingUb2_kbinasynDUB = 2e-7;
  AsynDUBbindingUb1: Parkin_asyn_dam_Ub + DUB => Parkin_asyn_dam_Ub_DUB; cytosol*function_4_AsynDUBbindingUb1_1(DUB, Parkin_asyn_dam_Ub, cytosol, AsynDUBbindingUb1_kbinasynDUB);
    AsynDUBbindingUb1_kbinasynDUB = 2e-7;
  AsynDeubiquitinationUb8: Parkin_asyn_dam_Ub8_DUB => Parkin_asyn_dam_Ub7_DUB + Ub; cytosol*AsynDeubiquitinationUb8_k1*Parkin_asyn_dam_Ub8_DUB;
    AsynDeubiquitinationUb8_k1 = 0.0001;
  AsynDeubiquitinationUb7: Parkin_asyn_dam_Ub7_DUB => Parkin_asyn_dam_Ub6_DUB + Ub; cytosol*AsynDeubiquitinationUb7_k1*Parkin_asyn_dam_Ub7_DUB;
    AsynDeubiquitinationUb7_k1 = 0.0001;
  AsynDeubiquitinationUb6: Parkin_asyn_dam_Ub6_DUB => Parkin_asyn_dam_Ub5_DUB + Ub; cytosol*AsynDeubiquitinationUb6_k1*Parkin_asyn_dam_Ub6_DUB;
    AsynDeubiquitinationUb6_k1 = 0.0001;
  AsynDeubiquitinationUb5: Parkin_asyn_dam_Ub5_DUB => Parkin_asyn_dam_Ub4_DUB + Ub; cytosol*AsynDeubiquitinationUb5_k1*Parkin_asyn_dam_Ub5_DUB;
    AsynDeubiquitinationUb5_k1 = 0.0001;
  AsynDeubiquitinationUb4: Parkin_asyn_dam_Ub4_DUB => Parkin_asyn_dam_Ub3_DUB + Ub; cytosol*AsynDeubiquitinationUb4_k1*Parkin_asyn_dam_Ub4_DUB;
    AsynDeubiquitinationUb4_k1 = 0.0001;
  AsynDeubiquitinationUb3: Parkin_asyn_dam_Ub3_DUB => Parkin_asyn_dam_Ub2_DUB + Ub; cytosol*AsynDeubiquitinationUb3_k1*Parkin_asyn_dam_Ub3_DUB;
    AsynDeubiquitinationUb3_k1 = 0.0001;
  AsynDeubiquitinationUb2: Parkin_asyn_dam_Ub2_DUB => Parkin_asyn_dam_Ub_DUB + Ub; cytosol*AsynDeubiquitinationUb2_k1*Parkin_asyn_dam_Ub2_DUB;
    AsynDeubiquitinationUb2_k1 = 0.0001;
  AsynDeubiquitinationUb1: Parkin_asyn_dam_Ub_DUB => Parkin_asyn_dam + DUB + Ub; cytosol*AsynDeubiquitinationUb1_k1*Parkin_asyn_dam_Ub_DUB;
    AsynDeubiquitinationUb1_k1 = 0.0001;
  AsynProteasomeBindingUb4: Parkin_asyn_dam_Ub4 + Proteasome => asyn_dam_Ub4_Proteasome + Parkin; cytosol*function_4_AsynProteasomeBindingUb4_1(Parkin_asyn_dam_Ub4, Proteasome, cytosol, AsynProteasomeBindingUb4_kbinProt);
    AsynProteasomeBindingUb4_kbinProt = 5e-6;
  AsynProteasomeBindingUb5: Parkin_asyn_dam_Ub5 + Proteasome => asyn_dam_Ub5_Proteasome + Parkin; cytosol*function_4_AsynProteasomeBindingUb5_1(Parkin_asyn_dam_Ub5, Proteasome, cytosol, AsynProteasomeBindingUb5_kbinProt);
    AsynProteasomeBindingUb5_kbinProt = 5e-6;
  AsynProteasomeBindingUb6: Parkin_asyn_dam_Ub6 + Proteasome => asyn_dam_Ub6_Proteasome + Parkin; cytosol*function_4_AsynProteasomeBindingUb6_1(Parkin_asyn_dam_Ub6, Proteasome, cytosol, AsynProteasomeBindingUb6_kbinProt);
    AsynProteasomeBindingUb6_kbinProt = 5e-6;
  AsynProteasomeBindingUb7: Parkin_asyn_dam_Ub7 + Proteasome => asyn_dam_Ub7_Proteasome + Parkin; cytosol*function_4_AsynProteasomeBindingUb7_1(Parkin_asyn_dam_Ub7, Proteasome, cytosol, AsynProteasomeBindingUb7_kbinProt);
    AsynProteasomeBindingUb7_kbinProt = 5e-6;
  AsynProteasomeBindingUb8: Parkin_asyn_dam_Ub8 + Proteasome => asyn_dam_Ub8_Proteasome + Parkin; cytosol*function_4_AsynProteasomeBindingUb8_1(Parkin_asyn_dam_Ub8, Proteasome, cytosol, AsynProteasomeBindingUb8_kbinProt);
    AsynProteasomeBindingUb8_kbinProt = 5e-6;
  DeubiquitinationBoundasyn_damUb8: asyn_dam_Ub8_Proteasome + DUB => asyn_dam_Ub7_Proteasome + Ub + DUB; cytosol*function_4_DeubiquitinationBoundasyn_damUb8_1(DUB, asyn_dam_Ub8_Proteasome, cytosol, DeubiquitinationBoundasyn_damUb8_kactDUBProt);
    DeubiquitinationBoundasyn_damUb8_kactDUBProt = 1e-6;
  DeubiquitinationBoundasynDamUb7: asyn_dam_Ub7_Proteasome + DUB => asyn_dam_Ub6_Proteasome + Ub + DUB; cytosol*function_4_DeubiquitinationBoundasynDamUb7_1(DUB, asyn_dam_Ub7_Proteasome, cytosol, DeubiquitinationBoundasynDamUb7_kactDUBProt);
    DeubiquitinationBoundasynDamUb7_kactDUBProt = 1e-6;
  DeubiquitinationBoundasynDamUb6: asyn_dam_Ub6_Proteasome + DUB => asyn_dam_Ub5_Proteasome + Ub + DUB; cytosol*function_4_DeubiquitinationBoundasynDamUb6_1(DUB, asyn_dam_Ub6_Proteasome, cytosol, DeubiquitinationBoundasynDamUb6_kactDUBProt);
    DeubiquitinationBoundasynDamUb6_kactDUBProt = 1e-6;
  DeubiquitinationBoundasynDamUb5: asyn_dam_Ub5_Proteasome + DUB => asyn_dam_Ub4_Proteasome + Ub + DUB; cytosol*function_4_DeubiquitinationBoundasynDamUb5_1(DUB, asyn_dam_Ub5_Proteasome, cytosol, DeubiquitinationBoundasynDamUb5_kactDUBProt);
    DeubiquitinationBoundasynDamUb5_kactDUBProt = 1e-6;
  DeubiquitinationBoundasynDamUb4: asyn_dam_Ub4_Proteasome + DUB => asyn_dam + Proteasome + 4 Ub + DUB; cytosol*function_4_DeubiquitinationBoundasynDamUb4_1(DUB, asyn_dam_Ub4_Proteasome, cytosol, DeubiquitinationBoundasynDamUb4_kactDUBProt);
    DeubiquitinationBoundasynDamUb4_kactDUBProt = 1e-6;
  AsynProteasomeActivityUb4: asyn_dam_Ub4_Proteasome + $ATP => 4 Ub + Proteasome + $ADP; cytosol*function_4_AsynProteasomeActivityUb4_1(ATP, asyn_dam_Ub4_Proteasome, cytosol, AsynProteasomeActivityUb4_kactProt, AsynProteasomeActivityUb4_kproteff);
    AsynProteasomeActivityUb4_kactProt = 0.01; AsynProteasomeActivityUb4_kproteff = 1;
  AsynDegradationUb5: asyn_dam_Ub5_Proteasome + $ATP => 5 Ub + Proteasome + $ADP; cytosol*function_4_AsynDegradationUb5_1(ATP, asyn_dam_Ub5_Proteasome, cytosol, AsynDegradationUb5_kactProt, AsynDegradationUb5_kproteff);
    AsynDegradationUb5_kactProt = 0.01; AsynDegradationUb5_kproteff = 1;
  AsynDegradationUb6: asyn_dam_Ub6_Proteasome + $ATP => 6 Ub + Proteasome + $ADP; cytosol*function_4_AsynDegradationUb6_1(ATP, asyn_dam_Ub6_Proteasome, cytosol, AsynDegradationUb6_kactProt, AsynDegradationUb6_kproteff);
    AsynDegradationUb6_kactProt = 0.01; AsynDegradationUb6_kproteff = 1;
  AsynDegradationUb7: asyn_dam_Ub7_Proteasome + $ATP => 7 Ub + Proteasome + $ADP; cytosol*function_4_AsynDegradationUb7_1(ATP, asyn_dam_Ub7_Proteasome, cytosol, AsynDegradationUb7_kactProt, AsynDegradationUb7_kproteff);
    AsynDegradationUb7_kactProt = 0.01; AsynDegradationUb7_kproteff = 1;
  AsynDegradationUb8: asyn_dam_Ub8_Proteasome + $ATP => 8 Ub + Proteasome + $ADP; cytosol*function_4_AsynDegradationUb8_1(ATP, asyn_dam_Ub8_Proteasome, cytosol, AsynDegradationUb8_kactProt, AsynDegradationUb8_kproteff);
    AsynDegradationUb8_kactProt = 0.01; AsynDegradationUb8_kproteff = 1;
  Aggregationasyn1: 2 asyn => AggA1; cytosol*function_4_Aggregationasyn1_1(asyn, cytosol, Aggregationasyn1_kaggasyn1);
    Aggregationasyn1_kaggasyn1 = 5e-12;
  Aggregationasyn2: asyn + AggA1 => AggA2; cytosol*function_4_Aggregationasyn2_1(AggA1, asyn, cytosol, Aggregationasyn2_kaggasyn2);
    Aggregationasyn2_kaggasyn2 = 5e-10;
  Aggregationasyn3: asyn + AggA2 => AggA3; cytosol*function_4_Aggregationasyn3_1(AggA2, asyn, cytosol, Aggregationasyn3_kaggasyn2);
    Aggregationasyn3_kaggasyn2 = 5e-10;
  Aggregationasyn4: asyn + AggA3 => AggA4; cytosol*function_4_Aggregationasyn4_1(AggA3, asyn, cytosol, Aggregationasyn4_kaggasyn2);
    Aggregationasyn4_kaggasyn2 = 5e-10;
  Aggregationasyn5: asyn + AggA4 => AggA5; cytosol*function_4_Aggregationasyn5_1(AggA4, asyn, cytosol, Aggregationasyn5_kaggasyn2);
    Aggregationasyn5_kaggasyn2 = 5e-10;
  DisAggregationasyn1: AggA5 => AggA4 + asyn; cytosol*DisAggregationasyn1_k1*AggA5;
    DisAggregationasyn1_k1 = 2e-9;
  DisAggregationasyn2: AggA4 => AggA3 + asyn; cytosol*DisAggregationasyn2_k1*AggA4;
    DisAggregationasyn2_k1 = 4e-9;
  DisAggregationasyn3: AggA3 => AggA2 + asyn; cytosol*DisAggregationasyn3_k1*AggA3;
    DisAggregationasyn3_k1 = 6e-9;
  DisAggregationasyn4: AggA2 => AggA1 + asyn; cytosol*DisAggregationasyn4_k1*AggA2;
    DisAggregationasyn4_k1 = 8e-9;
  DisAggregationasyn5: AggA1 => 2 asyn; cytosol*DisAggregationasyn5_k1*AggA1;
    DisAggregationasyn5_k1 = 1e-8;
  AggA1ProteasomeInhibition: AggA1 + Proteasome => AggP_Proteasome; cytosol*function_4_AggA1ProteasomeInhibition_1(AggA1, Proteasome, cytosol, AggA1ProteasomeInhibition_kbinAggProt);
    AggA1ProteasomeInhibition_kbinAggProt = 5e-9;
  AggA2ProteasomeInhibition: AggA2 + Proteasome => AggP_Proteasome; cytosol*function_4_AggA2ProteasomeInhibition_1(AggA2, Proteasome, cytosol, AggA2ProteasomeInhibition_kbinAggProt);
    AggA2ProteasomeInhibition_kbinAggProt = 5e-9;
  AggA3ProteasomeInhibition: AggA3 + Proteasome => AggP_Proteasome; cytosol*function_4_AggA3ProteasomeInhibition_1(AggA3, Proteasome, cytosol, AggA3ProteasomeInhibition_kbinAggProt);
    AggA3ProteasomeInhibition_kbinAggProt = 5e-9;
  AggA4ProteasomeInhibition: AggA4 + Proteasome => AggP_Proteasome; cytosol*function_4_AggA4ProteasomeInhibition_1(AggA4, Proteasome, cytosol, AggA4ProteasomeInhibition_kbinAggProt);
    AggA4ProteasomeInhibition_kbinAggProt = 5e-9;
  AggA5ProteasomeInhibition: AggA5 + Proteasome => AggP_Proteasome; cytosol*function_4_AggA5ProteasomeInhibition_1(AggA5, Proteasome, cytosol, AggA5ProteasomeInhibition_kbinAggProt);
    AggA5ProteasomeInhibition_kbinAggProt = 5e-9;
  AsynInclusionFormation: asyn + AggA5 => SeqAggP + 7 aggasyn; cytosol*function_4_AsynInclusionFormation_1(AggA5, asyn, cytosol, AsynInclusionFormation_kaggasyn2);
    AsynInclusionFormation_kaggasyn2 = 5e-10;
  AsynInclusionGrowth: SeqAggP + asyn => 2 SeqAggP + aggasyn; cytosol*function_4_AsynInclusionGrowth_1(SeqAggP, asyn, cytosol, AsynInclusionGrowth_kigrowth1);
    AsynInclusionGrowth_kigrowth1 = 5e-9;
  ROSgenerationSmallAggA1: AggA1 => AggA1 + ROS; cytosol*ROSgenerationSmallAggA1_k1*AggA1;
    ROSgenerationSmallAggA1_k1 = 2e-5;
  ROSgenerationSmallAggA2: AggA2 => AggA2 + ROS; cytosol*ROSgenerationSmallAggA2_k1*AggA2;
    ROSgenerationSmallAggA2_k1 = 2e-5;
  ROSgenerationSmallAggA3: AggA3 => AggA3 + ROS; cytosol*ROSgenerationSmallAggA3_k1*AggA3;
    ROSgenerationSmallAggA3_k1 = 2e-5;
  ROSgenerationSmallAggA4: AggA4 => AggA4 + ROS; cytosol*ROSgenerationSmallAggA4_k1*AggA4;
    ROSgenerationSmallAggA4_k1 = 2e-5;
  ROSgenerationSmallAggA5: AggA5 => AggA5 + ROS; cytosol*ROSgenerationSmallAggA5_k1*AggA5;
    ROSgenerationSmallAggA5_k1 = 2e-5;
  AggregationAsynDam1: 2 asyn_dam => AggD1; cytosol*function_4_AggregationAsynDam1_1(asyn_dam, cytosol, AggregationAsynDam1_kagg1dam);
    AggregationAsynDam1_kagg1dam = 1e-5;
  AggregationAsynDam2: asyn_dam + AggD1 => AggD2; cytosol*function_4_AggregationAsynDam2_1(AggD1, asyn_dam, cytosol, AggregationAsynDam2_kagg2dam);
    AggregationAsynDam2_kagg2dam = 0.005;
  AggregationAsynDam3: asyn_dam + AggD2 => AggD3; cytosol*function_4_AggregationAsynDam3_1(AggD2, asyn_dam, cytosol, AggregationAsynDam3_kagg2dam);
    AggregationAsynDam3_kagg2dam = 0.005;
  AggregationAsynDam4: asyn_dam + AggD3 => AggD4; cytosol*function_4_AggregationAsynDam4_1(AggD3, asyn_dam, cytosol, AggregationAsynDam4_kagg2dam);
    AggregationAsynDam4_kagg2dam = 0.005;
  AggregationAsynDam5: asyn_dam + AggD4 => AggD5; cytosol*function_4_AggregationAsynDam5_1(AggD4, asyn_dam, cytosol, AggregationAsynDam5_kagg2dam);
    AggregationAsynDam5_kagg2dam = 0.005;
  DisaggregationAsynDam1: AggD5 => AggD4 + asyn_dam; cytosol*DisaggregationAsynDam1_k1*AggD5;
    DisaggregationAsynDam1_k1 = 2e-9;
  DisaggregationAsynDam2: AggD4 => AggD3 + asyn_dam; cytosol*DisaggregationAsynDam2_k1*AggD4;
    DisaggregationAsynDam2_k1 = 4e-9;
  DisaggregationAsynDam3: AggD3 => AggD2 + asyn_dam; cytosol*DisaggregationAsynDam3_k1*AggD3;
    DisaggregationAsynDam3_k1 = 6e-9;
  DisaggregationAsynDam4: AggD2 => AggD1 + asyn_dam; cytosol*DisaggregationAsynDam4_k1*AggD2;
    DisaggregationAsynDam4_k1 = 8e-9;
  DisaggregationAsynDam5: AggD1 => 2 asyn_dam; cytosol*DisaggregationAsynDam5_k1*AggD1;
    DisaggregationAsynDam5_k1 = 1e-8;
  AggD1ProteasomeInhibition: AggD1 + Proteasome => AggP_Proteasome; cytosol*function_4_AggD1ProteasomeInhibition_1(AggD1, Proteasome, cytosol, AggD1ProteasomeInhibition_kbinAggProt);
    AggD1ProteasomeInhibition_kbinAggProt = 5e-9;
  AggD2ProteasomeInhibition: AggD2 + Proteasome => AggP_Proteasome; cytosol*function_4_AggD2ProteasomeInhibition_1(AggD2, Proteasome, cytosol, AggD2ProteasomeInhibition_kbinAggProt);
    AggD2ProteasomeInhibition_kbinAggProt = 5e-9;
  AggD3ProteasomeInhibition: AggD3 + Proteasome => AggP_Proteasome; cytosol*function_4_AggD3ProteasomeInhibition_1(AggD3, Proteasome, cytosol, AggD3ProteasomeInhibition_kbinAggProt);
    AggD3ProteasomeInhibition_kbinAggProt = 5e-9;
  AggD4ProteasomeInhibition: AggD4 + Proteasome => AggP_Proteasome; cytosol*function_4_AggD4ProteasomeInhibition_1(AggD4, Proteasome, cytosol, AggD4ProteasomeInhibition_kbinAggProt);
    AggD4ProteasomeInhibition_kbinAggProt = 5e-9;
  AggD5ProteasomeInhibition: AggD5 + Proteasome => AggP_Proteasome; cytosol*function_4_AggD5ProteasomeInhibition_1(AggD5, Proteasome, cytosol, AggD5ProteasomeInhibition_kbinAggProt);
    AggD5ProteasomeInhibition_kbinAggProt = 5e-9;
  AsynDamInclusionFormation: asyn_dam + AggD5 => SeqAggP + 7 aggasyndam; cytosol*function_4_AsynDamInclusionFormation_1(AggD5, asyn_dam, cytosol, AsynDamInclusionFormation_kagg2dam);
    AsynDamInclusionFormation_kagg2dam = 0.005;
  AsynDamInclusionGrowth1: SeqAggP + asyn_dam => 2 SeqAggP + aggasyndam; cytosol*function_4_AsynDamInclusionGrowth1_1(SeqAggP, asyn_dam, cytosol, AsynDamInclusionGrowth1_kigrowth1);
    AsynDamInclusionGrowth1_kigrowth1 = 5e-9;
  AsynDamInclusionGrowth2: SeqAggP + Parkin_asyn_dam => 2 SeqAggP + aggasyndam + aggParkin; cytosol*function_4_AsynDamInclusionGrowth2_1(Parkin_asyn_dam, SeqAggP, cytosol, AsynDamInclusionGrowth2_kigrowth2);
    AsynDamInclusionGrowth2_kigrowth2 = 5e-9;
  AsynDamInclusionGrowth3: SeqAggP + Parkin_asyn_dam_Ub => 2 SeqAggP + aggasyndam + aggUb + aggParkin; cytosol*function_4_AsynDamInclusionGrowth3_1(Parkin_asyn_dam_Ub, SeqAggP, cytosol, AsynDamInclusionGrowth3_kigrowth2);
    AsynDamInclusionGrowth3_kigrowth2 = 5e-9;
  AsynDamInclusionGrowth4: SeqAggP + Parkin_asyn_dam_Ub2 => 2 SeqAggP + aggasyndam + 2 aggUb + aggParkin; cytosol*function_4_AsynDamInclusionGrowth4_1(Parkin_asyn_dam_Ub2, SeqAggP, cytosol, AsynDamInclusionGrowth4_kigrowth2);
    AsynDamInclusionGrowth4_kigrowth2 = 5e-9;
  AsynDamInclusionGrowth5: SeqAggP + Parkin_asyn_dam_Ub3 => 2 SeqAggP + aggasyndam + 3 aggUb + aggParkin; cytosol*function_4_AsynDamInclusionGrowth5_1(Parkin_asyn_dam_Ub3, SeqAggP, cytosol, AsynDamInclusionGrowth5_kigrowth2);
    AsynDamInclusionGrowth5_kigrowth2 = 5e-9;
  AsynDamInclusionGrowth6: SeqAggP + Parkin_asyn_dam_Ub4 => 2 SeqAggP + aggasyndam + 4 aggUb + aggParkin; cytosol*function_4_AsynDamInclusionGrowth6_1(Parkin_asyn_dam_Ub4, SeqAggP, cytosol, AsynDamInclusionGrowth6_kigrowth2);
    AsynDamInclusionGrowth6_kigrowth2 = 5e-9;
  AsynDamInclusionGrowth7: SeqAggP + Parkin_asyn_dam_Ub5 => 2 SeqAggP + aggasyndam + 5 aggUb + aggParkin; cytosol*function_4_AsynDamInclusionGrowth7_1(Parkin_asyn_dam_Ub5, SeqAggP, cytosol, AsynDamInclusionGrowth7_kigrowth2);
    AsynDamInclusionGrowth7_kigrowth2 = 5e-9;
  AsynDamInclusionGrowth8: SeqAggP + Parkin_asyn_dam_Ub6 => 2 SeqAggP + aggasyndam + 6 aggUb + aggParkin; cytosol*function_4_AsynDamInclusionGrowth8_1(Parkin_asyn_dam_Ub6, SeqAggP, cytosol, AsynDamInclusionGrowth8_kigrowth2);
    AsynDamInclusionGrowth8_kigrowth2 = 5e-9;
  AsynDamInclusionGrowth9: SeqAggP + Parkin_asyn_dam_Ub7 => 2 SeqAggP + aggasyndam + 7 aggUb + aggParkin; cytosol*function_4_AsynDamInclusionGrowth9_1(Parkin_asyn_dam_Ub7, SeqAggP, cytosol, AsynDamInclusionGrowth9_kigrowth2);
    AsynDamInclusionGrowth9_kigrowth2 = 5e-9;
  AsynDamInclusionGrowth10: SeqAggP + Parkin_asyn_dam_Ub8 => 2 SeqAggP + aggasyndam + 8 aggUb + aggParkin; cytosol*function_4_AsynDamInclusionGrowth10_1(Parkin_asyn_dam_Ub8, SeqAggP, cytosol, AsynDamInclusionGrowth10_kigrowth2);
    AsynDamInclusionGrowth10_kigrowth2 = 5e-9;
  AsynDamInclusionGrowth11: SeqAggP + Parkin_asyn_dam_Ub_DUB => 2 SeqAggP + aggasyndam + aggUb + aggParkin; cytosol*function_4_AsynDamInclusionGrowth11_1(Parkin_asyn_dam_Ub_DUB, SeqAggP, cytosol, AsynDamInclusionGrowth11_kigrowth2);
    AsynDamInclusionGrowth11_kigrowth2 = 5e-9;
  AsynDamInclusionGrowth12: SeqAggP + Parkin_asyn_dam_Ub2_DUB => 2 SeqAggP + aggasyndam + 2 aggUb + aggParkin; cytosol*function_4_AsynDamInclusionGrowth12_1(Parkin_asyn_dam_Ub2_DUB, SeqAggP, cytosol, AsynDamInclusionGrowth12_kigrowth2);
    AsynDamInclusionGrowth12_kigrowth2 = 5e-9;
  AsynDamInclusionGrowth13: SeqAggP + Parkin_asyn_dam_Ub3_DUB => 2 SeqAggP + aggasyndam + 3 aggUb + aggParkin; cytosol*function_4_AsynDamInclusionGrowth13_1(Parkin_asyn_dam_Ub3_DUB, SeqAggP, cytosol, AsynDamInclusionGrowth13_kigrowth2);
    AsynDamInclusionGrowth13_kigrowth2 = 5e-9;
  AsynDamInclusionGrowth14: SeqAggP + Parkin_asyn_dam_Ub4_DUB => 2 SeqAggP + aggasyndam + 4 aggUb + aggParkin; cytosol*function_4_AsynDamInclusionGrowth14_1(Parkin_asyn_dam_Ub4_DUB, SeqAggP, cytosol, AsynDamInclusionGrowth14_kigrowth2);
    AsynDamInclusionGrowth14_kigrowth2 = 5e-9;
  AsynDamInclusionGrowth15: SeqAggP + Parkin_asyn_dam_Ub5_DUB => 2 SeqAggP + aggasyndam + 5 aggUb + aggParkin; cytosol*function_4_AsynDamInclusionGrowth15_1(Parkin_asyn_dam_Ub5_DUB, SeqAggP, cytosol, AsynDamInclusionGrowth15_kigrowth2);
    AsynDamInclusionGrowth15_kigrowth2 = 5e-9;
  AsynDamInclusionGrowth16: SeqAggP + Parkin_asyn_dam_Ub6_DUB => 2 SeqAggP + aggasyndam + 6 aggUb + aggParkin; cytosol*function_4_AsynDamInclusionGrowth16_1(Parkin_asyn_dam_Ub6_DUB, SeqAggP, cytosol, AsynDamInclusionGrowth16_kigrowth2);
    AsynDamInclusionGrowth16_kigrowth2 = 5e-9;
  AsynDamInclusionGrowth17: SeqAggP + Parkin_asyn_dam_Ub7_DUB => 2 SeqAggP + aggasyndam + 7 aggUb + aggParkin; cytosol*function_4_AsynDamInclusionGrowth17_1(Parkin_asyn_dam_Ub7_DUB, SeqAggP, cytosol, AsynDamInclusionGrowth17_kigrowth2);
    AsynDamInclusionGrowth17_kigrowth2 = 5e-9;
  AsynDamInclusionGrowth18: SeqAggP + Parkin_asyn_dam_Ub8_DUB => 2 SeqAggP + aggasyndam + 8 aggUb + aggParkin; cytosol*function_4_AsynDamInclusionGrowth18_1(Parkin_asyn_dam_Ub8_DUB, SeqAggP, cytosol, AsynDamInclusionGrowth18_kigrowth2);
    AsynDamInclusionGrowth18_kigrowth2 = 5e-9;
  ROSgenerationSmallAggD1: AggD1 => AggD1 + ROS; cytosol*ROSgenerationSmallAggD1_k1*AggD1;
    ROSgenerationSmallAggD1_k1 = 2e-5;
  ROSgenerationSmallAggD2: AggD2 => AggD2 + ROS; cytosol*ROSgenerationSmallAggD2_k1*AggD2;
    ROSgenerationSmallAggD2_k1 = 2e-5;
  ROSgenerationSmallAggD3: AggD3 => AggD3 + ROS; cytosol*ROSgenerationSmallAggD3_k1*AggD3;
    ROSgenerationSmallAggD3_k1 = 2e-5;
  ROSgenerationSmallAggD4: AggD4 => AggD4 + ROS; cytosol*ROSgenerationSmallAggD4_k1*AggD4;
    ROSgenerationSmallAggD4_k1 = 2e-5;
  ROSgenerationSmallAggD5: AggD5 => AggD5 + ROS; cytosol*ROSgenerationSmallAggD5_k1*AggD5;
    ROSgenerationSmallAggD5_k1 = 2e-5;
  AggregationUCHL1Dam1: 2 UCHL1_damaged => AggU1; cytosol*function_4_AggregationUCHL1Dam1_1(UCHL1_damaged, cytosol, AggregationUCHL1Dam1_kagg1dam);
    AggregationUCHL1Dam1_kagg1dam = 1e-5;
  AggregationUCHL1Dam2: UCHL1_damaged + AggU1 => AggU2; cytosol*function_4_AggregationUCHL1Dam2_1(AggU1, UCHL1_damaged, cytosol, AggregationUCHL1Dam2_kagg2dam);
    AggregationUCHL1Dam2_kagg2dam = 0.005;
  AggregationUCHL1Dam3: UCHL1_damaged + AggU2 => AggU3; cytosol*function_4_AggregationUCHL1Dam3_1(AggU2, UCHL1_damaged, cytosol, AggregationUCHL1Dam3_kagg2dam);
    AggregationUCHL1Dam3_kagg2dam = 0.005;
  AggregationUCHL1Dam4: UCHL1_damaged + AggU3 => AggU4; cytosol*function_4_AggregationUCHL1Dam4_1(AggU3, UCHL1_damaged, cytosol, AggregationUCHL1Dam4_kagg2dam);
    AggregationUCHL1Dam4_kagg2dam = 0.005;
  AggregationUCHL1Dam5: UCHL1_damaged + AggU4 => AggU5; cytosol*function_4_AggregationUCHL1Dam5_1(AggU4, UCHL1_damaged, cytosol, AggregationUCHL1Dam5_kagg2dam);
    AggregationUCHL1Dam5_kagg2dam = 0.005;
  DisaggregationUCHL1Dam1: AggU5 => AggU4 + UCHL1_damaged; cytosol*DisaggregationUCHL1Dam1_k1*AggU5;
    DisaggregationUCHL1Dam1_k1 = 2e-9;
  DisaggregationUCHL1Dam2: AggU4 => AggU3 + UCHL1_damaged; cytosol*DisaggregationUCHL1Dam2_k1*AggU4;
    DisaggregationUCHL1Dam2_k1 = 4e-9;
  DisaggregationUCHL1Dam3: AggU3 => AggU2 + UCHL1_damaged; cytosol*DisaggregationUCHL1Dam3_k1*AggU3;
    DisaggregationUCHL1Dam3_k1 = 6e-9;
  DisaggregationUCHL1Dam4: AggU2 => AggU1 + UCHL1_damaged; cytosol*DisaggregationUCHL1Dam4_k1*AggU2;
    DisaggregationUCHL1Dam4_k1 = 8e-9;
  DisaggregationUCHL1Dam5: AggU1 => 2 UCHL1_damaged; cytosol*DisaggregationUCHL1Dam5_k1*AggU1;
    DisaggregationUCHL1Dam5_k1 = 1e-8;
  AggU1ProteasomeInhibition: AggU1 + Proteasome => AggP_Proteasome; cytosol*function_4_AggU1ProteasomeInhibition_1(AggU1, Proteasome, cytosol, AggU1ProteasomeInhibition_kbinAggProt);
    AggU1ProteasomeInhibition_kbinAggProt = 5e-9;
  AggU2ProteasomeInhibition: AggU2 + Proteasome => AggP_Proteasome; cytosol*function_4_AggU2ProteasomeInhibition_1(AggU2, Proteasome, cytosol, AggU2ProteasomeInhibition_kbinAggProt);
    AggU2ProteasomeInhibition_kbinAggProt = 5e-9;
  AggU3ProteasomeInhibition: AggU3 + Proteasome => AggP_Proteasome; cytosol*function_4_AggU3ProteasomeInhibition_1(AggU3, Proteasome, cytosol, AggU3ProteasomeInhibition_kbinAggProt);
    AggU3ProteasomeInhibition_kbinAggProt = 5e-9;
  AggU4ProteasomeInhibition: AggU4 + Proteasome => AggP_Proteasome; cytosol*function_4_AggU4ProteasomeInhibition_1(AggU4, Proteasome, cytosol, AggU4ProteasomeInhibition_kbinAggProt);
    AggU4ProteasomeInhibition_kbinAggProt = 5e-9;
  AggU5ProteasomeInhibition: AggU5 + Proteasome => AggP_Proteasome; cytosol*function_4_AggU5ProteasomeInhibition_1(AggU5, Proteasome, cytosol, AggU5ProteasomeInhibition_kbinAggProt);
    AggU5ProteasomeInhibition_kbinAggProt = 5e-9;
  UCHL1DamInclusionFormation: UCHL1_damaged + AggU5 => SeqAggP + 7 aggUchl1dam; cytosol*function_4_UCHL1DamInclusionFormation_1(AggU5, UCHL1_damaged, cytosol, UCHL1DamInclusionFormation_kagg2dam);
    UCHL1DamInclusionFormation_kagg2dam = 0.005;
  UCHL1DamagedSequestering: SeqAggP + UCHL1_damaged => 2 SeqAggP + aggUchl1dam; cytosol*function_4_UCHL1DamagedSequestering_1(SeqAggP, UCHL1_damaged, cytosol, UCHL1DamagedSequestering_kigrowth1);
    UCHL1DamagedSequestering_kigrowth1 = 5e-9;
  UCHL1DamagedLamp2aSequestering: SeqAggP + Lamp2a_UCHL1_damaged => 2 SeqAggP + aggUchl1dam; cytosol*function_4_UCHL1DamagedLamp2aSequestering_1(Lamp2a_UCHL1_damaged, SeqAggP, cytosol, UCHL1DamagedLamp2aSequestering_kigrowth1);
    UCHL1DamagedLamp2aSequestering_kigrowth1 = 5e-9;
  ROSgenerationSmallAggU1: AggU1 => AggU1 + ROS; cytosol*ROSgenerationSmallAggU1_k1*AggU1;
    ROSgenerationSmallAggU1_k1 = 2e-5;
  ROSgenerationSmallAggU2: AggU2 => AggU2 + ROS; cytosol*ROSgenerationSmallAggU2_k1*AggU2;
    ROSgenerationSmallAggU2_k1 = 2e-5;
  ROSgenerationSmallAggU3: AggU3 => AggU3 + ROS; cytosol*ROSgenerationSmallAggU3_k1*AggU3;
    ROSgenerationSmallAggU3_k1 = 2e-5;
  ROSgenerationSmallAggU4: AggU4 => AggU4 + ROS; cytosol*ROSgenerationSmallAggU4_k1*AggU4;
    ROSgenerationSmallAggU4_k1 = 2e-5;
  ROSgenerationSmallAggU5: AggU5 => AggU5 + ROS; cytosol*ROSgenerationSmallAggU5_k1*AggU5;
    ROSgenerationSmallAggU5_k1 = 2e-5;
  SUBAggregation1: 2 SUB_misfolded => AggS1; cytosol*function_4_SUBAggregation1_1(SUB_misfolded, cytosol, SUBAggregation1_kaggSUB1);
    SUBAggregation1_kaggSUB1 = 1e-12;
  SUBAggregation2: SUB_misfolded + AggS1 => AggS2; cytosol*function_4_SUBAggregation2_1(AggS1, SUB_misfolded, cytosol, SUBAggregation2_kaggSUB2);
    SUBAggregation2_kaggSUB2 = 1e-10;
  SUBAggregation3: SUB_misfolded + AggS2 => AggS3; cytosol*function_4_SUBAggregation3_1(AggS2, SUB_misfolded, cytosol, SUBAggregation3_kaggSUB2);
    SUBAggregation3_kaggSUB2 = 1e-10;
  SUBAggregation4: SUB_misfolded + AggS3 => AggS4; cytosol*function_4_SUBAggregation4_1(AggS3, SUB_misfolded, cytosol, SUBAggregation4_kaggSUB2);
    SUBAggregation4_kaggSUB2 = 1e-10;
  SUBAggregation5: SUB_misfolded + AggS4 => AggS5; cytosol*function_4_SUBAggregation5_1(AggS4, SUB_misfolded, cytosol, SUBAggregation5_kaggSUB2);
    SUBAggregation5_kaggSUB2 = 1e-10;
  SUBDisaggregation1: AggS5 => AggS4 + SUB_misfolded; cytosol*SUBDisaggregation1_k1*AggS5;
    SUBDisaggregation1_k1 = 2e-9;
  SUBDisaggregation2: AggS4 => AggS3 + SUB_misfolded; cytosol*SUBDisaggregation2_k1*AggS4;
    SUBDisaggregation2_k1 = 4e-9;
  SUBDisaggregation3: AggS3 => AggS2 + SUB_misfolded; cytosol*SUBDisaggregation3_k1*AggS3;
    SUBDisaggregation3_k1 = 6e-9;
  SUBDisaggregation4: AggS2 => AggS1 + SUB_misfolded; cytosol*SUBDisaggregation4_k1*AggS2;
    SUBDisaggregation4_k1 = 8e-9;
  SUBDisaggregation5: AggS1 => 2 SUB_misfolded; cytosol*SUBDisaggregation5_k1*AggS1;
    SUBDisaggregation5_k1 = 1e-8;
  AggS1ProteasomeInhibition: AggS1 + Proteasome => AggP_Proteasome; cytosol*function_4_AggS1ProteasomeInhibition_1(AggS1, Proteasome, cytosol, AggS1ProteasomeInhibition_kbinAggProt);
    AggS1ProteasomeInhibition_kbinAggProt = 5e-9;
  AggS2ProteasomeInhibition: AggS2 + Proteasome => AggP_Proteasome; cytosol*function_4_AggS2ProteasomeInhibition_1(AggS2, Proteasome, cytosol, AggS2ProteasomeInhibition_kbinAggProt);
    AggS2ProteasomeInhibition_kbinAggProt = 5e-9;
  AggS3ProteasomeInhibition: AggS3 + Proteasome => AggP_Proteasome; cytosol*function_4_AggS3ProteasomeInhibition_1(AggS3, Proteasome, cytosol, AggS3ProteasomeInhibition_kbinAggProt);
    AggS3ProteasomeInhibition_kbinAggProt = 5e-9;
  AggS4ProteasomeInhibition: AggS4 + Proteasome => AggP_Proteasome; cytosol*function_4_AggS4ProteasomeInhibition_1(AggS4, Proteasome, cytosol, AggS4ProteasomeInhibition_kbinAggProt);
    AggS4ProteasomeInhibition_kbinAggProt = 5e-9;
  AggS5ProteasomeInhibition: AggS5 + Proteasome => AggP_Proteasome; cytosol*function_4_AggS5ProteasomeInhibition_1(AggS5, Proteasome, cytosol, AggS5ProteasomeInhibition_kbinAggProt);
    AggS5ProteasomeInhibition_kbinAggProt = 5e-9;
  SUBInclusionFormation: AggS5 + SUB_misfolded => SeqAggP + 7 aggSUB; cytosol*function_4_SUBInclusionFormation_1(AggS5, SUB_misfolded, cytosol, SUBInclusionFormation_kaggSUB2);
    SUBInclusionFormation_kaggSUB2 = 1e-10;
  SUBInclusionGrowth0: SeqAggP + SUB_misfolded => 2 SeqAggP + aggSUB; cytosol*function_4_SUBInclusionGrowth0_1(SUB_misfolded, SeqAggP, cytosol, SUBInclusionGrowth0_kigrowth1);
    SUBInclusionGrowth0_kigrowth1 = 5e-9;
  SUBInclusionGrowth1: E3SUB_SUB_misfolded + SeqAggP => 2 SeqAggP + aggSUB; cytosol*function_4_SUBInclusionGrowth1_1(E3SUB_SUB_misfolded, SeqAggP, cytosol, SUBInclusionGrowth1_kigrowth2);
    SUBInclusionGrowth1_kigrowth2 = 5e-9;
  SUBInclusionGrowth2: E3SUB_SUB_misfolded_Ub + SeqAggP => 2 SeqAggP + aggSUB + aggUb; cytosol*function_4_SUBInclusionGrowth2_1(E3SUB_SUB_misfolded_Ub, SeqAggP, cytosol, SUBInclusionGrowth2_kigrowth2);
    SUBInclusionGrowth2_kigrowth2 = 5e-9;
  SUBInclusionGrowth3: E3SUB_SUB_misfolded_Ub2 + SeqAggP => 2 SeqAggP + aggSUB + 2 aggUb; cytosol*function_4_SUBInclusionGrowth3_1(E3SUB_SUB_misfolded_Ub2, SeqAggP, cytosol, SUBInclusionGrowth3_kigrowth2);
    SUBInclusionGrowth3_kigrowth2 = 5e-9;
  SUBInclusionGrowth4: E3SUB_SUB_misfolded_Ub3 + SeqAggP => 2 SeqAggP + aggSUB + 3 aggUb; cytosol*function_4_SUBInclusionGrowth4_1(E3SUB_SUB_misfolded_Ub3, SeqAggP, cytosol, SUBInclusionGrowth4_kigrowth2);
    SUBInclusionGrowth4_kigrowth2 = 5e-9;
  SUBInclusionGrowth5: E3SUB_SUB_misfolded_Ub4 + SeqAggP => 2 SeqAggP + aggSUB + 4 aggUb; cytosol*function_4_SUBInclusionGrowth5_1(E3SUB_SUB_misfolded_Ub4, SeqAggP, cytosol, SUBInclusionGrowth5_kigrowth2);
    SUBInclusionGrowth5_kigrowth2 = 5e-9;
  SUBInclusionGrowth6: E3SUB_SUB_misfolded_Ub5 + SeqAggP => 2 SeqAggP + aggSUB + 5 aggUb; cytosol*function_4_SUBInclusionGrowth6_1(E3SUB_SUB_misfolded_Ub5, SeqAggP, cytosol, SUBInclusionGrowth6_kigrowth2);
    SUBInclusionGrowth6_kigrowth2 = 5e-9;
  SUBInclusionGrowth7: E3SUB_SUB_misfolded_Ub6 + SeqAggP => 2 SeqAggP + aggSUB + 6 aggUb; cytosol*function_4_SUBInclusionGrowth7_1(E3SUB_SUB_misfolded_Ub6, SeqAggP, cytosol, SUBInclusionGrowth7_kigrowth2);
    SUBInclusionGrowth7_kigrowth2 = 5e-9;
  SUBInclusionGrowth8: E3SUB_SUB_misfolded_Ub7 + SeqAggP => 2 SeqAggP + aggSUB + 7 aggUb; cytosol*function_4_SUBInclusionGrowth8_1(E3SUB_SUB_misfolded_Ub7, SeqAggP, cytosol, SUBInclusionGrowth8_kigrowth2);
    SUBInclusionGrowth8_kigrowth2 = 5e-9;
  SUBInclusionGrowth9: E3SUB_SUB_misfolded_Ub8 + SeqAggP => 2 SeqAggP + aggSUB + 8 aggUb; cytosol*function_4_SUBInclusionGrowth9_1(E3SUB_SUB_misfolded_Ub8, SeqAggP, cytosol, SUBInclusionGrowth9_kigrowth2);
    SUBInclusionGrowth9_kigrowth2 = 5e-9;
  SUBInclusionGrowth10: E3SUB_SUB_misfolded_Ub_UCHL1 + SeqAggP => 2 SeqAggP + aggSUB + aggUchl1 + aggUb; cytosol*function_4_SUBInclusionGrowth10_1(E3SUB_SUB_misfolded_Ub_UCHL1, SeqAggP, cytosol, SUBInclusionGrowth10_kigrowth2);
    SUBInclusionGrowth10_kigrowth2 = 5e-9;
  SUBInclusionGrowth11: E3SUB_SUB_misfolded_Ub2_UCHL1 + SeqAggP => 2 SeqAggP + aggSUB + aggUchl1 + 2 aggUb; cytosol*function_4_SUBInclusionGrowth11_1(E3SUB_SUB_misfolded_Ub2_UCHL1, SeqAggP, cytosol, SUBInclusionGrowth11_kigrowth2);
    SUBInclusionGrowth11_kigrowth2 = 5e-9;
  SUBInclusionGrowth12: E3SUB_SUB_misfolded_Ub3_UCHL1 + SeqAggP => 2 SeqAggP + aggSUB + aggUchl1 + 3 aggUb; cytosol*function_4_SUBInclusionGrowth12_1(E3SUB_SUB_misfolded_Ub3_UCHL1, SeqAggP, cytosol, SUBInclusionGrowth12_kigrowth2);
    SUBInclusionGrowth12_kigrowth2 = 5e-9;
  SUBInclusionGrowth13: E3SUB_SUB_misfolded_Ub4_UCHL1 + SeqAggP => 2 SeqAggP + aggSUB + aggUchl1 + 4 aggUb; cytosol*function_4_SUBInclusionGrowth13_1(E3SUB_SUB_misfolded_Ub4_UCHL1, SeqAggP, cytosol, SUBInclusionGrowth13_kigrowth2);
    SUBInclusionGrowth13_kigrowth2 = 5e-9;
  SUBInclusionGrowth14: E3SUB_SUB_misfolded_Ub5_UCHL1 + SeqAggP => 2 SeqAggP + aggSUB + aggUchl1 + 5 aggUb; cytosol*function_4_SUBInclusionGrowth14_1(E3SUB_SUB_misfolded_Ub5_UCHL1, SeqAggP, cytosol, SUBInclusionGrowth14_kigrowth2);
    SUBInclusionGrowth14_kigrowth2 = 5e-9;
  SUBInclusionGrowth15: E3SUB_SUB_misfolded_Ub6_UCHL1 + SeqAggP => 2 SeqAggP + aggSUB + aggUchl1 + 6 aggUb; cytosol*function_4_SUBInclusionGrowth15_1(E3SUB_SUB_misfolded_Ub6_UCHL1, SeqAggP, cytosol, SUBInclusionGrowth15_kigrowth2);
    SUBInclusionGrowth15_kigrowth2 = 5e-9;
  SUBInclusionGrowth16: E3SUB_SUB_misfolded_Ub7_UCHL1 + SeqAggP => 2 SeqAggP + aggSUB + aggUchl1 + 7 aggUb; cytosol*function_4_SUBInclusionGrowth16_1(E3SUB_SUB_misfolded_Ub7_UCHL1, SeqAggP, cytosol, SUBInclusionGrowth16_kigrowth2);
    SUBInclusionGrowth16_kigrowth2 = 5e-9;
  SUBInclusionGrowth17: E3SUB_SUB_misfolded_Ub8_UCHL1 + SeqAggP => 2 SeqAggP + aggSUB + aggUchl1 + 8 aggUb; cytosol*function_4_SUBInclusionGrowth17_1(E3SUB_SUB_misfolded_Ub8_UCHL1, SeqAggP, cytosol, SUBInclusionGrowth17_kigrowth2);
    SUBInclusionGrowth17_kigrowth2 = 5e-9;
  ROSgenerationSmallAggS1: AggS1 => AggS1 + ROS; cytosol*ROSgenerationSmallAggS1_k1*AggS1;
    ROSgenerationSmallAggS1_k1 = 2e-5;
  ROSgenerationSmallAggS2: AggS2 => AggS2 + ROS; cytosol*ROSgenerationSmallAggS2_k1*AggS2;
    ROSgenerationSmallAggS2_k1 = 2e-5;
  ROSgenerationSmallAggS3: AggS3 => AggS3 + ROS; cytosol*ROSgenerationSmallAggS3_k1*AggS3;
    ROSgenerationSmallAggS3_k1 = 2e-5;
  ROSgenerationSmallAggS4: AggS4 => AggS4 + ROS; cytosol*ROSgenerationSmallAggS4_k1*AggS4;
    ROSgenerationSmallAggS4_k1 = 2e-5;
  ROSgenerationSmallAggS5: AggS5 => AggS5 + ROS; cytosol*ROSgenerationSmallAggS5_k1*AggS5;
    ROSgenerationSmallAggS5_k1 = 2e-5;
  radicalFormation: $Source => ROS; cytosol*radicalFormation_k1*Source;
    radicalFormation_k1 = 0.01;
  radicalScavenging: ROS => $Sink; cytosol*radicalScavenging_k1*ROS;
    radicalScavenging_k1 = 0.001;

  // Unit definitions:
  unit substance = item;
end
