// SBML level 2 version 4
// dcterms:bibliographicCitation: urn:miriam:pubmed:18706112

function function_4_Mdm2Degradation(Mdm2, kdegMdm2, kproteff)
  kdegMdm2*Mdm2*kproteff;
end

function function_4_p53Degradation(Mdm2_p53, kdegp53, kproteff)
  kdegp53*Mdm2_p53*kproteff;
end

function function_4_P53_Mdm2Binding(Mdm2, cell, kbinMdm2p53, p53)
  kbinMdm2p53*p53*Mdm2*cell;
end

function function_4_DNAdamage(IR, cell, kdam)
  kdam*IR/cell;
end

function function_4_ATMactivation(ATMI, cell, damDNA, kactATM)
  kactATM*damDNA*ATMI*cell;
end

function function_4_p53phoshorylation(ATMA, cell, kphosp53, p53)
  kphosp53*p53*ATMA*cell;
end

function function_4_Mdm2phoshorylation(ATMA, Mdm2, cell, kphosMdm2)
  kphosMdm2*Mdm2*ATMA*cell;
end

model p53_Mdm2_ATM_System()
  // Proctor2008_p53_Mdm2_ATM
  // This model is automatically converted from the Model BIOMD0000000188 by using libsbml. According to the terms of use, this generated model is not related with Model BIOMD0000000188 any more.
  // This model originates from BioModels Database: A Database of Annotated Published Models (http://www.ebi.ac.uk/biomodels/). It is copyright (c) 2005-2011 The BioModels.net Team.
  // For more information see the terms of use.
  // To cite BioModels Database, please use: Li C, Donizelli M, Rodriguez N, Dharuri H, Endler L, Chelliah V, Li L, He E, Henry A, Stefan MI, Snoep JL, Hucka M, Le Novère N, Laibe C (2010) BioModels Database: An enhanced, curated and annotated resource for published quantitative kinetic models. BMC Syst Biol., 4:92.
  // biomodels.db:BIOMD0000000188
  // biomodels.db:MODEL5836973167
  // isPartOf kegg.pathway:hsa04115 reactome:REACT_85
  // isVersionOf GO:0043516 reactome:REACT_309
  // occursIn taxonomy:9606
  // isDescribedBy pubmed:18706112

  // Compartments:
  compartment cell = 1;  // GO:0005623

  // Species:
  species Mdm2 in cell = 5/cell;  // uniprot:Q00987; isEncodedBy ensembl:ENSG00000135679
  species p53 in cell = 5/cell;  // uniprot:P04637; isEncodedBy ensembl:ENSG00000141510
  species Mdm2_p53 in cell = 95/cell;  // hasPart uniprot:Q00987; hasPart uniprot:P04637
  species Mdm2_mRNA in cell = 10/cell;  // isVersionOf kegg.compound:C00046; isVersionOf CHEBI:33699
  species p53_mRNA in cell = 10/cell;  // isVersionOf CHEBI:33699; isVersionOf kegg.compound:C00046
  species ATMA in cell = 0;  // uniprot:Q13315
  species ATMI in cell = 200/cell;  // uniprot:Q13315
  species p53_P in cell = 0;  // encodes uniprot:P04637; isEncodedBy ensembl:ENSG00000141510
  species Mdm2_P in cell = 0;  // encodes uniprot:Q00987; isEncodedBy ensembl:ENSG00000135679
  species damDNA in cell = 0;  // isVersionOf GO:0006974; isVersionOf CHEBI:16991
  species $Sink in cell = 1/cell;
  species $Source in cell = 1/cell;
  species p53deg in cell = 0;  // isVersionOf GO:0043161
  species p53syn in cell = 0;  // isVersionOf GO:0006412
  species mdm2deg in cell = 0;  // isVersionOf GO:0043161
  species mdm2syn in cell = 0;  // isVersionOf GO:0006412
  species Mdm2mRNAdeg in cell = 0;  // isVersionOf GO:0006402
  species Mdm2mRNAsyn in cell = 0;  // isVersionOf GO:0003700
  species $totp53 in cell;
  species $totMdm2 in cell;

  // Parameters:
  IR = 0;
  ksynMdm2 = 0.000495;
  kdegMdm2 = 0.000433;
  ksynp53 = 0.006;
  kdegp53 = 0.000825;
  kbinMdm2p53 = 0.001155;
  krelMdm2p53 = 1.155e-5;
  ksynMdm2mRNA = 0.0001;
  kdegMdm2mRNA = 0.0001;
  kactATM = 0.0001;
  kdegATMMdm2 = 0.0004;
  kinactATM = 0.0005;
  kphosp53 = 0.0005;
  kdephosp53 = 0.5;
  kphosMdm2 = 2;
  kdephosMdm2 = 0.5;
  kdam = 0.08;
  krepair = 2e-5;
  kproteff = 1;
  ksynp53mRNA = 0.001;
  kdegp53mRNA = 0.0001;
  amount_to_particle_factor = 6.02214179e23;

  // Assignment rules:
  totMdm2 := (Mdm2*amount_to_particle_factor*cell/amount_to_particle_factor + Mdm2_p53*amount_to_particle_factor*cell/amount_to_particle_factor + Mdm2_P*amount_to_particle_factor*cell/amount_to_particle_factor)/cell;
  totp53 := (p53*amount_to_particle_factor*cell/amount_to_particle_factor + Mdm2_p53*amount_to_particle_factor*cell/amount_to_particle_factor + p53_P*amount_to_particle_factor*cell/amount_to_particle_factor)/cell;

  // Reactions:
  p53mRNASynthesis: $Source => p53_mRNA; cell*p53mRNASynthesis_k1*Source;  // isVersionOf GO:0003700
    p53mRNASynthesis_k1 = 0.001;
  p53mRNADegradation: p53_mRNA => $Sink; cell*p53mRNADegradation_k1*p53_mRNA;  // isVersionOf GO:0006402
    p53mRNADegradation_k1 = 0.0001;
  Mdm2Synthesis: Mdm2_mRNA => Mdm2_mRNA + Mdm2 + mdm2syn; cell*Mdm2Synthesis_k1*Mdm2_mRNA;  // isVersionOf GO:0006412
    Mdm2Synthesis_k1 = 0.000495;
  Mdm2mRNASynthesis1: p53 => p53 + Mdm2_mRNA + Mdm2mRNAsyn; cell*Mdm2mRNASynthesis1_k1*p53;  // isVersionOf GO:0003700
    Mdm2mRNASynthesis1_k1 = 0.0001;
  Mdm2mRNASynthesis2: p53_P => p53_P + Mdm2_mRNA + Mdm2mRNAsyn; cell*Mdm2mRNASynthesis2_k1*p53_P;  // isVersionOf GO:0003700
    Mdm2mRNASynthesis2_k1 = 0.0001;
  Mdm2mRNADegradation: Mdm2_mRNA => $Sink + Mdm2mRNAdeg; cell*Mdm2mRNADegradation_k1*Mdm2_mRNA;  // isVersionOf GO:0006402
    Mdm2mRNADegradation_k1 = 0.0001;
  Mdm2Degradation: Mdm2 => $Sink + mdm2deg; cell*function_4_Mdm2Degradation(Mdm2, Mdm2Degradation_kdegMdm2, Mdm2Degradation_kproteff);  // isVersionOf GO:0043161
    Mdm2Degradation_kdegMdm2 = 0.000433; Mdm2Degradation_kproteff = 1;
  p53Synthesis: p53_mRNA => p53 + p53_mRNA + p53syn; cell*p53Synthesis_k1*p53_mRNA;  // isVersionOf GO:0006412
    p53Synthesis_k1 = 0.006;
  p53Degradation: Mdm2_p53 => Mdm2 + p53deg; cell*function_4_p53Degradation(Mdm2_p53, p53Degradation_kdegp53, p53Degradation_kproteff);  // isVersionOf GO:0043161
    p53Degradation_kdegp53 = 0.000825; p53Degradation_kproteff = 1;
  P53_Mdm2Binding: p53 + Mdm2 => Mdm2_p53; cell*function_4_P53_Mdm2Binding(Mdm2, cell, P53_Mdm2Binding_kbinMdm2p53, p53);  // isVersionOf GO:0002039
    P53_Mdm2Binding_kbinMdm2p53 = 0.001155;
  P53_Mdm2Release: Mdm2_p53 => p53 + Mdm2; cell*P53_Mdm2Release_k1*Mdm2_p53;  // isVersionOf GO:0043624
    P53_Mdm2Release_k1 = 1.155e-5;
  DNAdamage: => damDNA; cell*function_4_DNAdamage(IR, cell, DNAdamage_kdam);  // isVersionOf GO:0006974
    DNAdamage_kdam = 0.08;
  DNArepair: damDNA => $Sink; cell*DNArepair_k1*damDNA;  // isVersionOf GO:0006281
    DNArepair_k1 = 2e-5;
  ATMactivation: damDNA + ATMI => damDNA + ATMA; cell*function_4_ATMactivation(ATMI, cell, damDNA, ATMactivation_kactATM);  // isVersionOf GO:0006468
    ATMactivation_kactATM = 0.0001;
  p53phoshorylation: p53 + ATMA => p53_P + ATMA; cell*function_4_p53phoshorylation(ATMA, cell, p53phoshorylation_kphosp53, p53);  // isVersionOf GO:0006468
    p53phoshorylation_kphosp53 = 0.0005;
  p53dephosorylation: p53_P => p53; cell*p53dephosorylation_k1*p53_P;  // isVersionOf GO:0006470
    p53dephosorylation_k1 = 0.5;
  Mdm2phoshorylation: Mdm2 + ATMA => Mdm2_P + ATMA; cell*function_4_Mdm2phoshorylation(ATMA, Mdm2, cell, Mdm2phoshorylation_kphosMdm2);  // isVersionOf GO:0006468
    Mdm2phoshorylation_kphosMdm2 = 2;
  Mdm2dephosorylation: Mdm2_P => Mdm2; cell*Mdm2dephosorylation_k1*Mdm2_P;  // isVersionOf GO:0006470
    Mdm2dephosorylation_k1 = 0.5;
  Mdm2Pdegradation: Mdm2_P => $Sink + mdm2deg; cell*Mdm2Pdegradation_k1*Mdm2_P;  // isVersionOf GO:0043161
    Mdm2Pdegradation_k1 = 0.0004;
  ATMInactivation: ATMA => ATMI; cell*ATMInactivation_k1*ATMA;  // isVersionOf GO:0006470
    ATMInactivation_k1 = 0.0005;

  // Events:
  stressCell: at (time >= 3600): IR = 25;  // isVersionOf GO:0006950
  stopStress: at (time >= 3660): IR = 0;

  // Unit definitions:
  unit molepsecpdGy = mole / (second * 10 gray);
  unit decagray = 10 gray; decagray is "dGy";
  unit molepsec = mole / second; molepsec is "molpsec";
  unit pmolepsec = 1 / (mole * second); pmolepsec is "pmolpsec";
  unit psec = 1 / second;
end
