// SBML level 2 version 4

model Model_1()
  // NoName

  // Compartments:
  compartment compartment_1 = 1; compartment_1 is "default";
  compartment Cytosol = 1;
  compartment Lysosome = 1;
  compartment M_autophagy_OtherLysDegrPath = 1; M_autophagy_OtherLysDegrPath is "M/autophagy&OtherLysDegrPath";

  // Species:
  species Dopamine in Cytosol = 750;
  species $SOURCE in Cytosol = 1;
  species WTasyn_Cytosol in Cytosol = 1651.706;
  species WTasyn2_Cytosol in Cytosol = 21.99823;
  species WTasyn3_Cytosol in Cytosol = 8;
  species WTasyn4_Cytosol in Cytosol = 8;
  species WTasyn5_Cytosol in Cytosol = 8;
  species WTasyn6_Cytosol in Cytosol = 8;
  species WTasyn7_Cytosol in Cytosol = 8;
  species WTasyn8_Cytosol in Cytosol = 8;
  species WTasyn9 in Cytosol = 8;
  species DopModWTasyn_Cytosol in Cytosol = 2605 - WTasyn_Cytosol*quantity_to_number_factor*Cytosol;
  species HigherWTasynSPC in Cytosol = 0;
  species WTasynInHigher in Cytosol = 0;
  species Proteasome in Cytosol = 1500;
  species DopModWTasyn2_Cytosol in Cytosol = 22 - WTasyn2_Cytosol*quantity_to_number_factor*Cytosol;
  species DopModWTasyn3_Cytosol in Cytosol = 8;
  species DopModWTasyn4_Cytosol in Cytosol = 8;
  species DopModWTasyn5_Cytosol in Cytosol = 8;
  species DopModWTasyn6_Cytosol in Cytosol = 8;
  species DopModWTasyn7_Cytosol in Cytosol = 8;
  species DopModWTasyn8_Cytosol in Cytosol = 8;
  species ProtWTasyn3 in Cytosol = 0;
  species ProtWTasyn4 in Cytosol = 0;
  species ProtWTasyn5 in Cytosol = 0;
  species ProtWTasyn6 in Cytosol = 0;
  species ProtWTasyn7 in Cytosol = 0;
  species ProtWTasyn8 in Cytosol = 0;
  species ProtWTasyn9 in Cytosol = 0;
  species ProtDopModWTasyn3 in Cytosol = 0;
  species ProtDopModWTasyn4 in Cytosol = 0;
  species ProtDopModWTasyn5 in Cytosol = 0;
  species ProtDopModWTasyn6 in Cytosol = 0;
  species ProtDopModWTasyn7 in Cytosol = 0;
  species ProtDopModWTasyn8 in Cytosol = 0;
  species ProtDopModWTasyn9 in Cytosol = 0;
  species Dopamine_degraded in Cytosol = 0;
  species DopModWTasyn9 in Cytosol = 8;
  species ProtWTasynHigherSPC in Cytosol = 0;
  species WTasyndegr in Lysosome = 0;
  species WTasyn2degr in Lysosome = 0;
  species WTasyn_Lysosome in Lysosome = 0;
  species WTasyn2_Lysosome in Lysosome = 0;
  species Lamp2a in Lysosome = 200;
  species WTasynCMADegr in Lysosome = 0;
  species WTasyn2merCMADegr_Lysosome in Lysosome = 0;
  species DopModWTasynOnLamp in Lysosome = 0;
  species DopModWTasyn2merOnLamp in Lysosome = 0;
  species DopModWTasyn3merOnLamp in Lysosome = 0;
  species DopModWTasyn4merOnLamp in Lysosome = 0;
  species DopModWTasyn7merOnLamp in Lysosome = 0;
  species DopModWTasyn6merOnLamp in Lysosome = 0;
  species DopModWTasyn5merOnLamp in Lysosome = 0;
  species DopModWTasyn8merOnLamp in Lysosome = 0;
  species DopModWTasyn9merOnLamp in Lysosome = 0;
  species WTasyn3merOnLamp in Lysosome = 0;
  species WTasyn4merOnLamp in Lysosome = 0;
  species WTasyn5merOnLamp in Lysosome = 0;
  species WTasyn6merOnLamp in Lysosome = 0;
  species WTasyn7merOnLamp in Lysosome = 0;
  species WTasyn8merOnLamp in Lysosome = 0;
  species WTasyn9merOnLamp in Lysosome = 0;
  species WTasyn8_M_autophagy_OtherLysDegrPath in M_autophagy_OtherLysDegrPath = 0;
  species DopModWTasyn3_M_autophagy_OtherLysDegrPath in M_autophagy_OtherLysDegrPath = 0;
  species DopModWTasyn4_M_autophagy_OtherLysDegrPath in M_autophagy_OtherLysDegrPath = 0;
  species DopModWTasyn7_M_autophagy_OtherLysDegrPath in M_autophagy_OtherLysDegrPath = 0;
  species DopModWTasyn8_M_autophagy_OtherLysDegrPath in M_autophagy_OtherLysDegrPath = 0;
  species DopModWTasyn6_M_autophagy_OtherLysDegrPath in M_autophagy_OtherLysDegrPath = 0;
  species DopModWTasyn5_M_autophagy_OtherLysDegrPath in M_autophagy_OtherLysDegrPath = 0;
  species DopModWTasyn2_M_autophagy_OtherLysDegrPath in M_autophagy_OtherLysDegrPath = 0;
  species WTasyn4_M_autophagy_OtherLysDegrPath in M_autophagy_OtherLysDegrPath = 0;
  species WTasyn7_M_autophagy_OtherLysDegrPath in M_autophagy_OtherLysDegrPath = 0;
  species WTasyn5_M_autophagy_OtherLysDegrPath in M_autophagy_OtherLysDegrPath = 0;
  species WTasyn6_M_autophagy_OtherLysDegrPath in M_autophagy_OtherLysDegrPath = 0;
  species WTasyn3_M_autophagy_OtherLysDegrPath in M_autophagy_OtherLysDegrPath = 0;
  species WTasyn2_M_autophagy_OtherLysDegrPath in M_autophagy_OtherLysDegrPath = 0;
  species WTasyn2merM_Adegr in M_autophagy_OtherLysDegrPath = 0; WTasyn2merM_Adegr is "WTasyn2merM/Adegr";
  species WTasyn3merM_Adegr in M_autophagy_OtherLysDegrPath = 0; WTasyn3merM_Adegr is "WTasyn3merM/Adegr";
  species WTasyn4merM_Adegrr in M_autophagy_OtherLysDegrPath = 0; WTasyn4merM_Adegrr is "WTasyn4merM/Adegrr";
  species WTasyn5merM_Adegr in M_autophagy_OtherLysDegrPath = 0; WTasyn5merM_Adegr is "WTasyn5merM/Adegr";
  species WTasyn6merM_Adegr in M_autophagy_OtherLysDegrPath = 0; WTasyn6merM_Adegr is "WTasyn6merM/Adegr";
  species WTasyn7merM_Adegr in M_autophagy_OtherLysDegrPath = 0; WTasyn7merM_Adegr is "WTasyn7merM/Adegr";
  species WTasyn8merM_Adegr in M_autophagy_OtherLysDegrPath = 0; WTasyn8merM_Adegr is "WTasyn8merM/Adegr";
  species DopModWTasyn8merM_Adegr in M_autophagy_OtherLysDegrPath = 0; DopModWTasyn8merM_Adegr is "DopModWTasyn8merM/Adegr";
  species DopModWTasyn7merM_Adegr in M_autophagy_OtherLysDegrPath = 0; DopModWTasyn7merM_Adegr is "DopModWTasyn7merM/Adegr";
  species DopModWTasyn6merM_Adegr in M_autophagy_OtherLysDegrPath = 0; DopModWTasyn6merM_Adegr is "DopModWTasyn6merM/Adegr";
  species DopModWTasyn4merM_Adegr in M_autophagy_OtherLysDegrPath = 0; DopModWTasyn4merM_Adegr is "DopModWTasyn4merM/Adegr";
  species DopModWTasyn3merM_Adegr in M_autophagy_OtherLysDegrPath = 0; DopModWTasyn3merM_Adegr is "DopModWTasyn3merM/Adegr";
  species DopModWTasyn2merM_Adegr in M_autophagy_OtherLysDegrPath = 0; DopModWTasyn2merM_Adegr is "DopModWTasyn2merM/Adegr";
  species WTasyn_M_autophagy_OtherLysDegrPath in M_autophagy_OtherLysDegrPath = 1;
  species DopModWTasyn_M_autophagy_OtherLysDegrPath in M_autophagy_OtherLysDegrPath = 1;
  species DopModWTasyn1merM_Adegr in M_autophagy_OtherLysDegrPath = 1; DopModWTasyn1merM_Adegr is "DopModWTasyn1merM/Adegr";
  species WTasynmerM_Adegr in M_autophagy_OtherLysDegrPath = 1; WTasynmerM_Adegr is "WTasynmerM/Adegr";

  // Parameters:
  var cytosolicTotalWTasyn1mer;
  var cytosolicTotalWTasyn2mer;
  var cytosolicTotalWTasyn3mer;
  var cytosolicTotalWTasyn4mer;
  var cytosolicTotalWTasyn5mer;
  var cytosolicTotalWTasyn6mer;
  var cytosolicTotalWTasyn7mer;
  var cytosolicTotalWTasyn8mer;
  var cytosolicTotalWTasyn9mer;
  var WToligOnProt;
  var DopModWToligOnProt;
  var oligOnProt;
  var cytosolicOlig3to9;
  parameter_2 = 1.462941e-9; parameter_2 is "2merForm";
  OligomerForm = 3.350497e-8;
  ProteasomeBind = 3.424694e-9;
  OligAutophagUptake = 2.390343e-8;
  LampFreeWTasyn = 0.0003044572;
  ProtOligDegr = 0.000370096;
  WTasyn1_2merBindOnLamp = 6.865455e-7;
  WTOligBindOnLamp = 4e-6;
  var OligomerOnMacroAuto;
  DisRate = 4.999534e-7;
  DopModBindOnLamp = 7.6716e-9;
  DopModWTasynLampFree = 5e-7;
  quantity_to_number_factor = 1;

  // Assignment rules:
  cytosolicTotalWTasyn1mer := WTasyn_Cytosol*quantity_to_number_factor*Cytosol + DopModWTasyn_Cytosol*quantity_to_number_factor*Cytosol;
  cytosolicTotalWTasyn2mer := WTasyn2_Cytosol*quantity_to_number_factor*Cytosol + DopModWTasyn2_Cytosol*quantity_to_number_factor*Cytosol;
  cytosolicTotalWTasyn3mer := WTasyn3_Cytosol*quantity_to_number_factor*Cytosol + DopModWTasyn3_Cytosol*quantity_to_number_factor*Cytosol;
  cytosolicTotalWTasyn4mer := WTasyn4_Cytosol*quantity_to_number_factor*Cytosol + DopModWTasyn4_Cytosol*quantity_to_number_factor*Cytosol;
  cytosolicTotalWTasyn5mer := WTasyn5_Cytosol*quantity_to_number_factor*Cytosol + DopModWTasyn5_Cytosol*quantity_to_number_factor*Cytosol;
  cytosolicTotalWTasyn6mer := WTasyn6_Cytosol*quantity_to_number_factor*Cytosol + DopModWTasyn6_Cytosol*quantity_to_number_factor*Cytosol;
  cytosolicTotalWTasyn7mer := WTasyn7_Cytosol*quantity_to_number_factor*Cytosol + DopModWTasyn7_Cytosol*quantity_to_number_factor*Cytosol;
  cytosolicTotalWTasyn8mer := WTasyn8_Cytosol*quantity_to_number_factor*Cytosol + DopModWTasyn8_Cytosol*quantity_to_number_factor*Cytosol;
  cytosolicTotalWTasyn9mer := WTasyn9*quantity_to_number_factor*Cytosol + DopModWTasyn9*quantity_to_number_factor*Cytosol;
  WToligOnProt := ProtWTasyn3*quantity_to_number_factor*Cytosol + ProtWTasyn4*quantity_to_number_factor*Cytosol + ProtWTasyn5*quantity_to_number_factor*Cytosol + ProtWTasyn6*quantity_to_number_factor*Cytosol + ProtWTasyn7*quantity_to_number_factor*Cytosol + ProtWTasyn8*quantity_to_number_factor*Cytosol + ProtWTasyn9*quantity_to_number_factor*Cytosol;
  DopModWToligOnProt := ProtDopModWTasyn3*quantity_to_number_factor*Cytosol + ProtDopModWTasyn4*quantity_to_number_factor*Cytosol + ProtDopModWTasyn5*quantity_to_number_factor*Cytosol + ProtDopModWTasyn6*quantity_to_number_factor*Cytosol + ProtDopModWTasyn7*quantity_to_number_factor*Cytosol + ProtDopModWTasyn8*quantity_to_number_factor*Cytosol + ProtDopModWTasyn9*quantity_to_number_factor*Cytosol;
  oligOnProt := WToligOnProt + DopModWToligOnProt;
  cytosolicOlig3to9 := cytosolicTotalWTasyn3mer + cytosolicTotalWTasyn4mer + cytosolicTotalWTasyn5mer + cytosolicTotalWTasyn6mer + cytosolicTotalWTasyn7mer + cytosolicTotalWTasyn8mer + cytosolicTotalWTasyn9mer;
  OligomerOnMacroAuto := DopModWTasyn3_M_autophagy_OtherLysDegrPath*quantity_to_number_factor*M_autophagy_OtherLysDegrPath + DopModWTasyn4_M_autophagy_OtherLysDegrPath*quantity_to_number_factor*M_autophagy_OtherLysDegrPath + DopModWTasyn5_M_autophagy_OtherLysDegrPath*quantity_to_number_factor*M_autophagy_OtherLysDegrPath + DopModWTasyn6_M_autophagy_OtherLysDegrPath*quantity_to_number_factor*M_autophagy_OtherLysDegrPath + DopModWTasyn7_M_autophagy_OtherLysDegrPath*quantity_to_number_factor*M_autophagy_OtherLysDegrPath + DopModWTasyn8_M_autophagy_OtherLysDegrPath*quantity_to_number_factor*M_autophagy_OtherLysDegrPath + WTasyn8_M_autophagy_OtherLysDegrPath*quantity_to_number_factor*M_autophagy_OtherLysDegrPath + WTasyn4_M_autophagy_OtherLysDegrPath*quantity_to_number_factor*M_autophagy_OtherLysDegrPath + WTasyn5_M_autophagy_OtherLysDegrPath*quantity_to_number_factor*M_autophagy_OtherLysDegrPath + WTasyn6_M_autophagy_OtherLysDegrPath*quantity_to_number_factor*M_autophagy_OtherLysDegrPath + WTasyn3_M_autophagy_OtherLysDegrPath*quantity_to_number_factor*M_autophagy_OtherLysDegrPath + WTasyn2_M_autophagy_OtherLysDegrPath*quantity_to_number_factor*M_autophagy_OtherLysDegrPath + DopModWTasyn2_M_autophagy_OtherLysDegrPath*quantity_to_number_factor*M_autophagy_OtherLysDegrPath;

  // Reactions:
  WTasynSynthesis: $SOURCE => WTasyn_Cytosol; Cytosol*WTasynSynthesis_k1*SOURCE;
    WTasynSynthesis_k1 = 0.0294219;
  DopProduction: $SOURCE => Dopamine; Cytosol*DopProduction_k1*SOURCE;
    DopProduction_k1 = 0.0791823;
  reaction_3: 2 WTasyn_Cytosol => WTasyn2_Cytosol; Cytosol*reaction_3_k1*WTasyn_Cytosol^2; reaction_3 is "2merForm";
    reaction_3_k1 = 1.46294e-9;
  WTasynDopModification: WTasyn_Cytosol + Dopamine => DopModWTasyn_Cytosol; Cytosol*WTasynDopModification_k1*WTasyn_Cytosol*Dopamine;
    WTasynDopModification_k1 = 6.74768e-7;
  WTasynLampBind: WTasyn_Cytosol + Lamp2a => WTasyndegr; WTasynLampBind_k1*WTasyn_Cytosol*Lamp2a;
    WTasynLampBind_k1 = 6.86546e-7;
  _2merDis: WTasyn2_Cytosol => 2 WTasyn_Cytosol; Cytosol*_2merDis_k1*WTasyn2_Cytosol;
    _2merDis_k1 = 4.99953e-7;
  AutophagosomeUptakeWTasyn2mer: WTasyn2_Cytosol => WTasyn2_M_autophagy_OtherLysDegrPath; AutophagosomeUptakeWTasyn2mer_k1*WTasyn2_Cytosol;
    AutophagosomeUptakeWTasyn2mer_k1 = 2.39034e-8;
  _3merForm: WTasyn2_Cytosol + WTasyn_Cytosol => WTasyn3_Cytosol; Cytosol*_3merForm_k1*WTasyn2_Cytosol*WTasyn_Cytosol;
    _3merForm_k1 = 3.3505e-8;
  WTasyn2LampBind: WTasyn2_Cytosol + Lamp2a => WTasyn2degr; WTasyn2LampBind_k1*WTasyn2_Cytosol*Lamp2a;
    WTasyn2LampBind_k1 = 6.86546e-7;
  _3merDis: WTasyn3_Cytosol => WTasyn2_Cytosol + WTasyn_Cytosol; Cytosol*_3merDis_k1*WTasyn3_Cytosol;
    _3merDis_k1 = 4.99953e-7;
  AutophagosomeUptakeWTasyn3mer: WTasyn3_Cytosol => WTasyn3_M_autophagy_OtherLysDegrPath; AutophagosomeUptakeWTasyn3mer_k1*WTasyn3_Cytosol;
    AutophagosomeUptakeWTasyn3mer_k1 = 2.39034e-8;
  _4merForm: WTasyn3_Cytosol + WTasyn_Cytosol => WTasyn4_Cytosol; Cytosol*_4merForm_k1*WTasyn3_Cytosol*WTasyn_Cytosol;
    _4merForm_k1 = 3.3505e-8;
  _3merProtBind: WTasyn3_Cytosol + Proteasome => ProtWTasyn3; Cytosol*_3merProtBind_k1*WTasyn3_Cytosol*Proteasome;
    _3merProtBind_k1 = 3.42469e-9;
  _4merDis: WTasyn4_Cytosol => WTasyn3_Cytosol + WTasyn_Cytosol; Cytosol*_4merDis_k1*WTasyn4_Cytosol;
    _4merDis_k1 = 4.99953e-7;
  AutophagosomeUptakeWTasyn4mer: WTasyn4_Cytosol => WTasyn4_M_autophagy_OtherLysDegrPath; AutophagosomeUptakeWTasyn4mer_k1*WTasyn4_Cytosol;
    AutophagosomeUptakeWTasyn4mer_k1 = 2.39034e-8;
  _5merForm: WTasyn4_Cytosol + WTasyn_Cytosol => WTasyn5_Cytosol; Cytosol*_5merForm_k1*WTasyn4_Cytosol*WTasyn_Cytosol;
    _5merForm_k1 = 3.3505e-8;
  _4merProtBind: WTasyn4_Cytosol + Proteasome => ProtWTasyn4; Cytosol*_4merProtBind_k1*WTasyn4_Cytosol*Proteasome;
    _4merProtBind_k1 = 3.42469e-9;
  _5merDis: WTasyn5_Cytosol => WTasyn4_Cytosol + WTasyn_Cytosol; Cytosol*_5merDis_k1*WTasyn5_Cytosol;
    _5merDis_k1 = 4.99953e-7;
  AutophagosomeUptakeWTasyn5mer: WTasyn5_Cytosol => WTasyn5_M_autophagy_OtherLysDegrPath; AutophagosomeUptakeWTasyn5mer_k1*WTasyn5_Cytosol;
    AutophagosomeUptakeWTasyn5mer_k1 = 2.39034e-8;
  _6merForm: WTasyn5_Cytosol + WTasyn_Cytosol => WTasyn6_Cytosol; Cytosol*_6merForm_k1*WTasyn5_Cytosol*WTasyn_Cytosol;
    _6merForm_k1 = 3.3505e-8;
  _5merProtBind: WTasyn5_Cytosol + Proteasome => ProtWTasyn5; Cytosol*_5merProtBind_k1*WTasyn5_Cytosol*Proteasome;
    _5merProtBind_k1 = 3.42469e-9;
  WTasyn5merBindOnLamp: WTasyn5_Cytosol + Lamp2a => WTasyn5merOnLamp; WTasyn5merBindOnLamp_k1*WTasyn5_Cytosol*Lamp2a;
    WTasyn5merBindOnLamp_k1 = 4e-6;
  _6merDis: WTasyn6_Cytosol => WTasyn5_Cytosol + WTasyn_Cytosol; Cytosol*_6merDis_k1*WTasyn6_Cytosol;
    _6merDis_k1 = 4.99953e-7;
  AutophagosomeUptakeWTasyn6mer: WTasyn6_Cytosol => WTasyn6_M_autophagy_OtherLysDegrPath; AutophagosomeUptakeWTasyn6mer_k1*WTasyn6_Cytosol;
    AutophagosomeUptakeWTasyn6mer_k1 = 2.39034e-8;
  _7merForm: WTasyn6_Cytosol + WTasyn_Cytosol => WTasyn7_Cytosol; Cytosol*_7merForm_k1*WTasyn6_Cytosol*WTasyn_Cytosol;
    _7merForm_k1 = 3.3505e-8;
  _6merProtBind: WTasyn6_Cytosol + Proteasome => ProtWTasyn6; Cytosol*_6merProtBind_k1*WTasyn6_Cytosol*Proteasome;
    _6merProtBind_k1 = 3.42469e-9;
  _7merDis: WTasyn7_Cytosol => WTasyn6_Cytosol + WTasyn_Cytosol; Cytosol*_7merDis_k1*WTasyn7_Cytosol;
    _7merDis_k1 = 4.99953e-7;
  AutophagosomeUptakeWTasyn7mer: WTasyn7_Cytosol => WTasyn7_M_autophagy_OtherLysDegrPath; AutophagosomeUptakeWTasyn7mer_k1*WTasyn7_Cytosol;
    AutophagosomeUptakeWTasyn7mer_k1 = 2.39034e-8;
  _8merForm: WTasyn7_Cytosol + WTasyn_Cytosol => WTasyn8_Cytosol; Cytosol*_8merForm_k1*WTasyn7_Cytosol*WTasyn_Cytosol;
    _8merForm_k1 = 3.3505e-8;
  _7merProtBind: WTasyn7_Cytosol + Proteasome => ProtWTasyn7; Cytosol*_7merProtBind_k1*WTasyn7_Cytosol*Proteasome;
    _7merProtBind_k1 = 3.42469e-9;
  WTasyn7merBindOnLamp: WTasyn7_Cytosol + Lamp2a => WTasyn7merOnLamp; WTasyn7merBindOnLamp_k1*WTasyn7_Cytosol*Lamp2a;
    WTasyn7merBindOnLamp_k1 = 4e-6;
  _8merDis: WTasyn8_Cytosol => WTasyn7_Cytosol + WTasyn_Cytosol; Cytosol*_8merDis_k1*WTasyn8_Cytosol;
    _8merDis_k1 = 4.99953e-7;
  AutophagosomeUptakeWTasyn8mer: WTasyn8_Cytosol => WTasyn8_M_autophagy_OtherLysDegrPath; AutophagosomeUptakeWTasyn8mer_k1*WTasyn8_Cytosol;
    AutophagosomeUptakeWTasyn8mer_k1 = 2.39034e-8;
  _9merForm: WTasyn8_Cytosol + WTasyn_Cytosol => WTasyn9; Cytosol*_9merForm_k1*WTasyn8_Cytosol*WTasyn_Cytosol;
    _9merForm_k1 = 3.3505e-8;
  _8merProtBind: WTasyn8_Cytosol + Proteasome => ProtWTasyn8; Cytosol*_8merProtBind_k1*WTasyn8_Cytosol*Proteasome;
    _8merProtBind_k1 = 3.42469e-9;
  _9merDis: WTasyn9 => WTasyn8_Cytosol + WTasyn_Cytosol; Cytosol*_9merDis_k1*WTasyn9;
    _9merDis_k1 = 4.99953e-7;
  _9merProtBind: WTasyn9 + Proteasome => ProtWTasyn9; Cytosol*_9merProtBind_k1*WTasyn9*Proteasome;
    _9merProtBind_k1 = 3.42469e-9;
  WTasyn9merBindOnLamp: WTasyn9 + Lamp2a => WTasyn9merOnLamp; WTasyn9merBindOnLamp_k1*WTasyn9*Lamp2a;
    WTasyn9merBindOnLamp_k1 = 4e-6;
  DopamineDegr: Dopamine => Dopamine_degraded; Cytosol*DopamineDegr_k1*Dopamine;
    DopamineDegr_k1 = 0.00679501;
  DopMod2merForm: 2 DopModWTasyn_Cytosol => DopModWTasyn2_Cytosol; Cytosol*DopMod2merForm_k1*DopModWTasyn_Cytosol^2;
    DopMod2merForm_k1 = 1.46294e-9;
  DopWTasyn2merFormOnLamp: DopModWTasyn_Cytosol + DopModWTasynOnLamp => DopModWTasyn2merOnLamp; DopWTasyn2merFormOnLamp_k1*DopModWTasyn_Cytosol*DopModWTasynOnLamp;
    DopWTasyn2merFormOnLamp_k1 = 1.46294e-9;
  DopWTasyn7merFormOnLamp: DopModWTasyn_Cytosol + DopModWTasyn6merOnLamp => DopModWTasyn7merOnLamp; DopWTasyn7merFormOnLamp_k1*DopModWTasyn_Cytosol*DopModWTasyn6merOnLamp;
    DopWTasyn7merFormOnLamp_k1 = 3.3505e-8;
  DopWTasyn8merFormOnLamp: DopModWTasyn_Cytosol + DopModWTasyn7merOnLamp => DopModWTasyn8merOnLamp; DopWTasyn8merFormOnLamp_k1*DopModWTasyn_Cytosol*DopModWTasyn7merOnLamp;
    DopWTasyn8merFormOnLamp_k1 = 3.3505e-8;
  DopWTasyn9merFormOnLamp: DopModWTasyn_Cytosol + DopModWTasyn8merOnLamp => DopModWTasyn9merOnLamp; DopWTasyn9merFormOnLamp_k1*DopModWTasyn_Cytosol*DopModWTasyn8merOnLamp;
    DopWTasyn9merFormOnLamp_k1 = 3.3505e-8;
  AggregGrowth: HigherWTasynSPC + WTasyn_Cytosol => HigherWTasynSPC + WTasynInHigher; Cytosol*AggregGrowth_k1*HigherWTasynSPC*WTasyn_Cytosol;
    AggregGrowth_k1 = 4.90556e-7;
  WTasynLysosUptake: WTasyndegr => Lamp2a + WTasyn_Lysosome; Lysosome*WTasynLysosUptake_k1*WTasyndegr;
    WTasynLysosUptake_k1 = 0.00999558;
  WTasyn2LysosUptake: WTasyn2degr => Lamp2a + WTasyn2_Lysosome; Lysosome*WTasyn2LysosUptake_k1*WTasyn2degr;
    WTasyn2LysosUptake_k1 = 0.00995312;
  M_autophagyWTasyn4Degr: WTasyn4_M_autophagy_OtherLysDegrPath => WTasyn4merM_Adegrr; M_autophagy_OtherLysDegrPath*M_autophagyWTasyn4Degr_k1*WTasyn4_M_autophagy_OtherLysDegrPath; M_autophagyWTasyn4Degr is "M/autophagyWTasyn4Degr";
    M_autophagyWTasyn4Degr_k1 = 0.1;
  M_autophagyWTasyn8Degr: WTasyn8_M_autophagy_OtherLysDegrPath => WTasyn8merM_Adegr; M_autophagy_OtherLysDegrPath*M_autophagyWTasyn8Degr_k1*WTasyn8_M_autophagy_OtherLysDegrPath; M_autophagyWTasyn8Degr is "M/autophagyWTasyn8Degr";
    M_autophagyWTasyn8Degr_k1 = 0.1;
  M_autophagyWTasyn3Degr: WTasyn3_M_autophagy_OtherLysDegrPath => WTasyn3merM_Adegr; M_autophagy_OtherLysDegrPath*M_autophagyWTasyn3Degr_k1*WTasyn3_M_autophagy_OtherLysDegrPath; M_autophagyWTasyn3Degr is "M/autophagyWTasyn3Degr";
    M_autophagyWTasyn3Degr_k1 = 0.1;
  M_autophagyWTasyn2Degr: WTasyn2_M_autophagy_OtherLysDegrPath => WTasyn2merM_Adegr; M_autophagy_OtherLysDegrPath*M_autophagyWTasyn2Degr_k1*WTasyn2_M_autophagy_OtherLysDegrPath; M_autophagyWTasyn2Degr is "M/autophagyWTasyn2Degr";
    M_autophagyWTasyn2Degr_k1 = 0.1;
  M_autophagyWTasyn7Degr: WTasyn7_M_autophagy_OtherLysDegrPath => WTasyn7merM_Adegr; M_autophagy_OtherLysDegrPath*M_autophagyWTasyn7Degr_k1*WTasyn7_M_autophagy_OtherLysDegrPath; M_autophagyWTasyn7Degr is "M/autophagyWTasyn7Degr";
    M_autophagyWTasyn7Degr_k1 = 0.1;
  M_autophagyWTasyn5Degr: WTasyn5_M_autophagy_OtherLysDegrPath => WTasyn5merM_Adegr; M_autophagy_OtherLysDegrPath*M_autophagyWTasyn5Degr_k1*WTasyn5_M_autophagy_OtherLysDegrPath; M_autophagyWTasyn5Degr is "M/autophagyWTasyn5Degr";
    M_autophagyWTasyn5Degr_k1 = 0.1;
  M_autophagyWTasyn6Degr: WTasyn6_M_autophagy_OtherLysDegrPath => WTasyn6merM_Adegr; M_autophagy_OtherLysDegrPath*M_autophagyWTasyn6Degr_k1*WTasyn6_M_autophagy_OtherLysDegrPath; M_autophagyWTasyn6Degr is "M/autophagyWTasyn6Degr";
    M_autophagyWTasyn6Degr_k1 = 0.1;
  AggregForm: WTasyn9 + WTasyn_Cytosol => HigherWTasynSPC + WTasynInHigher; Cytosol*AggregForm_k1*WTasyn9*WTasyn_Cytosol;
    AggregForm_k1 = 3.3505e-8;
  DopMod2merDis: DopModWTasyn2_Cytosol => 2 DopModWTasyn_Cytosol; Cytosol*DopMod2merDis_k1*DopModWTasyn2_Cytosol;
    DopMod2merDis_k1 = 4.99953e-7;
  DopModAutophagosomeUptake2mer: DopModWTasyn2_Cytosol => DopModWTasyn2_M_autophagy_OtherLysDegrPath; DopModAutophagosomeUptake2mer_k1*DopModWTasyn2_Cytosol;
    DopModAutophagosomeUptake2mer_k1 = 2.39034e-8;
  DopMod3merForm: DopModWTasyn2_Cytosol + DopModWTasyn_Cytosol => DopModWTasyn3_Cytosol; Cytosol*DopMod3merForm_k1*DopModWTasyn2_Cytosol*DopModWTasyn_Cytosol;
    DopMod3merForm_k1 = 3.3505e-8;
  DopMod3merDis: DopModWTasyn3_Cytosol => DopModWTasyn2_Cytosol + DopModWTasyn_Cytosol; Cytosol*DopMod3merDis_k1*DopModWTasyn3_Cytosol;
    DopMod3merDis_k1 = 4.99953e-7;
  DopModAutophagosomeUptake3mer: DopModWTasyn3_Cytosol => DopModWTasyn3_M_autophagy_OtherLysDegrPath; DopModAutophagosomeUptake3mer_k1*DopModWTasyn3_Cytosol;
    DopModAutophagosomeUptake3mer_k1 = 2.39034e-8;
  DopMod4merForm: DopModWTasyn3_Cytosol + DopModWTasyn_Cytosol => DopModWTasyn4_Cytosol; Cytosol*DopMod4merForm_k1*DopModWTasyn3_Cytosol*DopModWTasyn_Cytosol;
    DopMod4merForm_k1 = 3.3505e-8;
  DopMod3merProtBind: DopModWTasyn3_Cytosol + Proteasome => ProtDopModWTasyn3; Cytosol*DopMod3merProtBind_k1*DopModWTasyn3_Cytosol*Proteasome;
    DopMod3merProtBind_k1 = 3.42469e-9;
  DopMod4merDis: DopModWTasyn4_Cytosol => DopModWTasyn3_Cytosol + DopModWTasyn_Cytosol; Cytosol*DopMod4merDis_k1*DopModWTasyn4_Cytosol;
    DopMod4merDis_k1 = 4.99953e-7;
  DopModAutophagosomeUptake4mer: DopModWTasyn4_Cytosol => DopModWTasyn4_M_autophagy_OtherLysDegrPath; DopModAutophagosomeUptake4mer_k1*DopModWTasyn4_Cytosol;
    DopModAutophagosomeUptake4mer_k1 = 2.39034e-8;
  DopMod5merForm: DopModWTasyn4_Cytosol + DopModWTasyn_Cytosol => DopModWTasyn5_Cytosol; Cytosol*DopMod5merForm_k1*DopModWTasyn4_Cytosol*DopModWTasyn_Cytosol;
    DopMod5merForm_k1 = 3.3505e-8;
  DopMod4merProtBind: DopModWTasyn4_Cytosol + Proteasome => ProtDopModWTasyn4; Cytosol*DopMod4merProtBind_k1*DopModWTasyn4_Cytosol*Proteasome;
    DopMod4merProtBind_k1 = 3.42469e-9;
  DopMod5merDis: DopModWTasyn5_Cytosol => DopModWTasyn4_Cytosol + DopModWTasyn_Cytosol; Cytosol*DopMod5merDis_k1*DopModWTasyn5_Cytosol;
    DopMod5merDis_k1 = 4.99953e-7;
  DopModAutophagosomeUptake5mer: DopModWTasyn5_Cytosol => DopModWTasyn5_M_autophagy_OtherLysDegrPath; DopModAutophagosomeUptake5mer_k1*DopModWTasyn5_Cytosol;
    DopModAutophagosomeUptake5mer_k1 = 2.39034e-8;
  DopMod6merForm: DopModWTasyn5_Cytosol + DopModWTasyn_Cytosol => DopModWTasyn6_Cytosol; Cytosol*DopMod6merForm_k1*DopModWTasyn5_Cytosol*DopModWTasyn_Cytosol;
    DopMod6merForm_k1 = 3.3505e-8;
  DopMod5merProtBind: DopModWTasyn5_Cytosol + Proteasome => ProtDopModWTasyn5; Cytosol*DopMod5merProtBind_k1*DopModWTasyn5_Cytosol*Proteasome;
    DopMod5merProtBind_k1 = 3.42469e-9;
  DopMod6merDis: DopModWTasyn6_Cytosol => DopModWTasyn5_Cytosol + DopModWTasyn_Cytosol; Cytosol*DopMod6merDis_k1*DopModWTasyn6_Cytosol;
    DopMod6merDis_k1 = 4.99953e-7;
  DopModAutophagosomeUptake6mer: DopModWTasyn6_Cytosol => DopModWTasyn6_M_autophagy_OtherLysDegrPath; DopModAutophagosomeUptake6mer_k1*DopModWTasyn6_Cytosol;
    DopModAutophagosomeUptake6mer_k1 = 2.39034e-8;
  DopMod7merForm: DopModWTasyn6_Cytosol + DopModWTasyn_Cytosol => DopModWTasyn7_Cytosol; Cytosol*DopMod7merForm_k1*DopModWTasyn6_Cytosol*DopModWTasyn_Cytosol;
    DopMod7merForm_k1 = 3.3505e-8;
  DopMod6merProtBind: DopModWTasyn6_Cytosol + Proteasome => ProtDopModWTasyn6; Cytosol*DopMod6merProtBind_k1*DopModWTasyn6_Cytosol*Proteasome;
    DopMod6merProtBind_k1 = 3.42469e-9;
  DopMod7merDis: DopModWTasyn7_Cytosol => DopModWTasyn6_Cytosol + DopModWTasyn_Cytosol; Cytosol*DopMod7merDis_k1*DopModWTasyn7_Cytosol;
    DopMod7merDis_k1 = 4.99953e-7;
  DopModAutophagosomeUptake7mer: DopModWTasyn7_Cytosol => DopModWTasyn7_M_autophagy_OtherLysDegrPath; DopModAutophagosomeUptake7mer_k1*DopModWTasyn7_Cytosol;
    DopModAutophagosomeUptake7mer_k1 = 2.39034e-8;
  DopMod8merForm: DopModWTasyn7_Cytosol + DopModWTasyn_Cytosol => DopModWTasyn8_Cytosol; Cytosol*DopMod8merForm_k1*DopModWTasyn7_Cytosol*DopModWTasyn_Cytosol;
    DopMod8merForm_k1 = 3.3505e-8;
  DopMod7merProtBind: DopModWTasyn7_Cytosol + Proteasome => ProtDopModWTasyn7; Cytosol*DopMod7merProtBind_k1*DopModWTasyn7_Cytosol*Proteasome;
    DopMod7merProtBind_k1 = 3.42469e-9;
  DopMod8merDis: DopModWTasyn8_Cytosol => DopModWTasyn7_Cytosol + DopModWTasyn_Cytosol; Cytosol*DopMod8merDis_k1*DopModWTasyn8_Cytosol;
    DopMod8merDis_k1 = 4.99953e-7;
  DopModAutophagosomeUptake8mer: DopModWTasyn8_Cytosol => DopModWTasyn8_M_autophagy_OtherLysDegrPath; DopModAutophagosomeUptake8mer_k1*DopModWTasyn8_Cytosol;
    DopModAutophagosomeUptake8mer_k1 = 2.39034e-8;
  DopMod9merForm: DopModWTasyn8_Cytosol + DopModWTasyn_Cytosol => DopModWTasyn9; Cytosol*DopMod9merForm_k1*DopModWTasyn8_Cytosol*DopModWTasyn_Cytosol;
    DopMod9merForm_k1 = 3.3505e-8;
  DopMod8merProtBind: DopModWTasyn8_Cytosol + Proteasome => ProtDopModWTasyn8; Cytosol*DopMod8merProtBind_k1*DopModWTasyn8_Cytosol*Proteasome;
    DopMod8merProtBind_k1 = 3.42469e-9;
  DopMod9merDis: DopModWTasyn9 => DopModWTasyn8_Cytosol + DopModWTasyn_Cytosol; Cytosol*DopMod9merDis_k1*DopModWTasyn9;
    DopMod9merDis_k1 = 4.99953e-7;
  DopMod9merProtBind: DopModWTasyn9 + Proteasome => ProtDopModWTasyn9; Cytosol*DopMod9merProtBind_k1*DopModWTasyn9*Proteasome;
    DopMod9merProtBind_k1 = 3.42469e-9;
  WTasyn2merCMADegr: WTasyn2_Lysosome => WTasyn2merCMADegr_Lysosome; Lysosome*WTasyn2merCMADegr_k1*WTasyn2_Lysosome;
    WTasyn2merCMADegr_k1 = 0.1;
  WTasyn1merCMADegr: WTasyn_Lysosome => WTasynCMADegr; Lysosome*WTasyn1merCMADegr_k1*WTasyn_Lysosome;
    WTasyn1merCMADegr_k1 = 0.1;
  LampFree9merWT: WTasyn9merOnLamp => WTasyn9 + Lamp2a; LampFree9merWT_k1*WTasyn9merOnLamp;
    LampFree9merWT_k1 = 0.000304457;
  DopWTasyn3merFormOnLamp: DopModWTasyn2merOnLamp + DopModWTasyn_Cytosol => DopModWTasyn3merOnLamp; DopWTasyn3merFormOnLamp_k1*DopModWTasyn2merOnLamp*DopModWTasyn_Cytosol;
    DopWTasyn3merFormOnLamp_k1 = 3.3505e-8;
  DopWTasyn4merFormOnLamp: DopModWTasyn3merOnLamp + DopModWTasyn_Cytosol => DopModWTasyn4merOnLamp; DopWTasyn4merFormOnLamp_k1*DopModWTasyn3merOnLamp*DopModWTasyn_Cytosol;
    DopWTasyn4merFormOnLamp_k1 = 3.3505e-8;
  DopWTasyn5merFormOnLamp: DopModWTasyn4merOnLamp + DopModWTasyn_Cytosol => DopModWTasyn5merOnLamp; DopWTasyn5merFormOnLamp_k1*DopModWTasyn4merOnLamp*DopModWTasyn_Cytosol;
    DopWTasyn5merFormOnLamp_k1 = 3.3505e-8;
  DopWTasyn6merFormOnLamp: DopModWTasyn5merOnLamp + DopModWTasyn_Cytosol => DopModWTasyn6merOnLamp; DopWTasyn6merFormOnLamp_k1*DopModWTasyn5merOnLamp*DopModWTasyn_Cytosol;
    DopWTasyn6merFormOnLamp_k1 = 3.3505e-8;
  LampFree3merWT: WTasyn3merOnLamp => WTasyn3_Cytosol + Lamp2a; LampFree3merWT_k1*WTasyn3merOnLamp;
    LampFree3merWT_k1 = 0.000304457;
  LampFree4merWT: WTasyn4merOnLamp => WTasyn4_Cytosol + Lamp2a; LampFree4merWT_k1*WTasyn4merOnLamp;
    LampFree4merWT_k1 = 0.000304457;
  LampFree5merWT: WTasyn5merOnLamp => WTasyn5_Cytosol + Lamp2a; LampFree5merWT_k1*WTasyn5merOnLamp;
    LampFree5merWT_k1 = 0.000304457;
  LampFree6merWT: WTasyn6merOnLamp => WTasyn6_Cytosol + Lamp2a; LampFree6merWT_k1*WTasyn6merOnLamp;
    LampFree6merWT_k1 = 0.000304457;
  LampFree7merWT: WTasyn7merOnLamp => WTasyn7_Cytosol + Lamp2a; LampFree7merWT_k1*WTasyn7merOnLamp;
    LampFree7merWT_k1 = 0.000304457;
  LampFree8merWT: WTasyn8merOnLamp => WTasyn8_Cytosol + Lamp2a; LampFree8merWT_k1*WTasyn8merOnLamp;
    LampFree8merWT_k1 = 0.000304457;
  WTasyn8merBindOnLamp: WTasyn8merOnLamp + WTasyn8_Cytosol => Lamp2a; WTasyn8merBindOnLamp_k1*WTasyn8merOnLamp*WTasyn8_Cytosol;
    WTasyn8merBindOnLamp_k1 = 4e-6;
  WTasyn3merBindOnLamp: Lamp2a + WTasyn3_Cytosol => WTasyn3merOnLamp; WTasyn3merBindOnLamp_k1*Lamp2a*WTasyn3_Cytosol;
    WTasyn3merBindOnLamp_k1 = 4e-6;
  WTasyn4merBindOnLamp: Lamp2a + WTasyn4_Cytosol => WTasyn4merOnLamp; WTasyn4merBindOnLamp_k1*Lamp2a*WTasyn4_Cytosol;
    WTasyn4merBindOnLamp_k1 = 4e-6;
  WTasyn6merBindOnLamp: Lamp2a + WTasyn6_Cytosol => WTasyn6merOnLamp; WTasyn6merBindOnLamp_k1*Lamp2a*WTasyn6_Cytosol;
    WTasyn6merBindOnLamp_k1 = 4e-6;
  DopModWTasynCMAInhibition: Lamp2a + DopModWTasyn_Cytosol => DopModWTasynOnLamp; DopModWTasynCMAInhibition_k1*Lamp2a*DopModWTasyn_Cytosol;
    DopModWTasynCMAInhibition_k1 = 7.6716e-9;
  M_autophagyDopModWTasyn4Degr: DopModWTasyn4_M_autophagy_OtherLysDegrPath => DopModWTasyn4merM_Adegr; M_autophagy_OtherLysDegrPath*M_autophagyDopModWTasyn4Degr_k1*DopModWTasyn4_M_autophagy_OtherLysDegrPath; M_autophagyDopModWTasyn4Degr is "M/autophagyDopModWTasyn4Degr";
    M_autophagyDopModWTasyn4Degr_k1 = 0.1;
  M_autophagyDopModWTasyn3Degr: DopModWTasyn3_M_autophagy_OtherLysDegrPath => DopModWTasyn3merM_Adegr; M_autophagy_OtherLysDegrPath*M_autophagyDopModWTasyn3Degr_k1*DopModWTasyn3_M_autophagy_OtherLysDegrPath; M_autophagyDopModWTasyn3Degr is "M/autophagyDopModWTasyn3Degr";
    M_autophagyDopModWTasyn3Degr_k1 = 0.1;
  M_autophagyDopModWTasyn2Degr: DopModWTasyn2_M_autophagy_OtherLysDegrPath => DopModWTasyn2merM_Adegr; M_autophagy_OtherLysDegrPath*M_autophagyDopModWTasyn2Degr_k1*DopModWTasyn2_M_autophagy_OtherLysDegrPath; M_autophagyDopModWTasyn2Degr is "M/autophagyDopModWTasyn2Degr";
    M_autophagyDopModWTasyn2Degr_k1 = 0.1;
  M_autophagyDopModWTasyn5Degr: DopModWTasyn5_M_autophagy_OtherLysDegrPath => DopModWTasyn6merM_Adegr; M_autophagy_OtherLysDegrPath*M_autophagyDopModWTasyn5Degr_k1*DopModWTasyn5_M_autophagy_OtherLysDegrPath; M_autophagyDopModWTasyn5Degr is "M/autophagyDopModWTasyn5Degr";
    M_autophagyDopModWTasyn5Degr_k1 = 0.1;
  M_autophagyDopModWTasyn6Degr: DopModWTasyn6_M_autophagy_OtherLysDegrPath => DopModWTasyn7merM_Adegr; M_autophagy_OtherLysDegrPath*M_autophagyDopModWTasyn6Degr_k1*DopModWTasyn6_M_autophagy_OtherLysDegrPath; M_autophagyDopModWTasyn6Degr is "M/autophagyDopModWTasyn6Degr";
    M_autophagyDopModWTasyn6Degr_k1 = 0.1;
  M_autophagyDopModWTasyn7Degr: DopModWTasyn7_M_autophagy_OtherLysDegrPath => DopModWTasyn7merM_Adegr; M_autophagy_OtherLysDegrPath*M_autophagyDopModWTasyn7Degr_k1*DopModWTasyn7_M_autophagy_OtherLysDegrPath; M_autophagyDopModWTasyn7Degr is "M/autophagyDopModWTasyn7Degr";
    M_autophagyDopModWTasyn7Degr_k1 = 0.1;
  M_autophagyDopModWTasyn8Degr: DopModWTasyn8_M_autophagy_OtherLysDegrPath => DopModWTasyn8merM_Adegr; M_autophagy_OtherLysDegrPath*M_autophagyDopModWTasyn8Degr_k1*DopModWTasyn8_M_autophagy_OtherLysDegrPath; M_autophagyDopModWTasyn8Degr is "M/autophagyDopModWTasyn8Degr";
    M_autophagyDopModWTasyn8Degr_k1 = 0.1;
  WTasyn2merFormOnLamp: WTasyn_Cytosol + WTasyndegr => WTasyn2degr; WTasyn2merFormOnLamp_k1*WTasyn_Cytosol*WTasyndegr;
    WTasyn2merFormOnLamp_k1 = 1.46294e-9;
  WTasyn3merFormOnLamp: WTasyn_Cytosol + WTasyn2degr => WTasyn3merOnLamp; WTasyn3merFormOnLamp_k1*WTasyn_Cytosol*WTasyn2degr;
    WTasyn3merFormOnLamp_k1 = 3.3505e-8;
  WTasyn4merFormOnLamp: WTasyn_Cytosol + WTasyn3merOnLamp => WTasyn4merOnLamp; WTasyn4merFormOnLamp_k1*WTasyn_Cytosol*WTasyn3merOnLamp;
    WTasyn4merFormOnLamp_k1 = 3.3505e-8;
  WTasyn5merFormOnLamp: WTasyn_Cytosol + WTasyn4merOnLamp => WTasyn5merOnLamp; WTasyn5merFormOnLamp_k1*WTasyn_Cytosol*WTasyn4merOnLamp;
    WTasyn5merFormOnLamp_k1 = 3.3505e-8;
  WTasyn6merFormOnLamp: WTasyn5merOnLamp + WTasyn_Cytosol => WTasyn6merOnLamp; WTasyn6merFormOnLamp_k1*WTasyn5merOnLamp*WTasyn_Cytosol;
    WTasyn6merFormOnLamp_k1 = 3.3505e-8;
  WTasyn7merFormOnLamp: WTasyn6merOnLamp + WTasyn_Cytosol => WTasyn7merOnLamp; WTasyn7merFormOnLamp_k1*WTasyn6merOnLamp*WTasyn_Cytosol;
    WTasyn7merFormOnLamp_k1 = 3.3505e-8;
  WTasyn8merFormOnLamp: WTasyn_Cytosol + WTasyn7merOnLamp => WTasyn8merOnLamp; WTasyn8merFormOnLamp_k1*WTasyn_Cytosol*WTasyn7merOnLamp;
    WTasyn8merFormOnLamp_k1 = 3.3505e-8;
  WTasyn9merFormOnLamp: WTasyn_Cytosol + WTasyn8merOnLamp => WTasyn9merOnLamp; WTasyn9merFormOnLamp_k1*WTasyn_Cytosol*WTasyn8merOnLamp;
    WTasyn9merFormOnLamp_k1 = 3.3505e-8;
  ProtFree3merWT: ProtWTasyn3 => Proteasome; Cytosol*ProtFree3merWT_k1*ProtWTasyn3;
    ProtFree3merWT_k1 = 0.000370096;
  ProtFree4merWT: ProtWTasyn4 => Proteasome; Cytosol*ProtFree4merWT_k1*ProtWTasyn4;
    ProtFree4merWT_k1 = 0.000370096;
  ProtFree5merWT: ProtWTasyn5 => Proteasome; Cytosol*ProtFree5merWT_k1*ProtWTasyn5;
    ProtFree5merWT_k1 = 0.000370096;
  ProtFree6merWT: ProtWTasyn6 => Proteasome; Cytosol*ProtFree6merWT_k1*ProtWTasyn6;
    ProtFree6merWT_k1 = 0.000370096;
  ProtFree7merWT: ProtWTasyn7 => Proteasome; Cytosol*ProtFree7merWT_k1*ProtWTasyn7;
    ProtFree7merWT_k1 = 0.000370096;
  ProtFree8merWT: ProtWTasyn8 => Proteasome; Cytosol*ProtFree8merWT_k1*ProtWTasyn8;
    ProtFree8merWT_k1 = 0.000370096;
  ProtFree9merWT: ProtWTasyn9 => Proteasome; Cytosol*ProtFree9merWT_k1*ProtWTasyn9;
    ProtFree9merWT_k1 = 0.000370096;
  ProtFree3merDopWT: ProtDopModWTasyn3 => Proteasome; Cytosol*ProtFree3merDopWT_k1*ProtDopModWTasyn3;
    ProtFree3merDopWT_k1 = 0.000370096;
  ProtFree4merDopWT: ProtDopModWTasyn4 => Proteasome; Cytosol*ProtFree4merDopWT_k1*ProtDopModWTasyn4;
    ProtFree4merDopWT_k1 = 0.000370096;
  ProtFree5merDopWT: ProtDopModWTasyn5 => Proteasome; Cytosol*ProtFree5merDopWT_k1*ProtDopModWTasyn5;
    ProtFree5merDopWT_k1 = 0.000370096;
  ProtFree6merDopWT: ProtDopModWTasyn6 => Proteasome; Cytosol*ProtFree6merDopWT_k1*ProtDopModWTasyn6;
    ProtFree6merDopWT_k1 = 0.000370096;
  ProtFree7merDopWT: ProtDopModWTasyn7 => Proteasome; Cytosol*ProtFree7merDopWT_k1*ProtDopModWTasyn7;
    ProtFree7merDopWT_k1 = 0.000370096;
  ProtFree8merDopWT: ProtDopModWTasyn8 => Proteasome; Cytosol*ProtFree8merDopWT_k1*ProtDopModWTasyn8;
    ProtFree8merDopWT_k1 = 0.000370096;
  ProtFree9merDopWT: ProtDopModWTasyn9 => Proteasome; Cytosol*ProtFree9merDopWT_k1*ProtDopModWTasyn9;
    ProtFree9merDopWT_k1 = 0.000370096;
  WTasynHigherSPCprotInh: HigherWTasynSPC + Proteasome => ProtWTasynHigherSPC; Cytosol*WTasynHigherSPCprotInh_k1*HigherWTasynSPC*Proteasome;
    WTasynHigherSPCprotInh_k1 = 3.42469e-9;
  AutophagosomeUptakeWTasyn: WTasyn_Cytosol => WTasyn_M_autophagy_OtherLysDegrPath; AutophagosomeUptakeWTasyn_k1*WTasyn_Cytosol;
    AutophagosomeUptakeWTasyn_k1 = 2.39034e-8;
  DopModAutophagosomeUptake: DopModWTasyn_Cytosol => DopModWTasyn_M_autophagy_OtherLysDegrPath; DopModAutophagosomeUptake_k1*DopModWTasyn_Cytosol;
    DopModAutophagosomeUptake_k1 = 2.39034e-8;
  M_autophagyDopModWTasyn1Degr: DopModWTasyn_M_autophagy_OtherLysDegrPath => DopModWTasyn1merM_Adegr; M_autophagy_OtherLysDegrPath*M_autophagyDopModWTasyn1Degr_k1*DopModWTasyn_M_autophagy_OtherLysDegrPath; M_autophagyDopModWTasyn1Degr is "M/autophagyDopModWTasyn1Degr";
    M_autophagyDopModWTasyn1Degr_k1 = 0.1;
  M_autophagyWTasynDegr: WTasyn_M_autophagy_OtherLysDegrPath => WTasynmerM_Adegr; M_autophagy_OtherLysDegrPath*M_autophagyWTasynDegr_k1*WTasyn_M_autophagy_OtherLysDegrPath; M_autophagyWTasynDegr is "M/autophagyWTasynDegr";
    M_autophagyWTasynDegr_k1 = 0.1;

  // Unit definitions:
  unit volume = dimensionless;
  unit substance = dimensionless;
end
